<?xml version="1.0"?>
<!--
  Name:     F110-GE-400
  File:     F110-GE-400.xml
  Author:   Richard Harrison (rjh@zaretto.com)
  Date:     20 September 2014
            23 May 2021 - revised thrust tables for new data.

  Description:
    Two-shaft turbofan engine with afterburner and convergent/divergent nozzle
    Type: Afterburning turbofan
    Length: 182.3 - 232.3 in (463 - 590 cm)
    Diameter: 46.5 in (118 cm)
    Dry weight: 3,920 - 4,400 lb (1,778 - 1,996 kg)
    Compressor: 2 spool: 3 fan and 9 high pressure compressor stages
    Combustors: annular
    Turbine: 2 low-pressure and 1 high-pressure stages
    Maximum thrust: F110-GE-400:
    Turbine inlet temperature: 2750F (1510C)[4]

  Engine Thrust tables are based on a version of the engine simulation from the F-16 model in NASA/TM-2003-212145.
  The engine model is located in a file "f16.tar" that I downloaded on 24 August 2014 - which itself appears to be
  based on the data in NASA-TP-1538
  I converted the Fortran code for ENGINE_THRUST into C# and then normalized the tables based on the maximum
  values in the table; adjusted to take into account the difference between a F-100-PW-100 and an F-100-GE-400
  using the values from the SAC
     var f100_to_f110_factor = 16333.0/14370.0; // based on F-15C SAC F-100-PW-220 and F-14D-SAC NAVAIR 00-110AF14-2

  There is also file in Systems/f-14b-engines.xml that is a companion to this simulation and provides
  detailed models for
  * EGT
  * Afterburner (pressure dynamics, 5 stage)
  * Fuel pressure and temperature
  * Oil pressure and temperature

  Future enhancements of the model would be to
  1. Model inlet airflow rate
  2. Flameout engines when insufficient air mass
  3. Adverse effects when inlet airflow too high and would compressor stalls,  and/or stagnation and/or

  Refs:
        Flight and Static Exhaust Flow  Properties of an F110-GE-129  Engine in an F-16XL Airplane  During Acoustic Tests
        Jon K. Holzman, Lannie D. Webb, and Frank W. Burcham,
        November 1996
        NASA-TM-104326

        Real-Time Simulation of an F 110/STOVL Turbofan Engine
        Colin K. Drummond and Peter J. Ouzts
        October 16-17, 1989
        NASA-TM-102409

   https://web.archive.org/web/20161015164041/http://www.jet-engine.net/miltfspec.html
   https://web.archive.org/web/20160423061940/http://www.geaviation.com/military/engines/f110/
   https://web.archive.org/web/20190710112901/http://www.stardestroyer.net/Armour/ShepStuff/Website/Statistics/Engines.htm
-->

<turbine_engine name="F110-GE-400">
    <milthrust> 16800.0 </milthrust>
    <maxthrust> 27080 </maxthrust>
    <bypassratio>     0.87  </bypassratio>
    <tsfc>            0.675 </tsfc>
    <atsfc>           2.01  </atsfc>
    <!-- kg/(kNH) http://www.anft.net/f-14/f14-detail-engine.htm -->
    <bleed>           0.03</bleed>
    <idlen1>         30.0 </idlen1>
    <idlen2>         60.0 </idlen2>
    <maxn1>         100.0 </maxn1>
    <maxn2>         100.0 </maxn2>
    <augmented>         1 </augmented>
    <augmethod>         2 </augmethod>
    <!-- acceleration from 0 -> 15% (at which point the start logic takes over in FGTurbine using 1.2 and 2.0 for N1/N2 acceleration rate) -->
    <n1spinup>1</n1spinup>
    <n2spinup>3</n2spinup>

    <injected>0 </injected>

    <function name="IdleThrust">
        <table>
            <independentVar lookup="row">velocities/mach</independentVar>
            <independentVar lookup="column">atmosphere/density-altitude</independentVar>
            <tableData>
                               0        10000        20000        30000        35000        40000        50000        61000
                0.0      0.06310      0.03988      0.05238      0.06786      0.07857      0.08929      0.11071      0.00000
                0.2      0.03780      0.02530      0.04107      0.06012      0.06964      0.07917      0.10119      0.00000
                0.4      0.00357      0.00149      0.02054      0.04494      0.05610      0.06726      0.09077      0.00000
                0.6     -0.06071     -0.04226     -0.01786      0.02083      0.03750      0.05417      0.08095      0.00000
                0.8     -0.16071     -0.11310     -0.07738     -0.01470      0.01051      0.03571      0.06548      0.00000
                1.0     -0.21429     -0.08333     -0.03542     -0.02036     -0.01613     -0.01190      0.04167      0.00000
                1.2     -0.26786     -0.05357      0.00655     -0.02601     -0.04277     -0.05952      0.01786      0.00000
                1.4     -0.32143     -0.02381      0.04851     -0.03167     -0.06940     -0.10714     -0.00595      0.00000
                1.6     -0.37500      0.00595      0.09048     -0.03732     -0.09604     -0.15476     -0.02976      0.00000
                1.8     -0.42857      0.03571      0.13244     -0.04298     -0.12268     -0.20238     -0.05357      0.00000
                2.0     -0.48214      0.06548      0.17440     -0.04863     -0.14932     -0.25000     -0.07738      0.00000
            </tableData>
        </table>
    </function>

    <function name="MilThrust">
        <table>
            <independentVar lookup="row">velocities/mach</independentVar>
            <independentVar lookup="column">atmosphere/density-altitude</independentVar>
            <tableData>
                               0        10000        20000        30000        35000        40000        50000        61000
                0.0      1.13660      0.82018      0.55575      0.35407      0.28684      0.21961      0.12549      0.00000
                0.2      1.13660      0.82018      0.56588      0.36214      0.29177      0.22140      0.12549      0.00000
                0.4      1.13033      0.83470      0.59250      0.38455      0.30880      0.23306      0.13983      0.00000
                0.6      1.13302      0.88194      0.63553      0.41771      0.33614      0.25457      0.14880      0.00000
                0.8      1.11061      0.91215      0.69469      0.47687      0.38410      0.29132      0.17300      0.00000
                1.0      1.04697      0.88275      0.72158      0.54679      0.44371      0.34062      0.20706      0.00000
                1.2      0.98332      0.85335      0.74847      0.61671      0.50331      0.38992      0.24112      0.00000
                1.4      0.91968      0.82395      0.77536      0.68662      0.56292      0.43922      0.27519      0.00000
                1.6      0.85604      0.79455      0.80226      0.75654      0.62253      0.48852      0.30925      0.00000
                1.8      0.79240      0.76515      0.82915      0.82646      0.68214      0.53783      0.34331      0.00000
                2.0      0.72875      0.73574      0.85604      0.89638      0.74175      0.58713      0.37737      0.00000
            </tableData>
        </table>
    </function>

    <function name="AugThrust">
        <table>
            <independentVar lookup="row">velocities/mach</independentVar>
            <independentVar lookup="column">atmosphere/density-altitude</independentVar>
            <tableData>
                               0        10000        20000        30000        35000        40000        50000        61000
                0.0      1.05970      0.79478      0.57224      0.37090      0.29142      0.21194      0.13246      0.00000
                0.2      1.13494      0.83187      0.59476      0.38801      0.31150      0.23499      0.13776      0.00000
                0.4      1.20276      0.89333      0.64907      0.43204      0.34848      0.26493      0.15021      0.00000
                0.6      1.28436      1.00195      0.72907      0.49197      0.39699      0.30201      0.17035      0.00000
                0.8      1.38132      1.11666      0.84644      0.58893      0.47620      0.36348      0.20929      0.00000
                1.0      1.53053      1.23556      0.96963      0.71445      0.58617      0.45790      0.26795      0.00000
                1.2      1.67973      1.35446      1.09282      0.83997      0.69614      0.55232      0.32660      0.00000
                1.4      1.82894      1.47336      1.21601      0.96549      0.80611      0.64674      0.38525      0.00000
                1.6      1.97814      1.59225      1.33920      1.09102      0.91609      0.74116      0.44391      0.00000
                1.8      2.12735      1.71115      1.46239      1.21654      1.02606      0.83557      0.50256      0.00000
                2.0      2.27656      1.83005      1.58558      1.34206      1.13603      0.92999      0.56122      0.00000
            </tableData>
        </table>
    </function>

</turbine_engine>
