<?xml version="1.0"?>
<?xml-stylesheet type="text/xsl" href="http://raw.githubusercontent.com/JSBSim-Team/jsbsim/master/JSBSimScript.xsl"?>
<fdm_config name="F-14B" version="2.0" release="PRODUCTION"
   xmlns:xsi="http://www.w3.org/2001/XMLSchema-instance"
   xsi:noNamespaceSchemaLocation="http://raw.githubusercontent.com/JSBSim-Team/jsbsim/master/JSBSim.xsd">

    <fileheader>
        <author>Richard Harrison</author>
        <filecreationdate>2014-08-02</filecreationdate>
        <version>1.0</version>
        <description>
            Models an F14-B with F110-GE-400 engines.

            The aerodata used is from AFWAL-TR-80-3141 and AFWAL-TR-80-3141
            which is for sweep of 22degrees, positive alpha, clean, low speed.
            NASA TM-X-62306 is used for longitudinal flaps, speedbrakes, gear and spoilers

            Wingsweep and lateral spoilers are based on CFD computed values (OpenVSP).

            Engine Thrust are based on NASA-TM-104326 tables 4-6 adjusted for altitude and with
            augmentation figures based on that of the mil thrust.

            The flaps and auxiliary flaps coefficients are modelled based on tuning to meet F-14AAD-1 as no data
            is currently available. The proportions assigned are relative to their surface area
            (as measured roughly 64% main, 36% aux) - the values assigned are 0.7 and 0.3 based on this
            and this applies to ClDFM, CdDFM and CMDFM

        </description>
        <note>Aircraft origin for measurements is the nose.</note>
        <note>Low speed clean should be exactly as an F-14 as this model is based on accurate aerodata (see limitations below).</note>
        <limitation>Wingsweep and lateral spoilers are based on CFD computed values (OpenVSP).</limitation>
        <reference
            refID="http://zaretto.com/f-14b"
            author="Richard Harrison"
            title="Grummnan F-14B Model for flightgear"
            date="October 24, 2014"
        />
        <reference
            refID="AFWAL-TR-80-3141"
            author="Donald E. Johnston, David G. Mitchell, Thomas T. Myers"
            title="Investigation of High-Angle-of-Attack Maneuver-limiting factors, Part I: Anaylsis and simulation"
            date="1980"
        />
        <reference
            refID="AFWAL-TR-80-3141"
            author="Donald E. Johnston, David G. Mitchell, Thomas T. Myers"
            title="Investigation of High-Angle-of-Attack Maneuver-limiting factors, Part III: Appendices aerodynamic models"
            date="1980"
        />
        <reference
            refID="NASA TN D-6909"
            author="Sue B. Grafton and Ernie L. Anglin"
            title="DYNAMIC STABILITY DERIVATIVES AT ANGLES OF ATTACK FROM -5deg TO 90deg FOR A VARIABLE-SWEEP FIGHTER CONFIGURATION WITH TWIN VERTICAL TAILS"
            date="1972"
        />
        <reference
            refID="NASA-TP-3253"
            author="Gary E. Erickson and Lawrence W. Rogers"
            title="Effects of Forebody Strakes an Mach number on overall aerodynamic characterisitcs of configuration with 55degree cropped delta wing"
            date="November 1992"
        />
        <reference
            refID="NASA-TM-81833"
            title="Simulator results of an F-14A airplane utilizing an aileron-rudder interconnect during carrier approaches and landings"
            author="Kelly, W. W. and Brown, P. W. (NASA Langley Research Center Hampton, VA, United States)"
            date="May 1, 1980"
            URL="https://ntrs.nasa.gov/citations/19800020867"
        />
        <reference
            refID="NASA-TM-81972"
            title="Limited evaluation of an F-14A airplane utilizing an aileron-rudder interconnect control system in the landing configuration"
            author="Kelley, W. W. (NASA Langley Research Center Hampton, VA, United States), Enevoldson, E. K. (NASA Dryden Flight Research Center)"
            date=" December 1, 1981"
            URL="https://ntrs.nasa.gov/citations/19820005275"
        />

        <reference
            refID="NASA-TM-84643"
            author="M. Leroy Spearman"
            title="Effects of Wing and tail location on the aerodynamic characteristics of an airplane for mach numbers from 0.25 to 4.63"
            date="March 1983"
        />
        <reference
            refID="NASA-aaia-2000-0900"
            title="Aerodynamic characteristics, database development and flight simulation of the X-34 vehicle"
            author="Bandu Pamadi, Gregory Brauckmann, Michael Ruth and Henri Fuhrmann"
            date="22 Aug 2012"
            URL="https://doi.org/10.2514/6.2000-900"
        />
        <reference
            refID="NASA-TM-104326"
            title="Flight and Static Exhaust Flow  Properties of an F110-GE-129  Engine in an F-16XL Airplane  During Acoustic Tests"
            author="Jon K. Holzman, Lannie D. Webb, and Frank W. Burcham, JR."
            date="November 1996"
        />
        <reference
            refID="NASA-TM-101717"
            title="Flutter clearance to the F-14A Variable-Sweep Transition Flight Expirement Airplane - Phase 2"
            author="Lawrence C. Freudinger and Michael W. Kehoe"
            date="July 1990"
        />
        <reference
            refID="NASA-TM-102409"
            author="Colin K. Drummond and Peter J. Ouzts"
            title="Real-Time Simulation of an F 110/STOVL Turbofan Engine"
            date="October 16-17, 1989"
        />
        <reference
            refID="http://www.ssdl.gatech.edu/papers/mastersProjects/MillerJ-8900.pdf"
            title="Investigation of Transonic Drag Computations in Aerodynamic Preliminary Analysis System (APAS)"
            author="Jeff Miller"
            date="April 26, 2002"
        />
        <reference
            refID="NASA TM-X-62244"
            URL="https://ntrs.nasa.gov/search.jsp?R=19730023208"
            title="Low-speed wind-tunnel investigation of the longitudinal characteristics of a large-scale variable wing-sweep fighter model in the high-lift configuration"
            author="William T. Eckert and Ralph L. Maki"
            date="August 1, 1973"
            />

        <reference
            refID="NASA TM-X-62306"
            URL="https://ntrs.nasa.gov/search.jsp?R=19740004601"
            title="Low-speed wind tunnel investigation of the lateral-directional characterisitcs of a large-scale variable wing-sweep fighter model in the high-lift configuration"
            author="William T. Eckert and Ralph L. Maki"
            date="October 1, 1973"
            />

    </fileheader>

    <!--
Notes:

1. possibly need to consider differential spoiler deflection on yaw moments

2. Surface positions
Cockpit control	Stabilizer Surface	Parallel Trim
Actuation	Mode	Motion	Authority	Rate	Authority	Rate
Control Stick	Manual	4 Inches forward
5.5 inches AFT	12deg TED
33deg TEU	36deg/second	9deg TEU
18deg TEU	1 deg/second
AFCS	Series (SAS)	NONE	+/- 3deg	20deg/second	-	-
	Parallel
(ACL Only)	4 Inches forward
5.5 inches AFT	12deg TED
33deg TEU	36deg/second	9deg TEU
18deg TEU	0.1 deg/second
Maneuver FLAP (ITS) AND DLC Thumbwheel	Series	+45 deg DLC Thumbwheel mode	8.4 TED maximum	36deg/second	-	-
		+45deg maneuver flap mode	+/- 3deg	3deg/sec	-	-
-->

    <!-- <system file="f-14a-engines"/> -->
    <!-- <system file="jt9d"/> -->
    <system file="f-14b-hydraulic"/>
    <system file="f-14b-electrics"/>
    <system file="f-14b-cadc"/>
    <system file="f-14b-ecs.xml"/>
    <system file="f-14b-engines"/>
    <system file="hook"/>
    <system file="catapult"/>
    <system file="holdback"/>
    <system file="f-14b-landing-gear"/>
    <system file="f-14-apc"/>

    <metrics>
        <wingarea       unit="FT2">   565 </wingarea>
        <wingspan       unit="FT" >    64 </wingspan>
        <wing_incidence unit="DEG">     2 </wing_incidence>

        <chord     unit="FT" >    9.82 </chord>
        <htailarea unit="FT2">  140.00 </htailarea>
        <htailarm  unit="FT" >   25.10 </htailarm>
        <vtailarea unit="FT2">  118.00 </vtailarea>
        <!-- 59ft2 each -->
        <vtailarm  unit="FT" >   25.10 </vtailarm>

        <location name="EYEPOINT" unit="IN">
            <x> 197 </x>
            <y>   0.00 </y>
            <z>  -3.94 </z>
        </location>
        <location name="VRP" unit="IN">
            <x>  386</x>
            <y>  0 </y>
            <z>  31 </z>
        </location>
        <location name="AERORP" unit="IN">
            <x> 419 </x>
            <y>   0.00 </y>
            <z>   0.00 </z>
        </location>
    </metrics>

    <mass_balance>
        <ixx unit="SLUG*FT2">     58950 </ixx>
        <iyy unit="SLUG*FT2">    225600 </iyy>
        <izz unit="SLUG*FT2">    285000 </izz>
        <!-- using GE F110 engines but aero is for F14A -->
        <!-- left to right; 01 pylons, 2 left tank, 3456 centre rails, 7 right tank, 89 right  pylons -->
        <emptywt unit="LBS" >     42104 </emptywt>
        <location name="CG" unit="IN">
            <x> 407</x>
            <y>   0.00 </y>
            <z>   0.00 </z>
        </location>
        <pointmass name="Left Pylon0">
            <weight unit="LBS"> 0 </weight>
            <location name="POINTMASS" unit="IN">
                <x> 403 </x>
                <y> -100 </y>
                <z> -13 </z>
            </location>
        </pointmass>
        <pointmass name="Left Pylon1">
            <weight unit="LBS"> 0 </weight>
            <location name="POINTMASS" unit="IN">
                <x> 403 </x>
                <y> -95 </y>
                <z> -10 </z>
            </location>
        </pointmass>
        <pointmass name="Left External Tank2">
            <weight unit="LBS"> 0 </weight>
            <location name="POINTMASS" unit="IN">
                <x>416</x>
                <y>-55</y>
                <z>-110</z>
            </location>
        </pointmass>

        <pointmass name="Centre Left Front3">
            <weight unit="LBS"> 0 </weight>
            <location name="POINTMASS" unit="IN">
                <x> 316 </x>
                <y> -5 </y>
                <z> -3 </z>
            </location>
        </pointmass>

        <pointmass name="Centre Left Rear4">
            <weight unit="LBS"> 0 </weight>
            <location name="POINTMASS" unit="IN">
                <x> 500 </x>
                <y> -5 </y>
                <z> -3 </z>
            </location>
        </pointmass>
        <pointmass name="Centre Right Front5">
            <weight unit="LBS"> 0 </weight>
            <location name="POINTMASS" unit="IN">
                <x> 316 </x>
                <y>   5 </y>
                <z>  -3 </z>
            </location>
        </pointmass>

        <pointmass name="Centre Right Rear6">
            <weight unit="LBS"> 0 </weight>
            <location name="POINTMASS" unit="IN">
                <x> 500 </x>
                <y>   5 </y>
                <z>  -3 </z>
            </location>
        </pointmass>

        <pointmass name="Right External Tank7">
            <weight unit="LBS"> 0 </weight>
            <location name="POINTMASS" unit="IN">
                <x>416</x>
                <y> 55</y>
                <z>-110</z>
            </location>
        </pointmass>

        <pointmass name="Right Pylon8">
            <weight unit="LBS"> 0 </weight>
            <location name="POINTMASS" unit="IN">
                <x> 403 </x>
                <y> 100 </y>
                <z> -13 </z>
            </location>
        </pointmass>
        <pointmass name="Right Pylon9">
            <weight unit="LBS"> 0 </weight>
            <location name="POINTMASS" unit="IN">
                <x> 403 </x>
                <y> 95 </y>
                <z> -10 </z>
            </location>
        </pointmass>
    </mass_balance>

    <!-- 0 -->
    <ground_reactions>
        <contact type="BOGEY" name="NOSE_LG">
            <location unit="IN">
                <x> 197 </x>
                <y> 0 </y>
                <z> -94.01 </z>
            </location>
            <static_friction> 0.8 </static_friction>
            <dynamic_friction> 0.5 </dynamic_friction>
            <rolling_friction> 0.02 </rolling_friction>
            <spring_coeff unit="LBS/FT"> 42500 </spring_coeff>
            <damping_coeff unit="LBS/FT/SEC"> 2000 </damping_coeff>
            <max_steer unit="DEG"> 89 </max_steer>
            <brake_group> NOSE </brake_group>
            <retractable>1</retractable>
            <base-compression-norm>
              <property>gear/kneel-compression-norm</property>
            </base-compression-norm>
        </contact>
        <!-- 1 -->
        <contact type="BOGEY" name="LEFT_MLG">
            <location unit="IN">
                <x> 451 </x>
                <y> -98 </y>
                <z> -102.1  </z>
            </location>
            <static_friction> 0.8 </static_friction>
            <dynamic_friction> 0.5 </dynamic_friction>
            <rolling_friction> 0.02 </rolling_friction>
            <spring_coeff unit="LBS/FT"> 42500 </spring_coeff>
            <damping_coeff unit="LBS/FT/SEC"> 2000 </damping_coeff>
            <max_steer unit="DEG"> 0.0 </max_steer>
            <brake_group> LEFT </brake_group>
            <retractable>1</retractable>
        </contact>
        <!-- 2 -->
        <contact type="BOGEY" name="RIGHT_MLG">
            <location unit="IN">
                <x> 451 </x>
                <y> 98 </y>
                <z> -102.1 </z>
            </location>
            <static_friction> 0.8 </static_friction>
            <dynamic_friction> 0.5 </dynamic_friction>
            <rolling_friction> 0.02 </rolling_friction>
            <spring_coeff unit="LBS/FT"> 42500 </spring_coeff>
            <damping_coeff unit="LBS/FT/SEC"> 2000 </damping_coeff>
            <max_steer unit="DEG"> 0.0 </max_steer>
            <brake_group> RIGHT </brake_group>
            <retractable>1</retractable>
        </contact>
       <!-- 3 -->
       <contact type="STRUCTURE" name="LEFT_WING_TIP">
            <location unit="IN">
                <x> 472 </x>
                <y> -300 </y>
                <z>   13 </z>
            </location>
            <static_friction> 1.2 </static_friction>
            <dynamic_friction> 1.212 </dynamic_friction>
            <rolling_friction> 1.413 </rolling_friction>
            <spring_coeff unit="LBS/FT"> 10000 </spring_coeff>
            <damping_coeff unit="LBS/FT/SEC"> 2000 </damping_coeff>
        </contact>

          <!--4-->
        <contact type="STRUCTURE" name="RIGHT_WING_TIP">
            <location unit="IN">
                <x> 472 </x>
                <y> 300 </y>
                <z> 13 </z>
            </location>
            <static_friction> 1.2 </static_friction>
            <dynamic_friction> 1.212 </dynamic_friction>
            <rolling_friction> 1.413 </rolling_friction>
            <spring_coeff unit="LBS/FT"> 10000 </spring_coeff>
            <damping_coeff unit="LBS/FT/SEC"> 2000 </damping_coeff>
        </contact>


        <!--  5 -->
        <contact type="STRUCTURE" name="FRONT_BODY">
            <location unit="IN">
                <x> 110 </x>
                <y> 0 </y>
                <z> -47 </z>
            </location>
            <static_friction> 1.2 </static_friction>
            <dynamic_friction> 1.212 </dynamic_friction>
            <rolling_friction> 1.413 </rolling_friction>
            <spring_coeff unit="LBS/FT"> 41300 </spring_coeff>
            <damping_coeff unit="LBS/FT/SEC"> 8600 </damping_coeff>
        </contact>

        <!--  8 -->
        <contact type="STRUCTURE" name="CANOPY">
            <location unit="IN">
                <x> 214 </x>
                <y>  0 </y>
                <z> 10 </z>
            </location>
            <static_friction> 1.2 </static_friction>
            <dynamic_friction> 1.212 </dynamic_friction>
            <rolling_friction> 1.413 </rolling_friction>
            <spring_coeff unit="LBS/FT"> 41300 </spring_coeff>
            <damping_coeff unit="LBS/FT/SEC"> 8600 </damping_coeff>
        </contact>

        <!--  9 -->
        <!--<contact type="STRUCTURE" name="RADOME_FRONT">
            <location unit="IN">
                <x>  20 </x>
                <y>  0 </y>
                <z>  -18 </z>
            </location>
            <static_friction> 1.2 </static_friction>
            <dynamic_friction> 1.212 </dynamic_friction>
            <rolling_friction> 1.413 </rolling_friction>
           <spring_coeff unit="LBS/FT"> 24000 </spring_coeff>
            <damping_coeff unit="LBS/FT/SEC"> 20000 </damping_coeff>
        </contact>-->

        <!--  10 -->
        <contact type="STRUCTURE" name="LEFT_VERTICAL_TAIL">
            <location unit="IN">
                <x> 744 </x>
                <y> -98 </y>
                <z> 60 </z>
            </location>
            <static_friction> 1.2 </static_friction>
            <dynamic_friction> 1.212 </dynamic_friction>
            <rolling_friction> 1.413 </rolling_friction>
            <spring_coeff unit="LBS/FT"> 41300 </spring_coeff>
            <damping_coeff unit="LBS/FT/SEC"> 8600 </damping_coeff>
        </contact>

        <!--  11 -->
        <contact type="STRUCTURE" name="RIGHT_VERTICAL_TAIL">
            <location unit="IN">
                <x> 744 </x>
                <y>  98 </y>
                <z> 60 </z>
            </location>
            <static_friction> 1.2 </static_friction>
            <dynamic_friction> 1.212 </dynamic_friction>
            <rolling_friction> 1.413 </rolling_friction>
            <spring_coeff unit="LBS/FT"> 41300 </spring_coeff>
            <damping_coeff unit="LBS/FT/SEC"> 8600 </damping_coeff>
        </contact>
        <!-- 12 -->
        <contact type="STRUCTURE" name="REAR_BODY_LEFT">
            <location unit="IN">
                <x> 713 </x>
                <y> -58 </y>
                <z> -40 </z>
            </location>
            <static_friction> 1.2 </static_friction>
            <dynamic_friction> 1.212 </dynamic_friction>
            <rolling_friction> 1.413 </rolling_friction>
            <spring_coeff unit="LBS/FT"> 41300 </spring_coeff>
            <damping_coeff unit="LBS/FT/SEC"> 8600 </damping_coeff>
        </contact>

        <!--  13 -->
        <contact type="STRUCTURE" name="REAR_BODY_RIGHT">
            <location unit="IN">
                <x> 713 </x>
                <y>  58 </y>
                <z> -40 </z>
            </location>
            <static_friction> 1.2 </static_friction>
            <dynamic_friction> 1.212 </dynamic_friction>
            <rolling_friction> 1.413 </rolling_friction>
            <spring_coeff unit="LBS/FT"> 41300 </spring_coeff>
            <damping_coeff unit="LBS/FT/SEC"> 8600 </damping_coeff>
        </contact>
<!-- 14 -->
        <contact type="STRUCTURE" name="NOSE_CONE">
            <location unit="IN">
                <x>  0 </x>
                <y>  0 </y>
                <z>  -15 </z>
            </location>
            <static_friction> 1.2 </static_friction>
            <dynamic_friction> 1.212 </dynamic_friction>
            <rolling_friction> 1.413 </rolling_friction>
            <spring_coeff unit="LBS/FT"> 10000 </spring_coeff>
            <damping_coeff unit="LBS/FT/SEC"> 2000 </damping_coeff>
        </contact>
    </ground_reactions>
<!--<strut_force>
    <function>
        <sum>
            <product>
                <value>-1</value>
                <property>inertia/weight-lbs</property>
                <property> contact/unit[5]/compression-ft </property>
            </product>
        </sum>
    </function>
    <ifthen>
        <ge>
            <property> contact/unit[5]/compression-velocity-fps </property>
            <value> 0.0 </value>
        </ge>
        <product>
            <value> -24000. </value>
            <property> contact/unit[5]/compression-velocity-fps </property>
        </product>
        <product>
            <value> 0. </value>
            <property> contact/unit[5]/compression-velocity-fps </property>
        </product>
    </ifthen>
    <clipto>
        <min>-inertia/weight-lbs</min>
        <max>inertia/weight-lbs</max>
    </clipto>
</strut_force>-->
    <propulsion>
        <engine file="F110-GE-400">
            <location unit="IN">
                <x> 652.75591 </x>
                <y> -58.26772 </y>
                <z> -7.66</z>
            </location>
            <orient unit="DEG">
                <roll> 0 </roll>
                <pitch> 0 </pitch>
                <yaw> 0 </yaw>
            </orient>
            <feed>1</feed>
            <feed>2</feed>
            <feed>3</feed>
            <feed>6</feed>
            <feed>8</feed>
            <feed>10</feed>
            <thruster file="direct">
                <location unit="IN">
                <x> 652.75591 </x>
                <y> -58.26772 </y>
                <z> -7.66</z>
                </location>
                <orient unit="DEG">
                    <roll> 0 </roll>
                    <pitch> 0 </pitch>
                    <yaw> 0 </yaw>
                </orient>
            </thruster>
        </engine>
        <engine file="F110-GE-400">
            <location unit="IN">
                <x> 652.75591 </x>
                <y> 58.26772 </y>
                <z> -7.66</z>
            </location>
            <orient unit="DEG">
                <roll> 0 </roll>
                <pitch> 0 </pitch>
                <yaw> 0 </yaw>
            </orient>
            <feed>0</feed>
            <feed>4</feed>
            <feed>5</feed>
            <feed>7</feed>
            <feed>9</feed>
            <feed>11</feed>

            <thruster file="direct">
                <location unit="IN">
                <x> 652.75591 </x>
                <y> 58.26772 </y>
                <z> -7.66</z>
                </location>
                <orient unit="DEG">
                    <roll> 0 </roll>
                    <pitch> 0 </pitch>
                    <yaw> 0 </yaw>
                </orient>
            </thruster>
        </engine>
        <!-- Fuel tank positions are hard to determine - so the values here are based on Figure 8-2 F14AAD-1
             for the fore / aft tanks - with the other tanks moved from my original estimated position
             so that the CG remains in the range of no more than 18%.
             I also had to move the MLG forwards slightly from the diagram otherwise it was impossible to take off a
             fully laden aircraft with flaps until over 210kts (which has to be wrong and as the contact point of the
             gear isn't defined (in AFWAL-TR-80-3141) and I can only assume that those measurements are from the end of the
             radome excluding the probe. (about 20 inches according to my diagram)
        -->
        <!--  FWD Fuselage -->
        <tank type="FUEL">
            <location unit="IN">
                <x>382</x>
                <y>0</y>
                <z>-51.77165354</z>
            </location>
            <priority>4</priority>
            <capacity unit="LBS">4700</capacity>
            <contents unit="LBS">4700</contents>
        </tank>
        <!-- AFT Fuselage -->
        <tank type="FUEL">
            <location unit="IN">
                <x>592</x>
                <y>0</y>
                <z>-47.83464567</z>
            </location>
            <capacity unit="LBS">4400</capacity>
            <contents unit="LBS">4400</contents>
            <priority>4</priority>
        </tank>
        <!-- Left Beam Box - Feed Group   -->
        <tank type="FUEL">
            <location unit="IN">
                <x>396</x>
                <y>-47.95275591</y>
                <z>-45.07874016</z>
            </location>
            <capacity unit="LBS">1300</capacity>
            <contents unit="LBS">1300</contents>
            <priority>3</priority>
        </tank>
        <!--  Left Sump - Feed Group    -->
        <tank type="FUEL">
            <location unit="IN">
                <x>396</x>
                <y>-38.58267717</y>
                <z>-47.83464567</z>
            </location>
            <capacity unit="LBS">300</capacity>
            <contents unit="LBS">300</contents>
            <priority>5</priority>
        </tank>
        <!-- Right Beam Box - Feed Group    -->
        <tank type="FUEL">
            <location unit="IN">
                <x>396</x>
                <y>47.95275591</y>
                <z>-45.07874016</z>
            </location>
            <capacity unit="LBS">1300</capacity>
            <contents unit="LBS">1300</contents>
            <priority>3</priority>
        </tank>
        <!-- Right Sump - Feed Group   -->
        <tank type="FUEL">
            <location unit="IN">
                <x>396</x>
                <y>38.58267717</y>
                <z>-47.83464567</z>
            </location>
            <capacity unit="LBS">300</capacity>
            <contents unit="LBS">300</contents>
            <priority>5</priority>
        </tank>
        <!-- Left wing    -->
        <tank type="FUEL">
            <location unit="IN">
                <x> 462</x>
                <y> -38.5826772</y>
                <z> -27</z>
            </location>
            <capacity unit="LBS">2000</capacity>
            <contents unit="LBS">2000</contents>
            <priority>2</priority>
        </tank>
        <!-- Right Wing -->
        <tank type="FUEL">
            <location unit="IN">
                <x> 462</x>
                <y> 38.5826772</y>
                <z> -27</z>
            </location>
            <capacity unit="LBS">2000</capacity>
            <contents unit="LBS">2000</contents>
            <priority>2</priority>
        </tank>
        <!-- Left External -->
        <tank type="FUEL">
            <location unit="IN">
                <x>403</x>
                <y>-55.51181102</y>
                <z>-110.8267717</z>
            </location>
            <capacity unit="LBS">1600</capacity>
            <contents unit="LBS">1600</contents>
            <priority>1</priority>
        </tank>
        <!-- Right External -->
        <tank type="FUEL">
            <location unit="IN">
                <x>403</x>
                <y>55.51181102</y>
                <z>-110.8267717</z>
            </location>
            <capacity unit="LBS">1600</capacity>
            <contents unit="LBS">1600</contents>
            <priority>1</priority>
        </tank>
        <!-- Left Feed line -->
        <tank type="FUEL">
            <location unit="IN">
                <x>454</x>
                <y>-38.58267717</y>
                <z>-47.83464567</z>
            </location>
            <capacity unit="LBS">10</capacity>
            <contents unit="LBS">10</contents>
            <priority>6</priority>
        </tank>
        <!-- Right Feed line -->
        <tank type="FUEL">
            <location unit="IN">
                <x>454</x>
                <y>38.58267717</y>
                <z>-47.83464567</z>
            </location>
            <capacity unit="LBS">10</capacity>
            <contents unit="LBS">10</contents>
            <priority>6</priority>
        </tank>
    </propulsion>


    <flight_control name="FCS F14" file="Systems/f-14-fcs.xml"/>

    <!--The roll(L) and yaw(N) moments are due to aerodynamics only, while
   the pitch(Z), includes a thrust term. These are given by.
   L = dynamic pressure * Wing Area * Reference Span * CL
   M = dynamic pressure * Wing Area * chord * CM + ZjT
   N = dynamic pressure * Wing Area * Reference Span * CN
   -->
    <aerodynamics>

        <function name="fcs/wing-sweep-cadc-dmd">
            <description>Wing autosweep</description>
            <!-- based on what I can figure out from NAVAIR 01-F14AAD-1 Figure 2-48: p. 2-87
                 using a 2d lookup table so we have no sweep when flaps are out
             -->
                <table>
                    <independentVar lookup="row">velocities/mach</independentVar>
                    <independentVar lookup="column">fcs/flap-pos-deg</independentVar>
                    <tableData>
                                       0            5           50
                      0.000  0.294117647  0.294117647  0.294117647
                      0.448  0.294117647  0.294117647  0.294117647
                      0.650  0.294117647  0.294117647  0.294117647
                      0.711  0.308823529  0.294117647  0.294117647
                      0.913  1.000000000  0.735294117  0.735294117
                    </tableData>
                </table>
        </function>


        <function name="aero/coefficients/Cmach">
            <!--    <description>Mach factor (all except drag) (NASA-TM-84643 Figure 3)</description> -->
            <description>Mach factor (all except drag) (NASA-TM-84643 Figure 3 Clalpha) and values for AOA derived from NASA-aaia-2000-0900 Figure 4</description>
                <table>
                    <independentVar lookup="row">aero/alpha-deg</independentVar>
                    <independentVar lookup="column">velocities/mach</independentVar>
                    <tableData>
                                   0.0         0.2         0.6         0.9         1.1         1.3         1.5         1.8         2.1         2.6         3.0
                       -20  1.00000000  1.00000000  0.96610485  1.23950808  1.41632259  1.34327421  1.13294356  0.93062904  0.76851372  0.58968226  0.51614275
                       -15  1.00000000  1.00000000  0.96116198  1.23316641  1.40907629  1.33640164  1.12714710  0.92586768  0.76458179  0.58666528  0.51350202
                       -10  1.00000000  1.00000000  0.99142346  1.27199174  1.45344001  1.37847726  1.16263449  0.95501794  0.78865408  0.60513601  0.52966925
                        -5  1.00000000  1.00000000  0.96759116  1.24141501  1.41850155  1.34534078  1.13468655  0.93206078  0.76969605  0.59058947  0.51693681
                         4  1.00000000  1.00000000  0.95837601  1.22959201  1.40499202  1.33252801  1.12388001  0.92318401  0.76236561  0.58496481  0.51201361
                         8  1.00000000  1.00000000  0.99142346  1.27199174  1.45344001  1.37847726  1.16263449  0.95501794  0.78865408  0.60513601  0.52966925
                        12  1.00000000  1.00000000  0.96759116  1.24141501  1.41850155  1.34534078  1.13468655  0.93206078  0.76969605  0.59058947  0.51693681
                        16  1.00000000  1.00000000  0.98015728  1.25753729  1.43692365  1.36281274  1.14942274  0.94416546  0.77969210  0.59825946  0.52365028
                        20  1.00000000  1.00000000  0.96074823  1.23263556  1.40846972  1.33582635  1.12666189  0.92546912  0.76425265  0.58641274  0.51328097
                        24  1.00000000  1.00000000  0.96503140  1.23813085  1.41474891  1.34178168  1.13168474  0.92959501  0.76765981  0.58902706  0.51556926
                        28  1.00000000  1.00000000  0.96044147  1.23224199  1.40802001  1.33539984  1.12630217  0.92517363  0.76400864  0.58622551  0.51311708
                        32  1.00000000  1.00000000  0.96642959  1.23992472  1.41679867  1.34372573  1.13332438  0.93094186  0.76877204  0.58988048  0.51631624
                        40  1.00000000  1.00000000  0.95223257  1.22171001  1.39598566  1.32398617  1.11667565  0.91726616  0.75747865  0.58121503  0.50873147
                        45  1.00000000  1.00000000  0.95617790  1.22677185  1.40176956  1.32947176  1.12130231  0.92106662  0.76061706  0.58362314  0.51083926
                        50  1.00000000  1.00000000  0.95837601  1.22959201  1.40499202  1.33252801  1.12388001  0.92318401  0.76236561  0.58496481  0.51201361
                    </tableData>
                </table>
        </function>
        <function name="aero/coefficients/CdTNK">
            <description>Incremental Cd due to external tanks</description>
            <product>
                <property>fcs/external-tanks-fitted</property>
                <table>
                    <independentVar lookup="row">velocities/mach</independentVar>
                    <tableData>
                        0.40  0.0005
                        0.60  0.0005
                        0.70  0.0005
                        0.80  0.0005
                        0.85  0.0011
                        0.90  0.0065
                        0.94  0.0074
                        0.98  0.0077
                        1.00  0.0078
                        1.10  0.0079
                        1.20  0.0080
                        2.00  0.0081
                    </tableData>
                </table>
            </product>
        </function>

        <function name="aero/coefficients/ClSweepFactor">
            <description>Wing sweep factor from norm of 22 (NASA-TM-D-6909)</description>
                <table>
                    <independentVar lookup="row">aero/alpha-deg</independentVar>
                    <independentVar lookup="column">fcs/wing-sweep-pos-deg</independentVar>
                    <tableData>
                                   0        22        50        58
                         0  1.000000  1.000000  0.791274  0.653661
                        10  1.000000  1.000000  0.829267  0.700928
                        15  1.000000  1.000000  0.953910  0.860083
                        20  1.000000  1.000000  0.960603  0.910701
                        25  1.000000  1.000000  0.958058  0.969330
                        30  1.000000  1.000000  1.027476  0.955345
                        35  1.000000  1.000000  1.088021  0.994762
                        40  1.000000  1.000000  1.083636  1.049773
                        45  1.000000  1.000000  1.066517  1.066517
                        50  1.000000  1.000000  0.910848  0.936149
                        55  1.000000  1.000000  0.921275  0.914270
                    </tableData>
                </table>
        </function>
        <function name="aero/coefficients/ClBAS">
            <description>Cl BASIC AFWAL-TR-80-3141 PartIII - Figure 36 </description>
                <table>
                    <independentVar lookup="row">aero/alpha-deg</independentVar>
                    <independentVar lookup="column">aero/beta-deg</independentVar>
                    <tableData>
                                  -20        -15        -10         -5          0          5         10         15         20
                       -55 -1.3463540 -1.3852470 -1.3945640 -1.4176920 -1.4273690 -1.4176920 -1.3945640 -1.3852470 -1.3463540
                       -50 -1.4760110 -1.4999080 -1.5213490 -1.5467930 -1.5809450 -1.5467930 -1.5213190 -1.4999080 -1.4760110
                       -45 -1.5671970 -1.6102240 -1.6171880 -1.6520130 -1.6689840 -1.6520130 -1.6171880 -1.6102240 -1.5671970
                       -40 -1.6664090 -1.6917280 -1.7122880 -1.7481220 -1.7718120 -1.7481220 -1.7122880 -1.6917280 -1.6664090
                       -35 -1.7330310 -1.7703260 -1.8407520 -1.8705200 -1.9301090 -1.8705200 -1.8407520 -1.7703260 -1.7330310
                       -30 -1.7201080 -1.7904460 -1.8528920 -1.8981360 -1.9270530 -1.8981360 -1.8528920 -1.7904460 -1.7201080
                       -25 -1.6404500 -1.6989470 -1.7400030 -1.7662890 -1.7744220 -1.7662890 -1.7400030 -1.6989470 -1.6404500
                       -20 -1.4394210 -1.5154020 -1.5632960 -1.5696730 -1.6031600 -1.5696730 -1.5632960 -1.5154020 -1.4394210
                       -15 -1.2135860 -1.2448890 -1.2844040 -1.2762190 -1.2789460 -1.2762190 -1.2844040 -1.2448890 -1.2135860
                       -10 -0.9215569 -0.9808749 -1.0017560 -1.0194540 -1.0129430 -1.0194540 -1.0017560 -0.9808749 -0.9215569
                        -5 -0.5286301 -0.5746194 -0.6024052 -0.6185578 -0.5813407 -0.6185578 -0.6024052 -0.5746194 -0.5286301
                         0  0.0614500  0.1470500  0.1098500  0.1455500  0.0776000  0.1455500  0.1098500  0.1470500  0.0614500
                         5  0.5286301  0.5746194  0.6024052  0.6185578  0.5813407  0.6185578  0.6024052  0.5746194  0.5286301
                        10  0.9215569  0.9808749  1.0017560  1.0194540  1.0129430  1.0194540  1.0017560  0.9808749  0.9215569
                        15  1.2135860  1.2448890  1.2844040  1.2762190  1.2789460  1.2762190  1.2844040  1.2448890  1.2135860
                        20  1.4394210  1.5154020  1.5632960  1.5696730  1.6031600  1.5696730  1.5632960  1.5154020  1.4394210
                        25  1.6404500  1.6989470  1.7400030  1.7662890  1.7744220  1.7662890  1.7400030  1.6989470  1.6404500
                        30  1.7201080  1.7904460  1.8528920  1.8981360  1.9270530  1.8981360  1.8528920  1.7904460  1.7201080
                        35  1.7330310  1.7703260  1.8407520  1.8705200  1.9301090  1.8705200  1.8407520  1.7703260  1.7330310
                        40  1.6664090  1.6917280  1.7122880  1.7481220  1.7718120  1.7481220  1.7122880  1.6917280  1.6664090
                        45  1.5671970  1.6102240  1.6171880  1.6520130  1.6689840  1.6520130  1.6171880  1.6102240  1.5671970
                        50  1.4760110  1.4999080  1.5213490  1.5467930  1.5809450  1.5467930  1.5213190  1.4999080  1.4760110
                        55  1.3463540  1.3852470  1.3945640  1.4176920  1.4273690  1.4176920  1.3945640  1.3852470  1.3463540
                    </tableData>
                </table>
        </function>

        <function name="aero/coefficients/CldAuxFlaps">
            <description>LIFT INCREMENT DUE TO AUX FLAPS</description>
                  <table>
                    <independentVar lookup="row">aero/alpha-deg</independentVar>
                    <independentVar lookup="column">fcs/aux-flap-pos-deg</independentVar>
                    <tableData>
                                          0           20           35
                             -5    0.000000    0.104836    0.183464
                             -3    0.000000    0.099545    0.174203
                             -1    0.000000    0.094253    0.164943
                              1    0.000000    0.091280    0.159740
                              3    0.000000    0.091205    0.159609
                              5    0.000000    0.089673    0.156928
                              7    0.000000    0.087377    0.152910
                              9    0.000000    0.085215    0.149126
                             11    0.000000    0.087796    0.153643
                             13    0.000000    0.094550    0.165463
                             15    0.000000    0.110560    0.193481
                             17    0.000000    0.119595    0.209291
                             19    0.000000    0.124878    0.218536
                             21    0.000000    0.121385    0.212423
                             23    0.000000    0.118945    0.208153
                             25    0.000000    0.117241    0.205172
                             27    0.000000    0.111122    0.194463
                             29    0.000000    0.103004    0.180257
                    </tableData>
                  </table>
            </function>

            <function name="aero/coefficients/CldMainFlaps">
            <description>LIFT INCREMENT DUE TO MAIN FLAPS</description>
                  <table>
                    <independentVar lookup="row">aero/alpha-deg</independentVar>
                    <independentVar lookup="column">fcs/flap-pos-deg</independentVar>
                    <tableData>
                                          0           20           35
                             -5    0.000000    0.244618    0.428082
                             -3    0.000000    0.232271    0.406475
                             -1    0.000000    0.219924    0.384867
                              1    0.000000    0.212987    0.372728
                              3    0.000000    0.212812    0.372421
                              5    0.000000    0.209237    0.366166
                              7    0.000000    0.203880    0.356789
                              9    0.000000    0.198835    0.347961
                             11    0.000000    0.204858    0.358501
                             13    0.000000    0.220618    0.386081
                             15    0.000000    0.257974    0.451455
                             17    0.000000    0.279055    0.488346
                             19    0.000000    0.291381    0.509917
                             21    0.000000    0.283231    0.495654
                             23    0.000000    0.277538    0.485691
                             25    0.000000    0.273562    0.478734
                             27    0.000000    0.259284    0.453747
                             29    0.000000    0.240343    0.420600
                    </tableData>
                  </table>
            </function>

            <function name="aero/coefficients/CldSlats">
            <description>LIFT INCREMENT DUE TO SLATS</description>
                  <table>
                    <independentVar lookup="row">aero/alpha-deg</independentVar>
                    <independentVar lookup="column">fcs/slat-pos-deg</independentVar>
                    <tableData>
                                          0            8           17
                             -5    0.000000    0.071947    0.152887
                             -3    0.000000    0.068315    0.145170
                             -1    0.000000    0.064684    0.137453
                              1    0.000000    0.062643    0.133117
                              3    0.000000    0.062592    0.133007
                              5    0.000000    0.061540    0.130773
                              7    0.000000    0.059965    0.127425
                              9    0.000000    0.058481    0.124272
                             11    0.000000    0.060252    0.128036
                             13    0.000000    0.064888    0.137886
                             15    0.000000    0.075875    0.161234
                             17    0.000000    0.082075    0.174409
                             19    0.000000    0.085700    0.182113
                             21    0.000000    0.083303    0.177019
                             23    0.000000    0.081629    0.173461
                             25    0.000000    0.080460    0.170977
                             27    0.000000    0.076260    0.162053
                             29    0.000000    0.070689    0.150214
                    </tableData>
                  </table>
            </function>

            <function name="aero/coefficients/CldSpoilersLeftInner">
                <description>LIFT INCREMENT DUE TO LEFT INNER SPOILERS  (NASA TM-X-62306 Test 2 Run 5,10)</description>
                <product>
                      <property>fcs/spoiler-left-inner-pos-deg</property>
                      <table>
                        <independentVar lookup="row">aero/alpha-deg</independentVar>
                        <tableData>
                                 -5     -0.003938
                                 -3     -0.004291
                                 -1     -0.004644
                                  1     -0.004927
                                  3     -0.005025
                                  5     -0.005030
                                  7     -0.004889
                                  9     -0.004832
                                 11     -0.004918
                                 13     -0.004565
                                 15     -0.004191
                                 17     -0.003584
                                 19     -0.002790
                                 21     -0.002327
                                 23     -0.002970
                                 25     -0.002134
                                 27     -0.001149
                                 29     -0.000315
                        </tableData>
                      </table>
                   </product>
                </function>

                <function name="aero/coefficients/CldSpoilersLeftOuter">
                <description>LIFT INCREMENT DUE TO LEFT OUTER SPOILERS  (NASA TM-X-62306 Test 2 Run 5,10)</description>
                <product>
                      <property>fcs/spoiler-left-outer-pos-deg</property>
                      <table>
                        <independentVar lookup="row">aero/alpha-deg</independentVar>
                        <tableData>
                                 -5     -0.003938
                                 -3     -0.004291
                                 -1     -0.004644
                                  1     -0.004927
                                  3     -0.005025
                                  5     -0.005030
                                  7     -0.004889
                                  9     -0.004832
                                 11     -0.004918
                                 13     -0.004565
                                 15     -0.004191
                                 17     -0.003584
                                 19     -0.002790
                                 21     -0.002327
                                 23     -0.002970
                                 25     -0.002134
                                 27     -0.001149
                                 29     -0.000315
                        </tableData>
                      </table>
                   </product>
                </function>

                <function name="aero/coefficients/CldSpoilersRightInner">
                <description>LIFT INCREMENT DUE TO RIGHT INNER SPOILERS  (NASA TM-X-62306 Test 2 Run 5,10)</description>
                <product>
                      <property>fcs/spoiler-right-inner-pos-deg</property>
                      <table>
                        <independentVar lookup="row">aero/alpha-deg</independentVar>
                        <tableData>
                                 -5     -0.003938
                                 -3     -0.004291
                                 -1     -0.004644
                                  1     -0.004927
                                  3     -0.005025
                                  5     -0.005030
                                  7     -0.004889
                                  9     -0.004832
                                 11     -0.004918
                                 13     -0.004565
                                 15     -0.004191
                                 17     -0.003584
                                 19     -0.002790
                                 21     -0.002327
                                 23     -0.002970
                                 25     -0.002134
                                 27     -0.001149
                                 29     -0.000315
                        </tableData>
                      </table>
                   </product>
                </function>

                <function name="aero/coefficients/CldSpoilersRightOuter">
                <description>LIFT INCREMENT DUE TO RIGHT OUTER SPOILERS  (NASA TM-X-62306 Test 2 Run 5,10)</description>
                <product>
                      <property>fcs/spoiler-right-outer-pos-deg</property>
                      <table>
                        <independentVar lookup="row">aero/alpha-deg</independentVar>
                        <tableData>
                                 -5     -0.003938
                                 -3     -0.004291
                                 -1     -0.004644
                                  1     -0.004927
                                  3     -0.005025
                                  5     -0.005030
                                  7     -0.004889
                                  9     -0.004832
                                 11     -0.004918
                                 13     -0.004565
                                 15     -0.004191
                                 17     -0.003584
                                 19     -0.002790
                                 21     -0.002327
                                 23     -0.002970
                                 25     -0.002134
                                 27     -0.001149
                                 29     -0.000315
                        </tableData>
                      </table>
                   </product>
                </function>


        <function name="aero/coefficients/ClDasym">
            <description>Delta Cl due to wing asymmetry</description>
            <product>
                <property>systems/flyt/wing-asymmetry</property> <!-- sqr to remove the sign (value either -1, 0 or 1 -->
                <property>systems/flyt/wing-asymmetry</property>
                <property>aero/coefficients/ClBAS</property>
                <value>-0.3</value>
            </product>
        </function>

        <function name="aero/coefficients/CldLandingGear">
            <description>LIFT INCREMENT DUE TO LANDING GEAR (NASA TM-X-62306 Test 4 Run 9, Run 10)</description>
            <product>
                <property>gear/gear-pos-norm</property>
                <table>
                    <independentVar lookup="row">aero/alpha-deg</independentVar>
                    <tableData>
                             -5     -0.024846
                             -3     -0.016396
                             -1     -0.007945
                              1      0.001158
                              3      0.008777
                              5     -0.010894
                              7     -0.014578
                              9      0.001478
                             11     -0.006986
                             13     -0.014324
                             15     -0.034631
                             17     -0.020303
                             19     -0.030354
                             21     -0.028310
                             23     -0.029453
                             25     -0.030599
                             27      0.000154
                             29      0.000627
                    </tableData>
                </table>
            </product>
        </function>

        <function name="aero/coefficients/ClDS1">
            <description>ClDS1 AFWAL-TR-80-3141 PartIII - Figure 38</description>
            <product>
                <property>aero/cadc-control-effectivity-factor</property>
                <table>
                    <independentVar lookup="row">aero/alpha-deg</independentVar>
                    <tableData>
                       -65  0.0065
                       -55  0.0065
                       -50  0.0070
                       -45  0.0060
                       -40  0.0045
                       -35  0.0115
                       -30  0.0130
                       -25  0.0145
                       -20  0.0165
                       -15  0.0150
                       -10  0.0135
                        -5  0.0125
                         0  0.0165
                         5  0.0125
                        10  0.0135
                        15  0.0150
                        20  0.0165
                        25  0.0145
                        30  0.0130
                        35  0.0115
                        40  0.0045
                        45  0.0060
                        50  0.0070
                        55  0.0065
                    </tableData>
                </table>
            </product>
        </function>

        <function name="aero/coefficients/ClDS2">
            <description>ClDS2 AFWAL-TR-80-3141 PartIII - Figure 39</description>
            <product>
                <property>aero/cadc-control-effectivity-factor</property>
                <table>
                    <independentVar lookup="row">aero/alpha-deg</independentVar>
                    <tableData>
                       -60 -0.0055
                       -55 -0.0055
                       -50 -0.0080
                       -45 -0.0110
                       -40 -0.0120
                       -30  0.0125
                       -10 -0.0115
                        -5 -0.0035
                         0  0.0065
                         5  0.0095
                        10  0.0115
                        15  0.0125
                        20  0.0120
                        25  0.0125
                        30  0.0125
                        35  0.0135
                        40  0.0120
                        45  0.0110
                        50  0.0080
                        55  0.0055
                    </tableData>
                </table>
            </product>
        </function>

        <function name="aero/coefficients/DClDS1">
            <description>DClDS1</description>
            <product>
                <property>fcs/stabilizer-1p-factor</property>
                <property>aero/coefficients/ClDS1</property>
                <property>fcs/elevator-pos-deg</property>
            </product>
        </function>

        <function name="aero/coefficients/DClDS2">
            <description>DClDS2</description>
            <product>
                <property>fcs/stabilizer-2p-factor</property>
                <sum>
                    <product>
                        <value>-10</value>
                        <property>aero/coefficients/ClDS1</property>
                    </product>
                    <product>
                        <sum>
                            <value>10</value>
                            <property>fcs/elevator-pos-deg</property>
                        </sum>
                        <property>aero/coefficients/ClDS2</property>
                    </product>
                </sum>
            </product>
        </function>

        <function name="aero/coefficients/CldSpeedbrake">
            <description>LIFT INCREMENT DUE TO SPEEDBRAKE (NASA TM-X-62306 Test [15,18] [28,32])</description>
            <product>
                <property>fcs/speedbrake-pos-deg</property>
                <table>
                    <independentVar lookup="row">aero/alpha-deg</independentVar>
                    <tableData>
                            -15      0.002016
                            -10      0.001226
                             -5      0.000436
                              0     -0.000355
                              5     -0.001241
                             10     -0.001424
                             15     -0.000445
                             20     -0.000892
                             25      0.000842
                             30     -0.000935
                             35     -0.003989
                             40     -0.007043
                             45     -0.010097
                             50     -0.013151
                             55     -0.016205
                    </tableData>
                </table>
            </product>
        </function>

        <function name="aero/coefficients/Cl">
            <sum>
                <property>aero/coefficients/ClBAS</property>

                <property>aero/coefficients/CldAuxFlaps</property>
                <property>aero/coefficients/CldMainFlaps</property>
                <property>aero/coefficients/CldSlats</property>

                <property>aero/coefficients/CldSpoilersLeftInner</property>
                <property>aero/coefficients/CldSpoilersLeftOuter</property>
                <property>aero/coefficients/CldSpoilersRightInner</property>
                <property>aero/coefficients/CldSpoilersRightOuter</property>
                <property>aero/coefficients/CldLandingGear</property>
                <property>aero/coefficients/ClDasym</property>
                <property>aero/coefficients/CldSpeedbrake</property>
            </sum>
        </function>

        <function name="aero/coefficients/CddLandingGear">
            <description>DRAG INCREMENT DUE LANDING GEAR (NASA TM-X-62306 Test 4 Run 9, Run 10)</description>
            <product>
                <property>gear/gear-pos-norm</property>
                <table>
                    <independentVar lookup="row">aero/alpha-deg</independentVar>
                    <tableData>
                             -5      0.021200
                             -3      0.021200
                             -1      0.021200
                              1      0.021182
                              3      0.020718
                              5      0.017841
                              7      0.015770
                              9      0.015320
                             11      0.015118
                             13      0.012160
                             15      0.009332
                             17      0.010239
                             19      0.007700
                             21      0.005274
                             23      0.004325
                             25     -0.002253
                             27     -0.005119
                             29      0.001078
                    </tableData>
                </table>
            </product>
        </function>

        <function name="aero/coefficients/CddSpeedbrake">
            <description>DRAG INCREMENT DUE SPEEDBRAKE (NASA TM-X-62306 Test [15,18] [28,32])</description>
            <product>
                  <property>fcs/speedbrake-pos-deg</property>
                  <table>
                    <independentVar lookup="row">aero/alpha-deg</independentVar>
                    <tableData>
                            -15      0.001108
                            -10      0.001069
                             -5      0.001030
                              0      0.000990
                              5      0.000858
                             10      0.000732
                             15      0.000797
                             20      0.000845
                             25      0.001012
                             30      0.001000
                             35      0.001160
                             40      0.001319
                             45      0.001479
                             50      0.001638
                             55      0.001798
                    </tableData>
                  </table>
               </product>
            </function>


        <function name="aero/coefficients/CdMach">
            <description>DRAG DUE TO MACH AND WINGSWEEP</description>
            <product>
                <property>tuning/CMBRK</property>
            <table>
                <independentVar lookup="row">velocities/mach</independentVar>
                <independentVar lookup="column">aero/alpha-deg</independentVar>
                <independentVar lookup="table">fcs/wing-sweep-pos-deg</independentVar>
                <tableData breakPoint="20">
                            -15      -10        0       10       15
                  0.20  0.00000  0.00000  0.00000  0.00000  0.00000
                  0.40  0.00000  0.00000  0.00000  0.00000  0.00000
                  0.60  0.00000  0.00000  0.00000  0.00000  0.00000
                  0.80  0.03735  0.01165  0.02241  0.03317  0.06043
                  0.90  0.05973  0.01912  0.03583  0.05254  0.08956
                  0.94  0.20353  0.07172  0.10596  0.14020  0.19890
                  1.05  0.60457  0.35993  0.40589  0.45185  0.67596
                  1.10  0.19079  0.12711  0.11777  0.10843  0.18283
                  1.20  0.07924  0.05217  0.05176  0.05135  0.09366
                  1.30  0.06076  0.03646  0.04127  0.04608  0.08509
                  1.80  0.06702  0.03979  0.04541  0.05103  0.09826
                  2.50  0.03947  0.02362  0.02445  0.02527  0.05227
                </tableData>
                <tableData breakPoint="45">
                            -15      -10        0       10       15
                  0.20  0.00000  0.00000  0.00000  0.00000  0.00000
                  0.40  0.00000  0.00000  0.00000  0.00000  0.00000
                  0.60  0.00000  0.00000  0.00000  0.00000  0.00000
                  0.80  0.02311  0.00726  0.01253  0.01780  0.02817
                  0.90  0.03336  0.01108  0.01758  0.02407  0.03842
                  0.94  0.10884  0.04090  0.04437  0.04784  0.06215
                  1.05  0.40537  0.22989  0.28925  0.34862  0.63077
                  1.10  0.14576  0.08522  0.09692  0.10862  0.18324
                  1.20  0.13373  0.07642  0.08539  0.09435  0.16593
                  1.30  0.11643  0.06993  0.08400  0.09808  0.18076
                  1.80  0.11305  0.05998  0.07194  0.08391  0.15928
                  2.50  0.06231  0.03497  0.03878  0.04259  0.08769
                </tableData>
                <tableData breakPoint="68">
                            -15      -10        0       10       15
                  0.20  0.00000  0.00000  0.00000  0.00000  0.00000
                  0.40  0.00000  0.00000  0.00000  0.00000  0.00000
                  0.60  0.00000  0.00000  0.00000  0.00000  0.00000
                  0.80  0.01616  0.00530  0.00965  0.01399  0.02681
                  0.90  0.02450  0.00857  0.01473  0.02089  0.03790
                  0.94  0.08469  0.03295  0.04492  0.05689  0.08850
                  1.05  0.15133  0.10011  0.11320  0.12629  0.30554
                  1.10  0.05603  0.04325  0.04570  0.04815  0.08968
                  1.20  0.05455  0.04190  0.04431  0.04673  0.08138
                  1.30  0.04105  0.02814  0.03216  0.03618  0.08293
                  1.80  0.05272  0.03414  0.03953  0.04491  0.09641
                  2.50  0.03955  0.02780  0.03018  0.03257  0.06680
                </tableData>

            </table>
        </product>
    </function>
        <function name="aero/coefficients/CdBAS">
            <description>CdBAS</description>
                <table>
                    <independentVar lookup="row">aero/alpha-deg</independentVar>
                    <independentVar lookup="column">aero/beta-deg</independentVar>
                    <tableData>
                                   -20         -15         -10          -5           0           5          10          15          20
                       -55  1.90570600  1.96386700  1.98249100  2.02153600  2.03465900  2.02153600  1.98249100  1.96386700  1.90570600
                       -50  1.74877400  1.78230900  1.81470600  1.84961900  1.89047500  1.84961900  1.81470600  1.78230900  1.74877400
                       -45  1.56330700  1.61255700  1.62553300  1.66403500  1.68355100  1.66403500  1.62553300  1.61255700  1.56330700
                       -40  1.39821700  1.42475000  1.44800800  1.48316600  1.50487200  1.48316600  1.44800800  1.42475000  1.39821700
                       -35  1.21140600  1.24374700  1.29458600  1.32128900  1.36258600  1.32128900  1.29458600  1.24374700  1.21140600
                       -30  0.98698510  1.03105800  1.06849700  1.09583100  1.11304600  1.09583100  1.06849700  1.03105800  0.98698510
                       -25  0.75231020  0.78257730  0.80420480  0.81740020  0.82113730  0.81740020  0.80420480  0.78257730  0.75221020
                       -20  0.51235980  0.54320750  0.56292740  0.56514200  0.57722390  0.56514200  0.56292740  0.54320750  0.51235980
                       -15  0.31166910  0.32756250  0.34487960  0.34548170  0.34631600  0.34548170  0.34487960  0.32756250  0.31166910
                       -10  0.14076520  0.15650480  0.16247150  0.16777520  0.16784560  0.16777520  0.16247150  0.15650480  0.14076520
                        -5  0.04338830  0.04781330  0.05320550  0.05617460  0.05818860  0.05617460  0.05320350  0.04781330  0.04338830
                         0  0.01700000  0.01705000  0.02160000  0.02295000  0.02520000  0.02295000  0.02160000  0.01705000  0.01700000
                         5  0.04338825  0.04781333  0.05320554  0.05617464  0.05818861  0.05617464  0.05320354  0.04781333  0.04338825
                        10  0.14076520  0.15650480  0.16247150  0.16777520  0.16784560  0.16777520  0.16247150  0.15650480  0.14076520
                        15  0.31166910  0.32756250  0.34487960  0.34548170  0.34631600  0.34548170  0.34487960  0.32756250  0.31166910
                        20  0.51235980  0.54320750  0.56292740  0.56514200  0.57722390  0.56514200  0.56292740  0.54320750  0.51235980
                        25  0.75231020  0.78257730  0.80420480  0.81740020  0.82113730  0.81740020  0.80420480  0.78257730  0.75221020
                        30  0.98698510  1.03105800  1.06849700  1.09583100  1.11304600  1.09583100  1.06849700  1.03105800  0.98698510
                        35  1.21140600  1.24374700  1.29458600  1.32128900  1.36258600  1.32128900  1.29458600  1.24374700  1.21140600
                        40  1.39821700  1.42475000  1.44800800  1.48316600  1.50487200  1.48316600  1.44800800  1.42475000  1.39821700
                        45  1.56330700  1.61255700  1.62553300  1.66403500  1.68355100  1.66403500  1.62553300  1.61255700  1.56330700
                        50  1.74877400  1.78230900  1.81470600  1.84961900  1.89047500  1.84961900  1.81470600  1.78230900  1.74877400
                        55  1.90570600  1.96386700  1.98249100  2.02153600  2.03465900  2.02153600  1.98249100  1.96386700  1.90570600
                    </tableData>
                </table>
        </function>

        <function name="aero/coefficients/CddAuxFlaps">
            <description>DRAG INCREMENT DUE TO AUX FLAPS</description>
                  <table>
                    <independentVar lookup="row">aero/alpha-deg</independentVar>
                    <independentVar lookup="column">fcs/aux-flap-pos-deg</independentVar>
                    <tableData>
                                          0           20           35
                             -5    0.000000    0.010065    0.017614
                             -3    0.000000    0.011746    0.020556
                             -1    0.000000    0.013427    0.023497
                              1    0.000000    0.014305    0.025034
                              3    0.000000    0.015602    0.027304
                              5    0.000000    0.016928    0.029623
                              7    0.000000    0.018037    0.031565
                              9    0.000000    0.019017    0.033281
                             11    0.000000    0.020122    0.035214
                             13    0.000000    0.019703    0.034480
                             15    0.000000    0.015243    0.026676
                             17    0.000000    0.013511    0.023644
                             19    0.000000    0.011916    0.020852
                             21    0.000000    0.012053    0.021092
                             23    0.000000    0.014083    0.024645
                             25    0.000000    0.016798    0.029396
                             27    0.000000    0.020741    0.036297
                             29    0.000000    0.025189    0.044081
                    </tableData>
                  </table>
            </function>

            <function name="aero/coefficients/CddMainFlaps">
            <description>DRAG INCREMENT DUE TO MAIN FLAPS</description>
                  <table>
                    <independentVar lookup="row">aero/alpha-deg</independentVar>
                    <independentVar lookup="column">fcs/flap-pos-deg</independentVar>
                    <tableData>
                                          0           20           35
                             -5    0.000000    0.023485    0.041099
                             -3    0.000000    0.027407    0.047963
                             -1    0.000000    0.031330    0.054827
                              1    0.000000    0.033378    0.058412
                              3    0.000000    0.036406    0.063710
                              5    0.000000    0.039498    0.069121
                              7    0.000000    0.042087    0.073653
                              9    0.000000    0.044374    0.077655
                             11    0.000000    0.046952    0.082166
                             13    0.000000    0.045974    0.080454
                             15    0.000000    0.035567    0.062243
                             17    0.000000    0.031525    0.055170
                             19    0.000000    0.027803    0.048656
                             21    0.000000    0.028123    0.049216
                             23    0.000000    0.032860    0.057506
                             25    0.000000    0.039194    0.068590
                             27    0.000000    0.048396    0.084694
                             29    0.000000    0.058774    0.102855
                    </tableData>
                  </table>
            </function>

            <function name="aero/coefficients/CddSlats">
            <description>DRAG INCREMENT DUE TO SLATS</description>
                  <table>
                    <independentVar lookup="row">aero/alpha-deg</independentVar>
                    <independentVar lookup="column">fcs/slat-pos-deg</independentVar>
                    <tableData>
                                          0            8           17
                             -5    0.000000    0.006907    0.014678
                             -3    0.000000    0.008061    0.017130
                             -1    0.000000    0.009215    0.019581
                              1    0.000000    0.009817    0.020861
                              3    0.000000    0.010708    0.022754
                              5    0.000000    0.011617    0.024686
                              7    0.000000    0.012379    0.026305
                              9    0.000000    0.013051    0.027734
                             11    0.000000    0.013809    0.029345
                             13    0.000000    0.013522    0.028733
                             15    0.000000    0.010461    0.022230
                             17    0.000000    0.009272    0.019703
                             19    0.000000    0.008177    0.017377
                             21    0.000000    0.008272    0.017577
                             23    0.000000    0.009665    0.020538
                             25    0.000000    0.011528    0.024496
                             27    0.000000    0.014234    0.030248
                             29    0.000000    0.017286    0.036734
                    </tableData>
                  </table>
            </function>


    <function name="aero/coefficients/CddSpoilersLeftInner">
        <description>DRAG INCREMENT DUE TO LEFT INNER SPOILERS F(ALPHA) (NASA TM-X-62306 Test 2 Run 5,10)</description>
        <product>
              <property>fcs/spoiler-left-inner-pos-deg</property>
              <table>
                <independentVar lookup="row">aero/alpha-deg</independentVar>
                <tableData>
                         -5      0.000403
                         -3      0.000323
                         -1      0.000242
                          1      0.000165
                          3      0.000087
                          5      0.000043
                          7     -0.000022
                          9     -0.000080
                         11     -0.000156
                         13      0.000206
                         15     -0.000229
                         17     -0.000323
                         19     -0.000332
                         21     -0.000424
                         23     -0.000500
                         25     -0.000579
                         27     -0.000479
                         29     -0.000316
                </tableData>
              </table>
           </product>
        </function>

        <function name="aero/coefficients/CddSpoilersLeftOuter">
        <description>DRAG INCREMENT DUE TO LEFT OUTER SPOILERS F(ALPHA) (NASA TM-X-62306 Test 2 Run 5,10)</description>
        <product>
              <property>fcs/spoiler-left-outer-pos-deg</property>
              <table>
                <independentVar lookup="row">aero/alpha-deg</independentVar>
                <tableData>
                         -5      0.000403
                         -3      0.000323
                         -1      0.000242
                          1      0.000165
                          3      0.000087
                          5      0.000043
                          7     -0.000022
                          9     -0.000080
                         11     -0.000156
                         13      0.000206
                         15     -0.000229
                         17     -0.000323
                         19     -0.000332
                         21     -0.000424
                         23     -0.000500
                         25     -0.000579
                         27     -0.000479
                         29     -0.000316
                </tableData>
              </table>
           </product>
        </function>

        <function name="aero/coefficients/CddSpoilersRightInner">
        <description>DRAG INCREMENT DUE TO RIGHT INNER SPOILERS F(ALPHA) (NASA TM-X-62306 Test 2 Run 5,10)</description>
        <product>
              <property>fcs/spoiler-right-inner-pos-deg</property>
              <table>
                <independentVar lookup="row">aero/alpha-deg</independentVar>
                <tableData>
                         -5      0.000403
                         -3      0.000323
                         -1      0.000242
                          1      0.000165
                          3      0.000087
                          5      0.000043
                          7     -0.000022
                          9     -0.000080
                         11     -0.000156
                         13      0.000206
                         15     -0.000229
                         17     -0.000323
                         19     -0.000332
                         21     -0.000424
                         23     -0.000500
                         25     -0.000579
                         27     -0.000479
                         29     -0.000316
                </tableData>
              </table>
           </product>
        </function>

        <function name="aero/coefficients/CddSpoilersRightOuter">
        <description>DRAG INCREMENT DUE TO RIGHT OUTER SPOILERS F(ALPHA) (NASA TM-X-62306 Test 2 Run 5,10)</description>
        <product>
              <property>fcs/spoiler-right-outer-pos-deg</property>
              <table>
                <independentVar lookup="row">aero/alpha-deg</independentVar>
                <tableData>
                         -5      0.000403
                         -3      0.000323
                         -1      0.000242
                          1      0.000165
                          3      0.000087
                          5      0.000043
                          7     -0.000022
                          9     -0.000080
                         11     -0.000156
                         13      0.000206
                         15     -0.000229
                         17     -0.000323
                         19     -0.000332
                         21     -0.000424
                         23     -0.000500
                         25     -0.000579
                         27     -0.000479
                         29     -0.000316
                </tableData>
              </table>
           </product>
        </function>


        <function name="aero/coefficients/CdDS1">
            <description>CdDS1</description>
            <product>
                <property>aero/cadc-control-effectivity-factor</property>
                <table>
                    <independentVar lookup="row">aero/alpha-deg</independentVar>
                    <tableData>
                       -65  0.0140
                       -55  0.0140
                       -10  0.0018
                        -5 -0.0003
                         0 -0.0012
                         5  0.0003
                        10  0.0018
                        15  0.0040
                        20  0.0062
                        25  0.0075
                        30  0.0095
                        35  0.0105
                        40  0.0075
                        45  0.0090
                        50  0.0125
                        55  0.0140
                    </tableData>
                </table>
            </product>
        </function>

        <function name="aero/coefficients/CdDS2">
            <description>CdDS2</description>
            <product>
                <property>aero/cadc-control-effectivity-factor</property>
                <table>
                    <independentVar lookup="row">aero/alpha-deg</independentVar>
                    <tableData>
                       -65  0.0090
                       -55  0.0090
                       -30  0.0060
                       -10 -0.0010
                        -5 -0.0003
                         0 -0.0033
                         5 -0.0025
                        10 -0.0010
                        15  0.0005
                        20  0.0020
                        25  0.0040
                        30  0.0060
                        35  0.0085
                        40  0.0095
                        45  0.0110
                        50  0.0105
                        55  0.0090
                    </tableData>
                </table>
            </product>
        </function>

        <function name="aero/coefficients/DCdDS1">
            <description>DCdDS1</description>
            <product>
                <property>fcs/stabilizer-1p-factor</property>
                <property>aero/coefficients/CdDS1</property>
                <property>fcs/elevator-pos-deg</property>
            </product>
        </function>

        <function name="aero/coefficients/DCdDS2">
            <description>DCdDS2</description>
            <product>
                <property>fcs/stabilizer-2p-factor</property>
                <sum>
                    <product>
                        <value>-10</value>
                        <property>aero/coefficients/CdDS1</property>
                    </product>
                    <product>
                        <sum>
                            <value>10</value>
                            <property>fcs/elevator-pos-deg</property>
                        </sum>
                        <property>aero/coefficients/CdDS2</property>
                    </product>
                </sum>
            </product>
        </function>
        <function name="aero/coefficients/CdDasym">
            <description>Delta Cl due to wing asymmetry</description>
            <product>
                <property>systems/flyt/wing-asymmetry</property> <!-- sqr to remove the sign (value either -1, 0 or 1 -->
                <property>systems/flyt/wing-asymmetry</property>
                <property>aero/coefficients/CdBAS</property>
                <value>-0.3</value>
            </product>
        </function>

        <function name="aero/coefficients/Cd">
                <sum>
                    <property>aero/coefficients/CdMach</property>
                    <property>aero/coefficients/CdBAS</property>
                    <property>aero/coefficients/CddLandingGear</property>
                    <property>aero/coefficients/CddSpeedbrake</property>
                    <property>aero/coefficients/CdTNK</property>
                    <property>aero/coefficients/CdDasym</property>

                    <property>aero/coefficients/CddAuxFlaps</property>
                    <property>aero/coefficients/CddMainFlaps</property>
                    <property>aero/coefficients/CddSlats</property>

                    <property>aero/coefficients/CddSpoilersLeftInner</property>
                    <property>aero/coefficients/CddSpoilersLeftOuter</property>
                    <property>aero/coefficients/CddSpoilersRightInner</property>
                    <property>aero/coefficients/CddSpoilersRightOuter</property>
                </sum>
        </function>


        <function name="aero/coefficients/CyBAS">
            <description>CyBAS</description>
                <table>
                    <independentVar lookup="row">aero/alpha-deg</independentVar>
                    <independentVar lookup="column">aero/beta-deg</independentVar>
                    <tableData>
                                 -20       -15       -10        -5         0         5        10        15        20
                       -20   0.20490   0.15870   0.10830   0.05500   0.00000  -0.05500  -0.10830  -0.15870  -0.20490
                       -11   0.20490   0.15870   0.10830   0.05500   0.00000  -0.05500  -0.10830  -0.15870  -0.20490
                       -10   0.28855   0.20370   0.14100   0.06940   0.00000  -0.06940  -0.14100  -0.20370  -0.28855
                         0   0.29415   0.21760   0.14620   0.06380   0.00000  -0.06380  -0.14620  -0.21760  -0.29415
                         5   0.30055   0.22180   0.14645   0.07015   0.00000  -0.07015  -0.14645  -0.22180  -0.30055
                        10   0.28855   0.20370   0.14100   0.06940   0.00000  -0.06940  -0.14100  -0.20370  -0.28855
                        15   0.24630   0.16780   0.11240   0.05945   0.00000  -0.05945  -0.11240  -0.16780  -0.24630
                        20   0.20490   0.15870   0.10830   0.05500   0.00000  -0.05500  -0.10830  -0.15870  -0.20490
                        25   0.18955   0.15275   0.11775   0.06045   0.00000  -0.06045  -0.11775  -0.15275  -0.18955
                        30   0.21465   0.17815   0.13310   0.07580   0.00000  -0.07580  -0.13310  -0.17815  -0.21465
                        35   0.23860   0.18665   0.14605   0.07135   0.00000  -0.07135  -0.14605  -0.18665  -0.23860
                        40   0.25660   0.20260   0.14505   0.07680   0.00000  -0.07680  -0.14505  -0.20260  -0.25660
                        45   0.26760   0.22235   0.16075   0.09275   0.00000  -0.09275  -0.16075  -0.22235  -0.26760
                        50   0.27370   0.22075   0.15150   0.07865   0.00000  -0.07865  -0.15150  -0.22075  -0.27370
                        55   0.24915   0.19150   0.13150   0.07155   0.00000  -0.07155  -0.13150  -0.19150  -0.24915
                    </tableData>
                </table>
        </function>
        <function name="aero/coefficients/CyP">
            <description>CyP</description>
            <product>
                <property>aero/bi2vel</property>
                <property>velocities/p-aero-rad_sec</property>
                <table>
                    <independentVar lookup="row">aero/alpha-deg</independentVar>
                    <tableData>
                       -20  -0.1596
                       -15  -0.1596
                       -10  -0.1250
                        -5   0.0000
                         0   0.1490
                         5   0.2686
                        10   0.1250
                        15   0.1596
                        20   0.3264
                        25   0.3800
                        30   0.6799
                        35   0.5603
                        40   0.9320
                        45   0.1392
                        50  -0.6960
                        55  -0.3818
                    </tableData>
                </table>
            </product>
        </function>

        <function name="aero/coefficients/CyR">
            <description>CyR</description>
            <product>
                <property>aero/bi2vel</property>
                <property>velocities/r-aero-rad_sec</property>
                <table>
                    <independentVar lookup="row">aero/alpha-deg</independentVar>
                    <tableData>
                       -25   0.8200
                       -20   0.8200
                       -15   0.8000
                       -10   0.6000
                        -5   0.5684
                         0   0.5684
                         5   0.5356
                        10   0.4996
                        15   0.6782
                        20   0.5295
                        25   0.2712
                        30  -0.7343
                        35  -1.3173
                        40  -2.0531
                        45  -0.7688
                        50  -0.2885
                        55  -0.1206
                    </tableData>
                </table>
            </product>
        </function>
        <function name="aero/coefficients/CyDA">
            <description>CyDA</description>
            <product>
                <property>fcs/left-aileron-pos-deg</property>
                <property>aero/cadc-control-effectivity-factor</property>
                <table>
                    <independentVar lookup="row">aero/alpha-deg</independentVar>
                    <tableData>
                        -5 -0.00095
                         0 -0.00095
                         5 -0.00100
                        10 -0.00085
                        15 -0.00065
                        20 -0.00030
                        25  0.00010
                        30  0.00060
                        35  0.00160
                        40  0.00240
                        45  0.00250
                        50  0.00255
                        55  0.00265
                    </tableData>
                </table>
            </product>
        </function>
        <function name="aero/coefficients/CyDR">
            <description>CyDR</description>
            <product>
                <property>fcs/rudder-pos-deg</property>
                <property>aero/cadc-control-effectivity-factor</property>
                <table>
                    <independentVar lookup="row">aero/alpha-deg</independentVar>
                    <independentVar lookup="column">aero/beta-deg</independentVar>
                    <tableData>
                                  -20        -15        -10         -5          0          5         10         15         20
                       -10    0.00450    0.00485    0.00520    0.00530    0.00530    0.00530    0.00520    0.00485    0.00430
                        -5    0.00450    0.00485    0.00520    0.00530    0.00530    0.00530    0.00520    0.00485    0.00430
                         0    0.00480    0.00520    0.00560    0.00560    0.00560    0.00560    0.00560    0.00520    0.00480
                         5    0.00450    0.00485    0.00520    0.00530    0.00530    0.00530    0.00520    0.00485    0.00430
                        10    0.00430    0.00450    0.00480    0.00495    0.00510    0.00500    0.00480    0.00450    0.00420
                        15    0.00370    0.00400    0.00430    0.00450    0.00470    0.00450    0.00430    0.00400    0.00370
                        20    0.00330    0.00355    0.00380    0.00400    0.00420    0.00400    0.00380    0.00355    0.00330
                        25    0.00280    0.00305    0.00330    0.00350    0.00370    0.00350    0.00330    0.00305    0.00280
                        30    0.00230    0.00250    0.00270    0.00289    0.00310    0.00290    0.00270    0.00250    0.00230
                        35    0.00160    0.00180    0.00200    0.00220    0.00240    0.00220    0.00200    0.00180    0.00160
                        40    0.00100    0.00110    0.00120    0.00135    0.00150    0.00135    0.00120    0.00110    0.00100
                        45    0.00030    0.00035    0.00040    0.00045    0.00050    0.00045    0.00040    0.00035    0.00030
                        50    0.00000    0.00000    0.00000    0.00000    0.00000    0.00000    0.00000    0.00000    0.00000
                        55    0.00000    0.00000    0.00000    0.00000    0.00000    0.00000    0.00000    0.00000    0.00000
                    </tableData>
                </table>
            </product>
        </function>

        <function name="aero/coefficients/Cy">
            <sum>
                <property>aero/coefficients/CyBAS</property>
                <property>aero/coefficients/CyP</property>
                <property>aero/coefficients/CyR</property>
                <property>aero/coefficients/CyDA</property>
                <property>aero/coefficients/CyDR</property>
            </sum>
        </function>

        <function name="aero/coefficients/CLBAS">
            <description>CLBAS</description>
                <table>
                    <independentVar lookup="row">aero/alpha-deg</independentVar>
                    <independentVar lookup="column">aero/beta-deg</independentVar>
                    <tableData>
                                    -20          -15          -10           -5            0            5           10           15           20
                       -45   0.06100000   0.04600000   0.03050000   0.01500000   0.00000000  -0.01500000  -0.03050000  -0.04600000  -0.06100000
                       -35   0.04750000   0.03600000   0.02450000   0.01250000   0.00000000  -0.01250000  -0.02450000  -0.03600000  -0.04750000
                       -30   0.04900000   0.03766667   0.02533333   0.01366667   0.00000000  -0.01366667  -0.02533333  -0.03766667  -0.04900000
                       -20   0.05500000   0.04100000   0.02700000   0.01600000   0.00000000  -0.01600000  -0.02700000  -0.04100000  -0.05500000
                       -15   0.04700000   0.03650000   0.02650000   0.01350000   0.00000000  -0.01350000  -0.02650000  -0.03650000  -0.04700000
                       -10   0.03100000   0.02600000   0.02100000   0.01050000   0.00000000  -0.01050000  -0.02100000  -0.02600000  -0.03100000
                        -5   0.02500000   0.01700000   0.01350000   0.00650000   0.00000000  -0.00650000  -0.01350000  -0.01700000  -0.02050000
                         0   0.00950000   0.00800000   0.00600000   0.00300000   0.00000000  -0.00300000  -0.00600000  -0.00800000  -0.00950000
                         5   0.02500000   0.01700000   0.01350000   0.00650000   0.00000000  -0.00650000  -0.01350000  -0.01700000  -0.02050000
                        10   0.03100000   0.02600000   0.02100000   0.01050000   0.00000000  -0.01050000  -0.02100000  -0.02600000  -0.03100000
                        15   0.04700000   0.03650000   0.02650000   0.01350000   0.00000000  -0.01350000  -0.02650000  -0.03650000  -0.04700000
                        20   0.05500000   0.04100000   0.02700000   0.01600000   0.00000000  -0.01600000  -0.02700000  -0.04100000  -0.05500000
                        25   0.05250000   0.03933333   0.02616667   0.01483333   0.00000000  -0.01483333  -0.02616667  -0.03933333  -0.05250000
                        30   0.04900000   0.03766667   0.02533333   0.01366667   0.00000000  -0.01366667  -0.02533333  -0.03766667  -0.04900000
                        35   0.04750000   0.03600000   0.02450000   0.01250000   0.00000000  -0.01250000  -0.02450000  -0.03600000  -0.04750000
                        40   0.05200000   0.03900000   0.02550000   0.01300000   0.00000000  -0.01300000  -0.02550000  -0.03900000  -0.05200000
                        45   0.06100000   0.04600000   0.03050000   0.01500000   0.00000000  -0.01500000  -0.03050000  -0.04600000  -0.06100000
                        50   0.06450000   0.04850000   0.03300000   0.01650000   0.00000000  -0.01650000  -0.03300000  -0.04850000  -0.06450000
                        55   0.06500000   0.04950000   0.03350000   0.01650000   0.00000000  -0.01650000  -0.03350000  -0.04950000  -0.06500000
                    </tableData>
                </table>
        </function>
        <function name="aero/coefficients/CLP">
            <description>CLP</description>
            <product>
                <property>aero/bi2vel</property>
                <property>velocities/p-aero-rad_sec</property>
                <table>
                    <independentVar lookup="row">aero/alpha-deg</independentVar>
                    <tableData>
                       -10  -0.4100
                        -5  -0.4057
                         0  -0.4016
                         5  -0.4057
                        10  -0.2000
                        15  -0.0800
                        25  -0.2000
                        30  -0.2700
                        35  -0.2283
                        40  -0.1863
                        45  -0.1104
                        50  -0.0361
                        55  -0.0891
                    </tableData>
                </table>
            </product>
        </function>
        <function name="aero/coefficients/CLR">
            <description>CLR</description>
            <product>
                <property>aero/bi2vel</property>
                <property>velocities/r-aero-rad_sec</property>
                <table>
                    <independentVar lookup="row">aero/alpha-deg</independentVar>
                    <tableData>
                        -5  -0.0522
                         0   0.0080
                         5   0.0522
                        10   0.0838
                        15   0.0789
                        20   0.2310
                        25   0.2384
                        30   0.3200
                        35   0.3200
                        40   0.2545
                        45   0.0725
                        50  -0.0434
                        55  -0.5880
                    </tableData>
                </table>
            </product>
        </function>
        <function name="aero/coefficients/CLDA">
            <description>CLDA</description>
            <product>
                <property>fcs/left-aileron-pos-deg</property>
                <property>aero/cadc-control-effectivity-factor</property>
                <table>
                    <independentVar lookup="row">aero/alpha-deg</independentVar>
                    <independentVar lookup="column">aero/beta-deg</independentVar>
                    <tableData>
                                  -20        -15        -10         -5          0          5         10         15         20
                         0  0.0007900  0.0007900  0.0007900  0.0007900  0.0007900  0.0007900  0.0007900  0.0007900  0.0007900
                         5  0.0007900  0.0007900  0.0007900  0.0007900  0.0007900  0.0007900  0.0007900  0.0007900  0.0007900
                        10  0.0007900  0.0007900  0.0007900  0.0007900  0.0007900  0.0007900  0.0007900  0.0007900  0.0007900
                        15  0.0006200  0.0006600  0.0007125  0.0007775  0.0008050  0.0007775  0.0007125  0.0006600  0.0006200
                        20  0.0004825  0.0005750  0.0006600  0.0007475  0.0007550  0.0007475  0.0006600  0.0005750  0.0004825
                        25  0.0003100  0.0004650  0.0005300  0.0006050  0.0006450  0.0006050  0.0005300  0.0004650  0.0003100
                        30  0.0002350  0.0003475  0.0003900  0.0004400  0.0004850  0.0004400  0.0003900  0.0003475  0.0002300
                        35  0.0001675  0.0002200  0.0002175  0.0002150  0.0002350  0.0002150  0.0002175  0.0002200  0.0001675
                        40  0.0000925  0.0001425  0.0001225  0.0001400  0.0001200  0.0001400  0.0001225  0.0001425  0.0000925
                        45  0.0001725  0.0001375  0.0001150  0.0001175  0.0001400  0.0001175  0.0001150  0.0001375  0.0001725
                        50  0.0001450  0.0001375  0.0001825  0.0002425  0.0002200  0.0002425  0.0001825  0.0001375  0.0001450
                        55  0.0001750  0.0002100  0.0002775  0.0003300  0.0003500  0.0003300  0.0002775  0.0002100  0.0001750
                    </tableData>
                </table>
            </product>
        </function>
        <function name="aero/coefficients/CLDasym">
            <description>Delta CL due to wing asymmetry</description>
            <product>
                <property>systems/flyt/wing-asymmetry</property>
                <property>aero/coefficients/ClSweepFactor</property>
                <value>0.076</value>
            </product>
        </function>
    <function name="aero/coefficients/CSPL">
    <description>SPOILER EFFECTIVITY DUE TO WINGSWEEP</description>
          <table>
            <independentVar lookup="row">fcs/wing-sweep-pos-deg</independentVar>
            <tableData>
                22    1.0000
                25    0.9775
                30    0.9340
                35    0.8835
                40    0.8262
                45    0.7626
                50    0.6933
                55    0.6186
                58    0.0000
            </tableData>
          </table>
    </function>

        <!-- AFWAL-TR-80-3141 part III: p55; no effect from spoilers above 10degrees alpha
             2018-07-01 : AFWAL-TR-80-3141 cannot be correct as DLC relies on spoilers and it would be fairly useless at
                          onspeed (14.5 to 15.5) so even allowing for the offset between indicated AoA and airframe
                          AoA there must be more to the story.
                          The Tornado model that I made using VSPAERO shows 70% reduction of spoiler roll from 10 to 15 degrees
                          so I'm using that as a guide.
             2020-12-15   Split spoilers into two groups of 2 (for new DLC), data is still based on above.
             -->
             <function name="aero/coefficients/CMLdSpoilersLeftInner">
                <description>ROLL MOMENT INCREMENT DUE TO LEFT INNER SPOILERS</description>
                <product>
                      <property>fcs/spoiler-left-inner-pos-deg</property>
                      <table>
                        <independentVar lookup="row">aero/alpha-deg</independentVar>
                        <tableData>
                           -15 -0.000551
                           -10 -0.000551
                            -5 -0.000528
                             0 -0.000503
                             5 -0.000386
                            10 -0.000129
                            15 -0.000022
                            20 -0.000025
                            25 -0.000022
                            30 -0.000016
                            35 -0.000013
                            40 -0.000013
                            45 -0.000013
                            50 -0.000009
                            55  0.000049
                        </tableData>
                      </table>
                   </product>
                </function>

                <function name="aero/coefficients/CMLdSpoilersLeftOuter">
                <description>ROLL MOMENT INCREMENT DUE TO LEFT OUTER SPOILERS</description>
                <product>
                      <property>fcs/spoiler-left-outer-pos-deg</property>
                      <table>
                        <independentVar lookup="row">aero/alpha-deg</independentVar>
                        <tableData>
                           -15 -0.000761
                           -10 -0.000761
                            -5 -0.000729
                             0 -0.000695
                             5 -0.000533
                            10 -0.000178
                            15 -0.000030
                            20 -0.000035
                            25 -0.000030
                            30 -0.000022
                            35 -0.000018
                            40 -0.000018
                            45 -0.000019
                            50 -0.000012
                            55  0.000067
                        </tableData>
                      </table>
                   </product>
                </function>

                <function name="aero/coefficients/CMLdSpoilersRightInner">
                <description>ROLL MOMENT INCREMENT DUE TO RIGHT INNER SPOILERS</description>
                <product>
                      <property>fcs/spoiler-right-inner-pos-deg</property>
                      <table>
                        <independentVar lookup="row">aero/alpha-deg</independentVar>
                        <tableData>
                           -15   0.000551
                           -10   0.000551
                            -5   0.000528
                             0   0.000503
                             5   0.000386
                            10   0.000129
                            15   0.000022
                            20   0.000025
                            25   0.000022
                            30   0.000016
                            35   0.000013
                            40   0.000013
                            45   0.000013
                            50   0.000009
                            55  -0.000049
                        </tableData>
                      </table>
                   </product>
                </function>

                <function name="aero/coefficients/CMLdSpoilersRightOuter">
                <description>ROLL MOMENT INCREMENT DUE TO RIGHT OUTER SPOILERS</description>
                <product>
                      <property>fcs/spoiler-right-outer-pos-deg</property>
                      <table>
                        <independentVar lookup="row">aero/alpha-deg</independentVar>
                        <tableData>
                           -15   0.000761
                           -10   0.000761
                            -5   0.000729
                             0   0.000695
                             5   0.000533
                            10   0.000178
                            15   0.000030
                            20   0.000035
                            25   0.000030
                            30   0.000022
                            35   0.000018
                            40   0.000018
                            45   0.000019
                            50   0.000012
                            55  -0.000067
                        </tableData>
                      </table>
                   </product>
                </function>


        <function name="aero/coefficients/CLDR">
            <description>CLDR</description>
            <product>
                <property>fcs/rudder-pos-deg</property>
                <property>aero/cadc-control-effectivity-factor</property>
                <table>
                    <independentVar lookup="row">aero/alpha-deg</independentVar>
                    <independentVar lookup="column">aero/beta-deg</independentVar>
                    <tableData>
                                   -20         -15         -10          -5           0           5          10          15          20
                         0    0.000096    0.000104    0.000112    0.000112    0.000112    0.000112    0.000112    0.000104    0.000096
                         5    0.000090    0.000097    0.000104    0.000104    0.000108    0.000106    0.000104    0.000097    0.000090
                        10    0.000084    0.000090    0.000096    0.000099    0.000102    0.000099    0.000096    0.000090    0.000084
                        15    0.000074    0.000080    0.000086    0.000090    0.000094    0.000090    0.000086    0.000080    0.000074
                        20    0.000066    0.000071    0.000076    0.000080    0.000084    0.000080    0.000076    0.000071    0.000066
                        25    0.000056    0.000061    0.000066    0.000070    0.000074    0.000070    0.000066    0.000061    0.000056
                        30    0.000045    0.000050    0.000054    0.000058    0.000062    0.000058    0.000054    0.000050    0.000046
                        35    0.000032    0.000036    0.000040    0.000044    0.000048    0.000044    0.000040    0.000036    0.000032
                        40    0.000020    0.000022    0.000024    0.000027    0.000030    0.000027    0.000024    0.000022    0.000020
                        45    0.000006    0.000007    0.000008    0.000009    0.000010    0.000009    0.000008    0.000007    0.000006
                        50    0.000000    0.000000    0.000000    0.000000    0.000000    0.000000    0.000000    0.000000    0.000000
                        55    0.000000    0.000000    0.000000    0.000000    0.000000    0.000000    0.000000    0.000000    0.000000
                    </tableData>
                </table>
            </product>
        </function>

        <function name="aero/coefficients/CL">
            <sum>
                <property>aero/coefficients/CLBAS</property>
                <property>aero/coefficients/CLP</property>
                <property>aero/coefficients/CLR</property>
                <property>aero/coefficients/CLDA</property>
                <property>aero/coefficients/CLDR</property>
                <property>aero/coefficients/CLDasym</property>
                <property>aero/coefficients/CMLdSpoilersLeftInner</property>
                <property>aero/coefficients/CMLdSpoilersLeftOuter</property>
                <property>aero/coefficients/CMLdSpoilersRightInner</property>
                <property>aero/coefficients/CMLdSpoilersRightOuter</property>
            </sum>
        </function>

        <function name="aero/coefficients/CMBAS">
            <description>CMBAS</description>
                <table>
                    <independentVar lookup="row">aero/alpha-deg</independentVar>
                    <independentVar lookup="column">aero/beta-deg</independentVar>
                    <tableData>
                                   -20         -15         -10          -5           0           5          10          15          20
                       -15   0.2706090   0.2341000   0.2080220   0.1923750   0.1871590   0.1923750   0.2080220   0.2341000   0.2706090
                       -10   0.1647160   0.1532750   0.1451030   0.1402000   0.1385650   0.1402000   0.1451030   0.1532750   0.1647160
                        -5   0.0952120   0.0990630   0.1018120   0.1034630   0.1040120   0.1034630   0.1018120   0.0990630   0.0952120
                         0   0.0605219   0.0654000   0.0688844   0.0709750   0.0716718   0.0709750   0.0688844   0.0654000   0.0605219
                         5   0.0258313   0.0317375   0.0359563   0.0384875   0.0393313   0.0384875   0.0359563   0.0317375   0.0258313
                        10  -0.0436719  -0.0224750  -0.0073344   0.0017500   0.0047781   0.0017500  -0.0073344  -0.0224750  -0.0436719
                        15  -0.1495656  -0.1033000  -0.0702531  -0.0504250  -0.0438156  -0.0504250  -0.0702531  -0.1033000  -0.1495656
                        20  -0.1772469  -0.1244188  -0.0866844  -0.0640438  -0.0564969  -0.0640438  -0.0866844  -0.1244188  -0.1772469
                        25  -0.2248094  -0.1879937  -0.1616969  -0.1459187  -0.1406594  -0.1459187  -0.1616969  -0.1879937  -0.2248094
                        30  -0.2387250  -0.2321625  -0.2274750  -0.2246625  -0.2237250  -0.2246625  -0.2274750  -0.2321625  -0.2387250
                        35  -0.3000000  -0.3000000  -0.3000000  -0.3000000  -0.3000000  -0.3000000  -0.3000000  -0.3000000  -0.3000000
                        40  -0.3490531  -0.3721313  -0.3886156  -0.3985063  -0.4018031  -0.3985063  -0.3886156  -0.3721313  -0.3490531
                        45  -0.4248187  -0.4461250  -0.4613438  -0.4704750  -0.4735188  -0.4704750  -0.4613438  -0.4461250  -0.4248187
                        50  -0.4808313  -0.5169250  -0.5427063  -0.5581750  -0.5633313  -0.5581750  -0.5427063  -0.5169250  -0.4808313
                        55  -0.5400406  -0.5832000  -0.6140281  -0.6325250  -0.6386906  -0.6325250  -0.6140281  -0.5832000  -0.5400406
                    </tableData>
                </table>
        </function>

        <function name="aero/coefficients/CMDS1">
            <description>CMDS1</description>
            <product>
                <property>aero/cadc-control-effectivity-factor</property>
                <table>
                    <independentVar lookup="row">aero/alpha-deg</independentVar>
                    <tableData>
                       -55  -0.0120
                       -50  -0.0145
                       -45  -0.0145
                       -40  -0.0145
                       -35  -0.0145
                       -30  -0.0160
                       -25  -0.0160
                       -20  -0.0160
                       -15  -0.0155
                       -10  -0.0140
                        -5  -0.0115
                         0  -0.0090
                         5  -0.0115
                        10  -0.0140
                        15  -0.0155
                        20  -0.0160
                        25  -0.0160
                        30  -0.0160
                        35  -0.0145
                        40  -0.0145
                        45  -0.0145
                        50  -0.0145
                        55  -0.0120
                    </tableData>
                </table>
            </product>
        </function>

        <function name="aero/coefficients/CMDS2">
            <description>CMDS2</description>
            <product>
                <!-- stabilizer-1p will be 1 or -10 (-10 when applicable)
           the original equation was -10*CMDS1 +(stab-deg + 10) CMDS2
           -->
                <property>aero/cadc-control-effectivity-factor</property>
                <table>
                    <independentVar lookup="row">aero/alpha-deg</independentVar>
                    <tableData>
                       -55    0.0000
                       -50    0.0005
                       -45    0.0060
                       -40    0.0040
                       -35   -0.0010
                       -30   -0.0075
                       -25   -0.0133
                       -20   -0.0170
                       -15   -0.0190
                       -10   -0.0190
                        -5   -0.0185
                         0   -0.0195
                         5   -0.0185
                        10   -0.0190
                        15   -0.0190
                        20   -0.0170
                        25   -0.0133
                        30   -0.0075
                        35   -0.0010
                        40    0.0040
                        45    0.0060
                        50    0.0005
                        55    0.0000
                    </tableData>
                </table>
            </product>
        </function>

        <function name="aero/coefficients/DCMDS1">
            <description>DCMDS1</description>
            <product>
                <property>fcs/stabilizer-1p-factor</property>
                <property>aero/coefficients/CMDS1</property>
                <property>fcs/elevator-pos-deg</property>
            </product>
        </function>

        <function name="aero/coefficients/DCMDS2">
            <description>DCMDS2</description>
            <product>
                <property>fcs/stabilizer-2p-factor</property>
                <!-- stabilizer-1p will be 1 or -10 (-10 when applicable)
           the original equation was -10*CMDS1 +(stab-deg + 10) CMDS2
           -->
                <sum>
                    <product>
                        <value>-10</value>
                        <property>aero/coefficients/CMDS1</property>
                    </product>
                    <product>
                        <sum>
                            <value>10</value>
                            <property>fcs/elevator-pos-deg</property>
                        </sum>
                        <property>aero/coefficients/CMDS2</property>
                    </product>
                </sum>
            </product>
        </function>

        <function name="aero/coefficients/DCMAIM">
            <description>Pitch moment increment due to aim missiles</description>
            <product>
                <property>fcs/aim-fitted</property>
                <table>
                    <independentVar lookup="row">velocities/mach</independentVar>
                    <independentVar lookup="column">aero/alpha-deg</independentVar>
                    <tableData>
                               -6     -5     -4     -3     -2     -1      0      1      2      3      4      5      6      7      8      9     10     20
                      0.80 -0.015 -0.015 -0.015 -0.010 -0.005 -0.003 -0.002 -0.001  0.000  0.002  0.003  0.005  0.010  0.010  0.005  0.003  0.000  0.000
                      0.85 -0.033 -0.031 -0.030 -0.022 -0.010 -0.004 -0.003 -0.002  0.000  0.003  0.006  0.007  0.008  0.010  0.010  0.006  0.004  0.004
                      0.90 -0.032 -0.031 -0.030 -0.028 -0.020 -0.006 -0.002  0.000  0.002  0.004  0.007  0.007  0.006  0.016  0.012  0.012  0.012  0.012
                    </tableData>
                </table>
            </product>
        </function>
        <function name="aero/coefficients/DCMB0">
            <description>DCMB0</description>
                <table>
                    <independentVar lookup="row">aero/alpha-deg</independentVar>
                    <tableData>
                         0  -0.055
                         5  -0.055
                        10  -0.055
                        15  -0.055
                        20  -0.055
                        25  -0.055
                        30  -0.055
                        35  -0.055
                        40  -0.055
                        45  -0.055
                        50  -0.055
                        55  -0.055
                    </tableData>
                </table>
        </function>
        <function name="aero/coefficients/CMQ">
            <description>CMQ</description>
            <product>
                <property>aero/cbarq-2vo</property>
                <table>
                    <independentVar lookup="row">aero/alpha-deg</independentVar>
                    <tableData>
                       -20  -14.129
                        -5  -15.424
                         0  -15.424
                         5  -14.129
                        10  -17.967
                        15  -22.807
                        20  -21.078
                        25  -19.629
                        30  -15.185
                        35   -1.886
                        40   -7.707
                        45   -5.479
                        50  -13.113
                        55  -10.298
                    </tableData>
                </table>
            </product>
        </function>

        <function name="aero/coefficients/CMMdSpeedbrake">
            <description>PITCH MOMENT INCREMENT DUE TO SPEEDBRAKE (NASA TM-X-62306 Test [15,18] [28,32])</description>
            <product>
                <property>fcs/speedbrake-pos-deg</property>
                <table>
                    <independentVar lookup="row">aero/alpha-deg</independentVar>
                    <tableData>
                            -15     -0.001067
                            -10     -0.000664
                             -5     -0.000261
                              0      0.000142
                              5      0.000675
                             10      0.001348
                             15      0.001731
                             20      0.002423
                             25      0.000490
                             30      0.001006
                             35      0.001540
                             40      0.002074
                             45      0.002608
                             50      0.003143
                             55      0.003677
                    </tableData>
                </table>
            </product>
        </function>

        <function name="aero/coefficients/CMMdLandingGear">
            <description>PITCH MOMENT INCREMENT DUE TO LANDING GEAR (NASA TM-X-62306 Test 4 Run 9, Run 10)</description>
            <product>
                <property>gear/gear-pos-norm</property>
                <table>
                    <independentVar lookup="row">aero/alpha-deg</independentVar>
                    <tableData>
                             -5     -0.004695
                             -3     -0.006761
                             -1     -0.008827
                              1     -0.012508
                              3     -0.020714
                              5     -0.013253
                              7     -0.007610
                              9     -0.023677
                             11     -0.022854
                             13     -0.015323
                             15     -0.010899
                             17     -0.015617
                             19     -0.009559
                             21     -0.008336
                             23     -0.003089
                             25      0.005663
                             27      0.000888
                             30      0.000000
                    </tableData>
                </table>
            </product>
        </function>

        <function name="aero/coefficients/CMMdSpoilersLeftInner">
            <description>PITCH MOMENT INCREMENT DUE TO LEFT INNER SPOILERS (NASA TM-X-62306 Test 2 Run 5,10)</description>
            <product>
                  <property>fcs/spoiler-left-inner-pos-deg</property>
                  <table>
                    <independentVar lookup="row">aero/alpha-deg</independentVar>
                    <tableData>
                             -5      0.001478
                             -3      0.001499
                             -1      0.001521
                              1      0.001489
                              3      0.001434
                              5      0.001521
                              7      0.001596
                              9      0.001500
                             11      0.001417
                             13      0.002231
                             15      0.001359
                             17      0.001182
                             19      0.000978
                             21      0.001131
                             23      0.001815
                             25      0.001316
                             27      0.000731
                             29      0.000243
                    </tableData>
                  </table>
               </product>
            </function>

            <function name="aero/coefficients/CMMdSpoilersLeftOuter">
            <description>PITCH MOMENT INCREMENT DUE TO LEFT OUTER SPOILERS (NASA TM-X-62306 Test 2 Run 5,10)</description>
            <product>
                  <property>fcs/spoiler-left-outer-pos-deg</property>
                  <table>
                    <independentVar lookup="row">aero/alpha-deg</independentVar>
                    <tableData>
                             -5      0.001478
                             -3      0.001499
                             -1      0.001521
                              1      0.001489
                              3      0.001434
                              5      0.001521
                              7      0.001596
                              9      0.001500
                             11      0.001417
                             13      0.002231
                             15      0.001359
                             17      0.001182
                             19      0.000978
                             21      0.001131
                             23      0.001815
                             25      0.001316
                             27      0.000731
                             29      0.000243
                    </tableData>
                  </table>
               </product>
            </function>

            <function name="aero/coefficients/CMMdSpoilersRightInner">
            <description>PITCH MOMENT INCREMENT DUE TO RIGHT INNER SPOILERS (NASA TM-X-62306 Test 2 Run 5,10)</description>
            <product>
                  <property>fcs/spoiler-right-inner-pos-deg</property>
                  <table>
                    <independentVar lookup="row">aero/alpha-deg</independentVar>
                    <tableData>
                             -5      0.001478
                             -3      0.001499
                             -1      0.001521
                              1      0.001489
                              3      0.001434
                              5      0.001521
                              7      0.001596
                              9      0.001500
                             11      0.001417
                             13      0.002231
                             15      0.001359
                             17      0.001182
                             19      0.000978
                             21      0.001131
                             23      0.001815
                             25      0.001316
                             27      0.000731
                             29      0.000243
                    </tableData>
                  </table>
               </product>
            </function>

            <function name="aero/coefficients/CMMdSpoilersRightOuter">
            <description>PITCH MOMENT INCREMENT DUE TO RIGHT OUTER SPOILERS (NASA TM-X-62306 Test 2 Run 5,10)</description>
            <product>
                  <property>fcs/spoiler-right-outer-pos-deg</property>
                  <table>
                    <independentVar lookup="row">aero/alpha-deg</independentVar>
                    <tableData>
                             -5      0.001478
                             -3      0.001499
                             -1      0.001521
                              1      0.001489
                              3      0.001434
                              5      0.001521
                              7      0.001596
                              9      0.001500
                             11      0.001417
                             13      0.002231
                             15      0.001359
                             17      0.001182
                             19      0.000978
                             21      0.001131
                             23      0.001815
                             25      0.001316
                             27      0.000731
                             29      0.000243
                    </tableData>
                  </table>
               </product>
            </function>


            <function name="aero/coefficients/CMMdAuxFlaps">
                <description>PITCH INCREMENT DUE TO AUX FLAPS</description>
                      <table>
                        <independentVar lookup="row">aero/alpha-deg</independentVar>
                        <independentVar lookup="column">fcs/aux-flap-pos-deg</independentVar>
                        <tableData>
                                              0           20           35
                                 -5    0.000000   -0.009741   -0.017047
                                 -3    0.000000   -0.011441   -0.020022
                                 -1    0.000000   -0.013141   -0.022997
                                  1    0.000000   -0.013787   -0.024128
                                  3    0.000000   -0.010962   -0.019183
                                  5    0.000000   -0.007828   -0.013699
                                  7    0.000000   -0.004044   -0.007078
                                  9    0.000000   -0.002042   -0.003574
                                 11    0.000000   -0.001670   -0.002923
                                 13    0.000000   -0.002105   -0.003684
                                 15    0.000000    0.001932    0.003380
                                 17    0.000000   -0.005740   -0.010044
                                 19    0.000000   -0.004058   -0.007102
                                 21    0.000000   -0.008155   -0.014272
                                 23    0.000000   -0.019376   -0.033908
                                 25    0.000000   -0.022328   -0.039074
                                 27    0.000000   -0.021409   -0.037465
                                 29    0.000000   -0.019516   -0.034153
                        </tableData>
                      </table>
                </function>

                <function name="aero/coefficients/CMMdMainFlaps">
                <description>PITCH INCREMENT DUE TO MAIN FLAPS</description>
                      <table>
                        <independentVar lookup="row">aero/alpha-deg</independentVar>
                        <independentVar lookup="column">fcs/flap-pos-deg</independentVar>
                        <tableData>
                                              0           20           35
                                 -5    0.000000   -0.022729   -0.039776
                                 -3    0.000000   -0.026696   -0.046718
                                 -1    0.000000   -0.030663   -0.053660
                                  1    0.000000   -0.032171   -0.056299
                                  3    0.000000   -0.025577   -0.044760
                                  5    0.000000   -0.018265   -0.031964
                                  7    0.000000   -0.009437   -0.016514
                                  9    0.000000   -0.004765   -0.008339
                                 11    0.000000   -0.003898   -0.006821
                                 13    0.000000   -0.004912   -0.008596
                                 15    0.000000    0.004507    0.007888
                                 17    0.000000   -0.013392   -0.023437
                                 19    0.000000   -0.009470   -0.016572
                                 21    0.000000   -0.019029   -0.033301
                                 23    0.000000   -0.045210   -0.079118
                                 25    0.000000   -0.052098   -0.091172
                                 27    0.000000   -0.049954   -0.087419
                                 29    0.000000   -0.045537   -0.079690
                        </tableData>
                      </table>
                </function>

                <function name="aero/coefficients/CMMdSlats">
                <description>PITCH INCREMENT DUE TO SLATS</description>
                      <table>
                        <independentVar lookup="row">aero/alpha-deg</independentVar>
                        <independentVar lookup="column">fcs/slat-pos-deg</independentVar>
                        <tableData>
                                              0            8           17
                                 -5    0.000000   -0.006685   -0.014206
                                 -3    0.000000   -0.007852   -0.016685
                                 -1    0.000000   -0.009018   -0.019164
                                  1    0.000000   -0.009462   -0.020107
                                  3    0.000000   -0.007523   -0.015986
                                  5    0.000000   -0.005372   -0.011416
                                  7    0.000000   -0.002776   -0.005898
                                  9    0.000000   -0.001402   -0.002978
                                 11    0.000000   -0.001146   -0.002436
                                 13    0.000000   -0.001445   -0.003070
                                 15    0.000000    0.001326    0.002817
                                 17    0.000000   -0.003939   -0.008370
                                 19    0.000000   -0.002785   -0.005919
                                 21    0.000000   -0.005597   -0.011893
                                 23    0.000000   -0.013297   -0.028256
                                 25    0.000000   -0.015323   -0.032561
                                 27    0.000000   -0.014692   -0.031221
                                 29    0.000000   -0.013393   -0.028461
                        </tableData>
                      </table>
                </function>


        <function name="aero/coefficients/CM">
            <sum>
                <property>aero/coefficients/CMBAS</property>
                <property>aero/coefficients/DCMB0</property>
                <property>aero/coefficients/CMQ</property>
                <property>aero/coefficients/DCMDS1</property>
                <property>aero/coefficients/DCMDS2</property>
                <property>aero/coefficients/CMMdLandingGear</property>
                <property>aero/coefficients/CMMdSpeedbrake</property>

                <property>aero/coefficients/CMMdAuxFlaps</property>
                <property>aero/coefficients/CMMdMainFlaps</property>
                <property>aero/coefficients/CMMdSlats</property>

                <property>aero/coefficients/CMMdSpoilersLeftInner</property>
                <property>aero/coefficients/CMMdSpoilersLeftOuter</property>
                <property>aero/coefficients/CMMdSpoilersRightInner</property>
                <property>aero/coefficients/CMMdSpoilersRightOuter</property>
            </sum>
        </function>
        <function name="CM-spoilers">
            <sum>
                <property>aero/coefficients/CMMdSpoilersLeftInner</property>
                <property>aero/coefficients/CMMdSpoilersLeftOuter</property>
                <property>aero/coefficients/CMMdSpoilersRightInner</property>
                <property>aero/coefficients/CMMdSpoilersRightOuter</property>
            </sum>
        </function>
        <function name="aero/coefficients/CNBAS">
            <description>CNBAS</description>
                <table>
                    <independentVar lookup="row">aero/alpha-deg</independentVar>
                    <independentVar lookup="column">aero/beta-deg</independentVar>
                    <tableData>
                                -20      -15      -10       -5        0        5       10       15       20
                       -10  -0.0390  -0.0300  -0.0215  -0.0100   0.0000   0.0100   0.0215   0.0300   0.0390
                        -5  -0.0390  -0.0300  -0.0215  -0.0100   0.0000   0.0100   0.0215   0.0300   0.0390
                         0  -0.0400  -0.0305  -0.0215  -0.0100   0.0000   0.0100   0.0215   0.0305   0.0400
                         5  -0.0390  -0.0300  -0.0215  -0.0100   0.0000   0.0100   0.0215   0.0300   0.0390
                        10  -0.0360  -0.0257  -0.0190  -0.0095   0.0000   0.0095   0.0190   0.0275   0.0360
                        15  -0.0085  -0.0075  -0.0060  -0.0030   0.0000   0.0030   0.0060   0.0075   0.0085
                        20   0.0100   0.0070   0.0040   0.0020   0.0000  -0.0020  -0.0040  -0.0070  -0.0100
                        25   0.0255   0.0170   0.0090   0.0045   0.0000  -0.0045  -0.0090  -0.0170  -0.0255
                        30   0.0380   0.0280   0.0180   0.0110   0.0000  -0.0110  -0.0180  -0.0280  -0.0380
                        35   0.0405   0.0315   0.0230   0.0145   0.0000  -0.0145  -0.0230  -0.0315  -0.0405
                        40   0.0450   0.0295   0.0190   0.0085   0.0000  -0.0085  -0.0190  -0.0295  -0.0405
                        45   0.0415   0.0315   0.0215   0.0130   0.0000  -0.0130  -0.0215  -0.0315  -0.0415
                        50   0.0360   0.0280   0.0205   0.0145   0.0000  -0.0145  -0.0205  -0.0280  -0.0360
                        55   0.0260   0.0220   0.0175   0.0145   0.0000  -0.0145  -0.0175  -0.0220  -0.0260
                    </tableData>
                </table>
        </function>
        <function name="aero/coefficients/CNDasym">
            <description>Delta CN due to wing asymmetry</description>
            <product>
                <property>systems/flyt/wing-asymmetry</property>
                <value>0.01293512</value>
            </product>
        </function>
        <function name="aero/coefficients/DCNDS">
            <description>DCNDS</description>
            <product>
                <property>fcs/elevator-pos-deg</property>
                <property>aero/cadc-control-effectivity-factor</property>
                <property>aero/cn-sin-82beta</property>
                <table>
                    <independentVar lookup="row">aero/alpha-deg</independentVar>
                    <tableData>
                        -5  0.000117
                         0  0.000117
                         5  0.000117
                        10  0.000150
                        15  0.000183
                        20  0.000217
                        25  0.000250
                        30  0.000267
                        35  0.000133
                        40  0.000083
                        45  0.000050
                        50  0.000050
                        55  0.000050
                    </tableData>
                </table>
            </product>
        </function>
        <function name="aero/coefficients/CNP">
            <description>CNP, AFWAL, Revised TM-81833 Fig37.</description>
            <product>
                <property>aero/bi2vel</property>
                <property>velocities/p-aero-rad_sec</property>
                <table>
                    <independentVar lookup="row">aero/alpha-deg</independentVar>
                    <tableData>
                       -10   0.0100
                        -5  -0.0147
                         0  -0.0333
                         5  -0.0947
                        10  -0.1068
                        15  -0.1189
                        20  -0.1310
                        25  -0.0800
                        30  -0.0116
                        35   0.1421
                        40   0.1007
                        45  -0.0298
                        50  -0.0958
                        55  -0.0134
                    </tableData>
                </table>
            </product>
        </function>
        <function name="aero/coefficients/CNR">
            <description>CNR</description>
            <product>
                <property>aero/bi2vel</property>
                <property>velocities/r-aero-rad_sec</property>
                <table>
                    <independentVar lookup="row">aero/alpha-deg</independentVar>
                    <tableData>
                        -5  -0.1154
                         0  -0.1154
                         5  -0.1256
                        10  -0.1380
                        15  -0.2048
                        20  -0.1897
                        25  -0.1918
                        30  -0.1972
                        35  -0.2911
                        40  -0.1449
                        45  -0.0458
                        50   0.0455
                        55  -0.0441
                    </tableData>
                </table>
            </product>
        </function>
        <function name="aero/coefficients/CNDA">
            <description>CNDA</description>
            <product>
                <property>fcs/left-aileron-pos-deg</property>
                <property>aero/cadc-control-effectivity-factor</property>
                <table>
                    <independentVar lookup="row">aero/alpha-deg</independentVar>
                    <tableData>
                         0   0.000250
                         5   0.000250
                        10   0.000175
                        15   0.000075
                        20  -0.000050
                        25  -0.000225
                        30  -0.000375
                        35  -0.000525
                        40  -0.000700
                        45  -0.000825
                        50  -0.000850
                        55  -0.000925
                    </tableData>
                </table>
            </product>
        </function>


        <function name="aero/coefficients/CMNdSpoilersLeftInner">
            <description>YAW MOMENT INCREMENT DUE TO LEFT INNER SPOILERS</description>
            <product>
                  <property>fcs/spoiler-left-inner-pos-deg</property>
                  <table>
                    <independentVar lookup="row">aero/alpha-deg</independentVar>
                    <tableData>
                       -15 -0.000006
                       -10 -0.000006
                        -5 -0.000006
                         0  0.000071
                         5  0.000122
                        10  0.000138
                        15  0.000144
                        20  0.000147
                        25  0.000149
                        30  0.000148
                        35  0.000148
                        40  0.000147
                        45  0.000146
                        50  0.000145
                        55  0.000143
                    </tableData>
                  </table>
               </product>
            </function>

            <function name="aero/coefficients/CMNdSpoilersLeftOuter">
            <description>YAW MOMENT INCREMENT DUE TO LEFT OUTER SPOILERS</description>
            <product>
                  <property>fcs/spoiler-left-outer-pos-deg</property>
                  <table>
                    <independentVar lookup="row">aero/alpha-deg</independentVar>
                    <tableData>
                       -15 -0.000008
                       -10 -0.000008
                        -5 -0.000008
                         0  0.000098
                         5  0.000169
                        10  0.000190
                        15  0.000199
                        20  0.000203
                        25  0.000205
                        30  0.000205
                        35  0.000204
                        40  0.000203
                        45  0.000202
                        50  0.000200
                        55  0.000198
                    </tableData>
                  </table>
               </product>
            </function>

            <function name="aero/coefficients/CMNdSpoilersRightInner">
            <description>YAW MOMENT INCREMENT DUE TO RIGHT INNER SPOILERS</description>
            <product>
                  <property>fcs/spoiler-right-inner-pos-deg</property>
                  <table>
                    <independentVar lookup="row">aero/alpha-deg</independentVar>
                    <tableData>
                       -15   0.000006
                       -10   0.000006
                        -5   0.000006
                         0  -0.000071
                         5  -0.000122
                        10  -0.000138
                        15  -0.000144
                        20  -0.000147
                        25  -0.000149
                        30  -0.000148
                        35  -0.000148
                        40  -0.000147
                        45  -0.000146
                        50  -0.000145
                        55  -0.000143
                    </tableData>
                  </table>
               </product>
            </function>

            <function name="aero/coefficients/CMNdSpoilersRightOuter">
            <description>YAW MOMENT INCREMENT DUE TO RIGHT OUTER SPOILERS</description>
            <product>
                  <property>fcs/spoiler-right-outer-pos-deg</property>
                  <table>
                    <independentVar lookup="row">aero/alpha-deg</independentVar>
                    <tableData>
                       -15   0.000008
                       -10   0.000008
                        -5   0.000008
                         0  -0.000098
                         5  -0.000169
                        10  -0.000190
                        15  -0.000199
                        20  -0.000203
                        25  -0.000205
                        30  -0.000205
                        35  -0.000204
                        40  -0.000203
                        45  -0.000202
                        50  -0.000200
                        55  -0.000198
                    </tableData>
                  </table>
               </product>
            </function>


        <function name="aero/coefficients/CNDR">
            <description>CNDR</description>
            <product>
                <property>fcs/rudder-pos-deg</property>
                <property>aero/cadc-control-effectivity-factor</property>
                <table>
                    <independentVar lookup="row">aero/alpha-deg</independentVar>
                    <independentVar lookup="column">aero/beta-deg</independentVar>
                    <tableData>
                                  -20        -15        -10         -5          0          5         10         15         20
                        -5   -0.00103   -0.00115   -0.00127   -0.00142   -0.00158   -0.00142   -0.00127   -0.00115   -0.00103
                         0   -0.00103   -0.00115   -0.00127   -0.00142   -0.00158   -0.00142   -0.00127   -0.00115   -0.00103
                         5   -0.00104   -0.00118   -0.00130   -0.00140   -0.00150   -0.00140   -0.00130   -0.00118   -0.00107
                        10   -0.00102   -0.00114   -0.00127   -0.00135   -0.00144   -0.00135   -0.00127   -0.00114   -0.00102
                        15   -0.00085   -0.00102   -0.00120   -0.00130   -0.00140   -0.00130   -0.00120   -0.00102   -0.00085
                        20   -0.00063   -0.00085   -0.00107   -0.00120   -0.00134   -0.00120   -0.00107   -0.00085   -0.00063
                        25   -0.00048   -0.00066   -0.00084   -0.00098   -0.00112   -0.00098   -0.00084   -0.00066   -0.00048
                        30   -0.00042   -0.00054   -0.00067   -0.00072   -0.00077   -0.00072   -0.00067   -0.00054   -0.00042
                        35   -0.00033   -0.00035   -0.00037   -0.00044   -0.00052   -0.00044   -0.00037   -0.00035   -0.00033
                        40   -0.00020   -0.00020   -0.00020   -0.00024   -0.00029   -0.00024   -0.00020   -0.00020   -0.00020
                        45   -0.00004   -0.00004   -0.00004   -0.00007   -0.00011   -0.00007   -0.00004   -0.00004   -0.00004
                        50    0.00000    0.00000    0.00000    0.00000    0.00000    0.00000    0.00000    0.00000    0.00000
                        55    0.00000    0.00000    0.00000    0.00000    0.00000    0.00000    0.00000    0.00000    0.00000
                    </tableData>
                </table>
            </product>
        </function>
        <function name="aero/coefficients/CN">
            <sum>
                <property>aero/coefficients/CNBAS</property>
                <property>aero/coefficients/DCNDS</property>
                <property>aero/coefficients/CNP</property>
                <property>aero/coefficients/CNR</property>
                <property>aero/coefficients/CNDA</property>
                <property>aero/coefficients/CNDR</property>
                <property>aero/coefficients/CNDasym</property>
                <property>aero/coefficients/CMNdSpoilersLeftInner</property>
                <property>aero/coefficients/CMNdSpoilersLeftOuter</property>
                <property>aero/coefficients/CMNdSpoilersRightInner</property>
                <property>aero/coefficients/CMNdSpoilersRightOuter</property>
            </sum>
        </function>
        <axis name="LIFT">
            <function name="aero/force/LIFT">
                <description>LIFT Force</description>
                <product>
                    <property>aero/qbar-psf</property>
                    <property>metrics/Sw-sqft</property>
                    <property>aero/coefficients/Cl</property>
                    <property>aero/coefficients/Cmach</property>
                    <property>aero/coefficients/ClSweepFactor</property>
                </product>
            </function>
        </axis>
        <axis name="DRAG">
            <function name="aero/force/DRAG">
                <description>DRAG Force</description>
                <product>
                    <property>aero/qbar-psf</property>
                    <property>metrics/Sw-sqft</property>
                    <property>aero/coefficients/Cd</property>
                    <property>aero/coefficients/ClSweepFactor</property>
                </product>
            </function>
        </axis>
        <axis name="SIDE">
            <function name="aero/force/SIDE">
                <description>SIDE Force</description>
                <product>
                    <property>aero/qbar-psf</property>
                    <property>metrics/Sw-sqft</property>
                    <property>aero/coefficients/Cy</property>
                </product>
            </function>
        </axis>
        <axis name="ROLL">
            <function name="aero/force/ROLL">
                <description>ROLL Moment</description>
                <product>
                    <property>aero/qbar-psf</property>
                    <property>metrics/Sw-sqft</property>
                    <property>metrics/bw-ft</property>
                    <property>aero/coefficients/CL</property>
                </product>
            </function>
        </axis>
        <axis name="PITCH">
            <function name="aero/force/PITCH">
                <description>PITCH Moment</description>
                <product>
                    <property>aero/qbar-psf</property>
                    <property>metrics/Sw-sqft</property>
                    <property>metrics/cbarw-ft</property>
                    <property>aero/coefficients/CM</property>
                    <property>aero/coefficients/Cmach</property>
                </product>
            </function>
        </axis>
        <axis name="YAW">
            <function name="aero/force/YAW">
                <description>YAW Moment</description>
                <product>
                    <property>aero/qbar-psf</property>
                    <property>metrics/Sw-sqft</property>
                    <property>metrics/bw-ft</property>
                    <property>aero/coefficients/CN</property>
                </product>
            </function>
        </axis>

    </aerodynamics>

    <external_reactions>
        <!-- wake turbulence from other AI plane -->
        <force name="ai-wake" frame="BODY">
            <location unit="M">
                <!-- Center of the main wing leading edge -->
                <x> 7.1</x>
                <y> 0.0 </y>
                <z> 0.523 </z>
            </location>
            <direction>
                <x>   0.0 </x>
                <y>   0.0 </y>
                <z>   0.0 </z>
            </direction>
        </force>

        <moment name="ai-wake" frame="BODY">
            <location unit="M">
                <!-- Center of the main wing leading edge -->
                <x> 7.1</x>
                <y> 0.0 </y>
                <z> 0.523 </z>
            </location>
            <direction>
                <x>   0.0 </x>
                <y>   0.0 </y>
                <z>   0.0 </z>
            </direction>
        </moment>

        <force name="catapult" frame="BODY">
            <location unit="IN">
                <x> 667 </x>
                <y>   0 </y>
                <z>   0 </z>
            </location>
            <direction>
                <x>   1 </x>
                <y>   0 </y>
                <z>   0 </z>
            </direction>
        </force>

        <force name="holdback" frame="BODY">
            <location unit="IN">
                <x> 667 </x>
                <y>   0 </y>
                <z>   0 </z>
            </location>
            <direction>
                <x>   -1.0 </x>
                <y>    0.0 </y>
                <z>    0.0 </z>
            </direction>
        </force>

        <force name="hook" frame="BODY">
            <location unit="IN">
                <x>  300 </x>
                <y>    0 </y>
                <z>    0 </z>
            </location>
            <direction>
                <x>  -0.9995 </x>
                <y>   0.0    </y>
                <z>   0.01 </z>
            </direction>
        </force>
        <force frame="BODY" name="F110-GE-400-1">
            <location unit="IN">
                <x> 667 </x>
                <y> -45 </y>
                <z> -7.66</z>
            </location>
            <direction>
                <x>  -0.9995 </x>
                <y>   0.0    </y>
                <z>   0.01 </z>
            </direction>
        </force>
        <force frame="BODY" name="F110-GE-400-2">
            <location unit="IN">
                <x> 667 </x>
                <y> 45 </y>
                <z> -7.66</z>
            </location>
            <direction>
                <x>  -0.9995 </x>
                <y>   0.0    </y>
                <z>   0.01 </z>
            </direction>
        </force>


    </external_reactions>
    <output name="c:/temp/JSBOut.csv" type="CSV" rate="10">
        <property caption="alpha-deg">aero/alpha-deg</property>
        <property caption="beta-deg">aero/beta-deg</property>
        <property caption="qbar">aero/qbar-psf</property>
        <property caption="pb">velocities/p-aero-rad_sec</property>
        <property caption="qb">velocities/q-aero-rad_sec</property>
        <property caption="rb">velocities/r-aero-rad_sec</property>
        <property caption="Nz">accelerations/Nz</property>
        <property caption="dlc-active">fcs/dlc-active</property>

        <property caption="alpha-u">systems/apc/alpha-u</property>
        <property caption="alpha-ref">systems/apc/alpha-u-reference</property>
        <property caption="apc/v-1-1">systems/apc/v-1-1</property>
        <property caption="apc/v-1-2">systems/apc/v-1-2</property>
        <property caption="apc/v-1">systems/apc/v-1</property>
        <property caption="apc/v-2-1">systems/apc/v-2-1</property>
        <property caption="apc/v-2-2">systems/apc/v-2-2</property>
        <property caption="apc/v-2">systems/apc/v-2</property>
        <property caption="apc/v-3-dh">systems/apc/v-3-dh</property>
        <property caption="apc/v-3-dlc">systems/apc/v-3-dlc</property>
        <property caption="apc/v-3-1">systems/apc/v-3-1</property>
        <property caption="apc/v-3-2">systems/apc/v-3-2</property>
        <property caption="apc/v-3">systems/apc/v-3</property>
        <property caption="apc/throttle-norm">systems/apc/throttle-pla-norm</property>


        <property caption="elevator-pos-deg">fcs/elevator-pos-deg</property>
        <property caption="stick-thumbwheel-norm">fcs/stick-thumbwheel-norm</property>
        <property caption="pitch-1-dlc">fcs/pitch-1-dlc-tw-norm-v1</property>
        <property caption="spoiler-dlc-increment-cmd">fcs/spoiler-dlc-increment-cmd</property>

        <!-- <property caption="spoiler-right-inner-pos-deg">fcs/spoiler-right-inner-pos-deg</property>
        <property caption="spoiler-leftright-inner-pos-deg">fcs/spoiler-leftright-inner-pos-deg</property>
        <property caption="CM">aero/coefficients/CM</property>
        <property caption="CMUC">aero/coefficients/CMUC</property>
        <property caption="CMBRK">aero/coefficients/CMBRK</property>
        <property caption="CMMdFlaps">aero/coefficients/CMMdFlaps</property>
        <property caption="CMMdAuxFlaps">aero/coefficients/CMMdAuxFlaps</property>
        <property caption="CMMdSlats">aero/coefficients/CMMdSlats</property>
        <property caption="CMMdSpoilersLeftInner">aero/coefficients/CMMdSpoilersLeftInner</property>
        <property caption="CMMdSpoilersLeftOuter">aero/coefficients/CMMdSpoilersLeftOuter</property>
        <property caption="CMMdSpoilersRightInner">aero/coefficients/CMMdSpoilersRightInner</property>
        <property caption="CMMdSpoilersRightOuter">aero/coefficients/CMMdSpoilersRightOuter</property> -->
<!--
        <property caption="pb">velocities/p-aero-rad_sec</property>
        <property caption="qb">velocities/q-aero-rad_sec</property>
        <property caption="rb">velocities/r-aero-rad_sec</property>
        <property caption="pitch-trim-sum">fcs/pitch-trim-sum</property>
        <property caption="pitch-3-q">sas/pitch-3-q</property>
        <property caption="pitch-command">fcs/pitch-command</property>
        <property caption="pitch-cmd-norm">fcs/pitch-cmd-norm</property> -->

        <!-- <property caption="sas-yaw">sas/yaw-output</property>
        <property caption="yawr0">sas/yaw-r-0</property>
        <property caption="yawr01">sas/yaw-r-01</property>
        <property caption="yawr1">sas/yaw-r-1</property>
        <property caption="qbar-psf">aero/qbar-psf</property>
        <property caption="phi-deg">attitude/phi-deg</property>
        <property caption="psi-deg">attitude/psi-deg</property>
        <property caption="theta-deg">attitude/theta-deg</property>
        <property caption="aileron-pos-deg">fcs/aileron-pos-deg</property> -->
        <!-- <property caption="differential-elevator-pos-deg">fcs/differential-elevator-pos-deg</property>
        <property caption="elevator-pos-deg">fcs/elevator-pos-deg</property>
        <property caption="rudder-pos-deg">fcs/rudder-pos-deg</property>
        <property caption="fbx-total-lbs">forces/fbx-total-lbs</property>
        <property caption="fby-total-lbs">forces/fby-total-lbs</property>
        <property caption="fbz-total-lbs">forces/fbz-total-lbs</property>
        <property caption="vt-fps">velocities/vt-fps</property> -->
    </output>
</fdm_config>
