<?xml version="1.0"?>
<?xml-stylesheet type="text/xsl" href="http://jsbsim.sourceforge.net/JSBSim.xsl"?>
<fdm_config name="f15" version="2.0" release="PRODUCTION"
   xmlns:xsi="http://www.w3.org/2001/XMLSchema-instance"
   xsi:noNamespaceSchemaLocation="http://jsbsim.sourceforge.net/JSBSim.xsd">

    <fileheader>
        <author>Richard Harrison</author>
        <filecreationdate>2014-08-02</filecreationdate>
        <version>1.0</version>
        <description>Models an F15. The aerodata used is based on F14a
        </description>
        <note>Aircraft origin for measurements is the nose.</note>
        <note>F-15C in the critical aft c.g. configuration has a weight of 33,467
            pounds and a c.g. location at 563.1 inches (6:12). To
            convert c.g. location in inches to percent mean aerodynamic
            chord, the following equation is used for all A through D
            models of the F-15: (measurements in inches)
            % MAC = (xcg - 508.1 * 100) / 191.33
        </note>
        <limitation></limitation>
        <reference
            refID="http://zaretto.com/f-14b"
            author="Richard Harrison"
            title="Grummnan F-14B Model for flightgear"
            date="October 24, 2014"
        />
    </fileheader>

    <!-- <system file="f-14a-engines"/> -->
    <!-- <system file="jt9d"/> -->
    <system file="f-15-hydraulic"/>
    <system file="f-15-electrics"/>
    <system file="f-15-cadc"/>
    <system file="hook"/>
    <system file="catapult"/>
    <system file="holdback"/>

    <metrics>
        <wingarea       unit="FT2">   608 </wingarea>
        <wingspan       unit="FT" >    42.8 </wingspan>
        <wing_incidence unit="DEG">     2 </wing_incidence>

        <chord     unit="IN" > 191.3 </chord>

        <location name="EYEPOINT" unit="IN">
            <x> 197 </x>
            <y>   0.00 </y>
            <z>  -3.94 </z>
        </location>
        <location name="VRP" unit="IN">
            <x>  386</x>
            <y>  0 </y>
            <z>  -13 </z>
        </location>
        <location name="AERORP" unit="IN">
            <x> 419 </x>
            <y>   0.00 </y>
            <z>   0.00 </z>
        </location>
    </metrics>

    <mass_balance>
        <location name="CG" unit="IN">
            <x> 403</x>
            <y>   0.00 </y>
            <z>   0.00 </z>
        </location>
        <ixx unit="SLUG*FT2">     28700 </ixx>
        <iyy unit="SLUG*FT2">    165100 </iyy>
        <izz unit="SLUG*FT2">    187900 </izz>
        <ixz unit="SLUG*FT2">      -520 </ixz>
        <!-- using GE F110 engines but aero is for F14A -->
        <!-- left to right; 01 pylons, 2 left tank, 3456 centre rails, 7 right tank, 89 right  pylons -->
        <emptywt unit="LBS" >28000</emptywt>
    </mass_balance>

    <!-- 0 -->
    <ground_reactions>
        <contact type="BOGEY" name="NOSE_LG">
            <location unit="IN">
                <x> 197 </x>
                <y> 0 </y>
                <z> -78.01 </z>
            </location>
            <static_friction> 0.8 </static_friction>
            <dynamic_friction> 0.5 </dynamic_friction>
            <rolling_friction> 0.02 </rolling_friction>
            <spring_coeff unit="LBS/FT"> 42500 </spring_coeff>
            <damping_coeff unit="LBS/FT/SEC"> 2000 </damping_coeff>
            <max_steer unit="DEG"> 89 </max_steer>
            <brake_group> NOSE </brake_group>
            <retractable>1</retractable>
        </contact>
        <!-- 1 -->
        <contact type="BOGEY" name="LEFT_MLG">
            <location unit="IN">
                <x> 451 </x>
                <y> -98 </y>
                <z> -82.1  </z>
            </location>
            <static_friction> 0.8 </static_friction>
            <dynamic_friction> 0.5 </dynamic_friction>
            <rolling_friction> 0.02 </rolling_friction>
            <spring_coeff unit="LBS/FT"> 42500 </spring_coeff>
            <damping_coeff unit="LBS/FT/SEC"> 2000 </damping_coeff>
            <max_steer unit="DEG"> 0.0 </max_steer>
            <brake_group> LEFT </brake_group>
            <retractable>1</retractable>
        </contact>
        <!-- 2 -->
        <contact type="BOGEY" name="RIGHT_MLG">
            <location unit="IN">
                <x> 451 </x>
                <y> 98 </y>
                <z> -82.1 </z>
            </location>
            <static_friction> 0.8 </static_friction>
            <dynamic_friction> 0.5 </dynamic_friction>
            <rolling_friction> 0.02 </rolling_friction>
            <spring_coeff unit="LBS/FT"> 42500 </spring_coeff>
            <damping_coeff unit="LBS/FT/SEC"> 2000 </damping_coeff>
            <max_steer unit="DEG"> 0.0 </max_steer>
            <brake_group> RIGHT </brake_group>
            <retractable>1</retractable>
        </contact>
       <!-- 3 -->
       <contact type="STRUCTURE" name="LEFT_WING_TIP">
            <location unit="IN">
                <x> 472 </x>
                <y> -256.8 </y>
                <z>   13 </z>
            </location>
            <static_friction> 1.2 </static_friction>
            <dynamic_friction> 1.212 </dynamic_friction>
            <rolling_friction> 1.413 </rolling_friction>
            <spring_coeff unit="LBS/FT"> 10000 </spring_coeff>
            <damping_coeff unit="LBS/FT/SEC"> 2000 </damping_coeff>
        </contact>

          <!--4-->
        <contact type="STRUCTURE" name="RIGHT_WING_TIP">
            <location unit="IN">
                <x> 472 </x>
                <y> 256.8 </y>
                <z> 13 </z>
            </location>
            <static_friction> 1.2 </static_friction>
            <dynamic_friction> 1.212 </dynamic_friction>
            <rolling_friction> 1.413 </rolling_friction>
            <spring_coeff unit="LBS/FT"> 10000 </spring_coeff>
            <damping_coeff unit="LBS/FT/SEC"> 2000 </damping_coeff>
        </contact>


        <!--  5 -->
        <contact type="STRUCTURE" name="CANOPY">
            <location unit="IN">
                <x> 214 </x>
                <y>  0 </y>
                <z> 10 </z>
            </location>
            <static_friction> 1.2 </static_friction>
            <dynamic_friction> 1.212 </dynamic_friction>
            <rolling_friction> 1.413 </rolling_friction>
            <spring_coeff unit="LBS/FT"> 41300 </spring_coeff>
            <damping_coeff unit="LBS/FT/SEC"> 8600 </damping_coeff>
        </contact>

        <!--  9 -->
        <!--<contact type="STRUCTURE" name="RADOME_FRONT">
            <location unit="IN">
                <x>  20 </x>
                <y>  0 </y>
                <z>  -18 </z>
            </location>
            <static_friction> 1.2 </static_friction>
            <dynamic_friction> 1.212 </dynamic_friction>
            <rolling_friction> 1.413 </rolling_friction>
           <spring_coeff unit="LBS/FT"> 24000 </spring_coeff>
            <damping_coeff unit="LBS/FT/SEC"> 20000 </damping_coeff>
        </contact>-->

        <!--  6 -->
        <contact type="STRUCTURE" name="LEFT_VERTICAL_TAIL">
            <location unit="IN">
                <x> 744 </x>
                <y> -98 </y>
                <z> 60 </z>
            </location>
            <static_friction> 1.2 </static_friction>
            <dynamic_friction> 1.212 </dynamic_friction>
            <rolling_friction> 1.413 </rolling_friction>
            <spring_coeff unit="LBS/FT"> 41300 </spring_coeff>
            <damping_coeff unit="LBS/FT/SEC"> 8600 </damping_coeff>
        </contact>

        <!--  7 -->
        <contact type="STRUCTURE" name="RIGHT_VERTICAL_TAIL">
            <location unit="IN">
                <x> 744 </x>
                <y>  98 </y>
                <z> 60 </z>
            </location>
            <static_friction> 1.2 </static_friction>
            <dynamic_friction> 1.212 </dynamic_friction>
            <rolling_friction> 1.413 </rolling_friction>
            <spring_coeff unit="LBS/FT"> 41300 </spring_coeff>
            <damping_coeff unit="LBS/FT/SEC"> 8600 </damping_coeff>
        </contact>
        <!-- 8 -->
        <contact type="STRUCTURE" name="REAR_BODY_LEFT">
            <location unit="IN">
                <x> 669 </x>
                <y> -58 </y>
                <z> -12 </z>
            </location>
            <static_friction> 1.2 </static_friction>
            <dynamic_friction> 1.212 </dynamic_friction>
            <rolling_friction> 1.413 </rolling_friction>
            <spring_coeff unit="LBS/FT"> 41300 </spring_coeff>
            <damping_coeff unit="LBS/FT/SEC"> 8600 </damping_coeff>
        </contact>

        <!--  9 -->
        <contact type="STRUCTURE" name="REAR_BODY_RIGHT">
            <location unit="IN">
                <x> 669 </x>
                <y>  58 </y>
                <z> -12 </z>
            </location>
            <static_friction> 1.2 </static_friction>
            <dynamic_friction> 1.212 </dynamic_friction>
            <rolling_friction> 1.413 </rolling_friction>
            <spring_coeff unit="LBS/FT"> 41300 </spring_coeff>
            <damping_coeff unit="LBS/FT/SEC"> 8600 </damping_coeff>
        </contact>
<!-- 10 -->
        <contact type="STRUCTURE" name="NOSE_CONE">
            <location unit="IN">
                <x>  0 </x>
                <y>  0 </y>
                <z>  -15 </z>
            </location>
            <static_friction> 1.2 </static_friction>
            <dynamic_friction> 1.212 </dynamic_friction>
            <rolling_friction> 1.413 </rolling_friction>
            <spring_coeff unit="LBS/FT"> 10000 </spring_coeff>
            <damping_coeff unit="LBS/FT/SEC"> 2000 </damping_coeff>
        </contact>
    </ground_reactions>

    <propulsion>
        <engine file="F100-PW-229">
            <location unit="IN">
                <x> 682 </x>
                <y> -12 </y>
                <z>   0 </z>
            </location>
            <orient unit="DEG">
                <roll> 0 </roll>
                <pitch> 0 </pitch>
                <yaw> 0 </yaw>
            </orient>
            <feed>0</feed>
            <feed>1</feed>
            <feed>3</feed>
            <feed>5</feed>
            <feed>7</feed>
            <feed>9</feed>
            <thruster file="direct">
                <location unit="IN">
                    <x> 682 </x>
                    <y> -12 </y>
                    <z>  4 </z>
                </location>
                <orient unit="DEG">
                    <roll> 0 </roll>
                    <pitch> 0 </pitch>
                    <yaw> 0 </yaw>
                </orient>
            </thruster>
        </engine>
        <engine file="F100-PW-229">
            <location unit="IN">
                <x> 682 </x>
                <y>  12 </y>
                <z>  4 </z>
            </location>
            <orient unit="DEG">
                <roll> 0 </roll>
                <pitch> 0 </pitch>
                <yaw> 0 </yaw>
            </orient>
            <feed>0</feed>
            <feed>1</feed>
            <feed>2</feed>
            <feed>4</feed>
            <feed>6</feed>
            <feed>8</feed>

            <thruster file="direct">
                <location unit="IN">
                    <x> 682 </x>
                    <y>  12 </y>
                    <z>   0 </z>
                </location>
                <orient unit="DEG">
                    <roll> 0 </roll>
                    <pitch> 0 </pitch>
                    <yaw> 0 </yaw>
                </orient>
            </thruster>
        </engine>
        <!-- Fuel tank positions are hard to determine - so the values here are based on Figure 8-2 F14AAD-1
             for the fore / aft tanks - with the other tanks moved from my original estimated position
             so that the CG remains in the range of no more than 18%.
             I also had to move the MLG forwards slightly from the diagram otherwise it was impossible to take off a
             fully laden aircraft with flaps until over 210kts (which has to be wrong and as the contact point of the
             gear isn't defined (in AFWAL-TR-80-3141) and I can only assume that those measurements are from the end of the
             radome excluding the probe. (about 20 inches according to my diagram)
        -->
        <!--  Tank 1 -->
        <tank type="FUEL">
            <location unit="IN">
                <x>422</x>
                <y>0</y>
                <z>-5.77165354</z>
            </location>
            <priority>1</priority>
            <capacity unit="LBS">3300</capacity>
            <contents unit="LBS">3300</contents>
        </tank>
        <!-- Right Engine Feed -->
        <tank type="FUEL">
            <location unit="IN">
                <x>430</x>
                <y>0</y>
                <z>-7.83464567</z>
            </location>
            <capacity unit="LBS">1500</capacity>
            <contents unit="LBS">1500</contents>
            <priority>5</priority>
        </tank>
        <!-- Left Engine Feed -->
        <tank type="FUEL">
            <location unit="IN">
                <x>430</x>
                <y>0</y>
                <z>-7.83464567</z>
            </location>
            <capacity unit="LBS">1200</capacity>
            <contents unit="LBS">1200</contents>
            <priority>6</priority>
        </tank>
        <!-- Left Wing Tank -->
        <tank type="FUEL">
            <location unit="IN">
                <x>450</x>
                <y>0</y>
                <z>-7.83464567</z>
            </location>
            <capacity unit="LBS">2750</capacity>
            <contents unit="LBS">2750</contents>
            <priority>3</priority>
        </tank>
        <!-- Right Wing Tank -->
        <tank type="FUEL">
            <location unit="IN">
                <x>450</x>
                <y>0</y>
                <z>-7.83464567</z>
            </location>
            <capacity unit="LBS">2750</capacity>
            <contents unit="LBS">2750</contents>
            <priority>4</priority>
        </tank>
        <!-- Left External Wing Tank -->
        <tank type="FUEL">
            <location unit="IN">
                <x>450</x>
                <y>0</y>
                <z>-7.83464567</z>
            </location>
            <capacity unit="LBS">3950</capacity>
            <contents unit="LBS">3950</contents>
            <priority>1</priority>
        </tank>
        <!-- Right External Wing Tank -->
        <tank type="FUEL">
            <location unit="IN">
                <x>450</x>
                <y>0</y>
                <z>-7.83464567</z>
            </location>
            <capacity unit="LBS">3950</capacity>
            <contents unit="LBS">3950</contents>
            <priority>2</priority>
        </tank>
        <!-- External Tank -->
        <tank type="FUEL">
            <location unit="IN">
                <x>450</x>
                <y>0</y>
                <z>-7.83464567</z>
            </location>
            <capacity unit="LBS">3950</capacity>
            <contents unit="LBS">3950</contents>
            <priority>0</priority>
        </tank>
        <!-- Left Feed line -->
        <tank type="FUEL">
            <location unit="IN">
                <x>454</x>
                <y>-38.58267717</y>
                <z>-47.83464567</z>
            </location>
            <capacity unit="LBS">10</capacity>
            <contents unit="LBS">10</contents>
            <priority>9</priority>
        </tank>
        <!-- Right Feed line -->
        <tank type="FUEL">
            <location unit="IN">
                <x>454</x>
                <y>38.58267717</y>
                <z>-47.83464567</z>
            </location>
            <capacity unit="LBS">10</capacity>
            <contents unit="LBS">10</contents>
            <priority>8</priority>
        </tank>
    </propulsion>


    <flight_control name="FCS F15">

        <property>fcs/hook-engage</property>
        <property>systems/hook/tailhook-cmd-norm</property>
        <property>fcs/flap-cmd-sum</property>
        <property>fcs/roll-trim-sas-cmd-norm</property>


        <channel name="Pitch">

            <summer name="Pitch Trim Sum">
                <input>fcs/elevator-cmd-norm</input>
                <input>fcs/pitch-trim-cmd-norm</input>
                <input>fcs/pitch-damper-rate</input>
                <input>systems/afcs/elevator-cmd-delta</input>
                <clipto>
                    <min> -1 </min>
                    <max>  1 </max>
                </clipto>
            </summer>

            <switch name="position/aircraft-on-ground">
                <description>Aircraft on ground</description>
                <default value="0"/>
                <test value="1" logic="OR">
                    gear/unit[0]/WOW ne 0
                    gear/unit[1]/WOW ne 0
                    gear/unit[2]/WOW ne 0
                </test>
            </switch>

            <switch name="fcs/pitch-trim-actuator">
                <default value="fcs/pitch-trim-sum"/>
                <test value="fcs/pitch-trim-actuator">
                    systems/hydraulics/flight-system-pressure ne 1
                </test>
            </switch>

            <aerosurface_scale name="Elevator Control">
                <input>fcs/pitch-trim-actuator</input>
                <!-- maybe this should take into account the trim limits from the AAP -->
                <range>
                    <min> -0.57895 </min>
                    <max>  0.2105 </max>
                </range>
                <output>fcs/elevator-pos-demand</output>
            </aerosurface_scale>


            <!-- F14a stabilizer: +/- 7deg : +/- 30 deg/sec -->
            <kinematic name="elevator position">
                <input>fcs/elevator-pos-demand</input>
                <traverse>
                    <setting>
                        <position>-1</position>
                        <time>1.75</time>
                    </setting>
                    <setting>
                        <position>1</position>
                        <time>0.90</time>
                        <!-- based on 30 deg/sec -->
                    </setting>
                </traverse>
                <output>fcs/elevator-pos-rad</output>
            </kinematic>

            <aerosurface_scale name="Differential elevator">
                <input>fcs/roll-trim-sum</input>
                <domain>
                    <min>  -1 </min>
                    <max>   1 </max>
                </domain>
                <range>
                    <min> -6 </min>
                    <max>  6 </max>
                </range>
                <output>fcs/differential-elevator-pos-deg</output>
            </aerosurface_scale>

    <aerosurface_scale name="Differential elevator">
                <input>fcs/roll-trim-sum</input>
                <domain>
                    <min>  -1 </min>
                    <max>   1 </max>
                </domain>
                <range>
                    <min> -1 </min>
                    <max>  1 </max>
                </range>
                <gain>0.3</gain>
                <output>fcs/differential-elevator-pos-norm</output>
            </aerosurface_scale>

            <summer name="Left elevator normalization">
                <input>fcs/elevator-pos-deg</input>
                <input>fcs/left-aileron-pos-deg</input>
                <output>fcs/left-elevator-pos-deg</output>
            </summer>
            <summer name="Right elevator normalization">
                <input>fcs/elevator-pos-deg</input>
                <input>-fcs/right-aileron-pos-deg</input>
                <output>fcs/right-elevator-pos-deg</output>
            </summer>

            <aerosurface_scale name="elevator normalization">
                <input>fcs/elevator-pos-rad</input>
                <domain>
                    <min>  -0.57895 </min>
                    <max>   0.21053 </max>
                </domain>
                <range>
                    <min> -1 </min>
                    <max>  1 </max>
                </range>
                <output>fcs/elevator-pos-norm</output>
            </aerosurface_scale>

        </channel>

        <property>systems/NWS/engaged</property>

        <channel name="Nose Wheel Steering">
            <switch name="systems/NWS/engaged">
                <default value="0"/>
                <test value="1">
                    gear/unit[0]/wheel-speed-fps le 135
                    systems/hydraulics/combined-system-pressure ne 0
                    position/aircraft-on-ground ne 0
                    systems/holdback/launchbar-engaged eq 0
                </test>
                <output>systems/NWS/engaged</output>
            </switch>

            <scheduled_gain name="fcs/scheduled-steer-pos-deg">
                <input>fcs/steer-cmd-norm</input>
                <table>
                    <independentVar lookup="row">gear/unit[0]/wheel-speed-fps</independentVar>
                    <independentVar lookup="column">systems/NWS/engaged</independentVar>
                    <tableData>
                            0   1
                        0   0   87
                        80  0   15
                        135 0   0
                    </tableData>
                </table>
                <output>fcs/steer-pos-deg</output>
            </scheduled_gain>
        </channel>

        <channel name="SoundFX">
            <fcs_function name="fcs/flap-windfx-volume">
                <function>
                    <product>
                        <property>velocities/ve-kts</property>
                        <property>fcs/flap-pos-norm</property>
                    </product>
                </function>
                <output>fcs/flap-windfx-volume</output>
            </fcs_function>
            <fcs_function name="fcs/gear-windfx-volume">
                <function>
                    <product>
                        <property>velocities/ve-kts</property>
                        <property>fcs/gear-control</property>
                    </product>
                </function>
                <output>fcs/gear-windfx-volume</output>
            </fcs_function>
        </channel>

        <!-- aileron: +/- 5deg : +/- 33 deg/sec -->
        <channel name="Roll">
            <summer name="Roll Trim Sum">
                <input>fcs/aileron-cmd-norm</input>
                <input>fcs/roll-trim-cmd-norm</input>
                <input>fcs/roll-trim-sas-cmd-norm</input>
                <input>fcs/roll-rate-limiter</input>
                <clipto>
                    <min> -1 </min>
                    <max>  1 </max>
                </clipto>
            </summer>

            <switch name="fcs/roll-trim-actuator">
                <default value="fcs/roll-trim-sum"/>
                <test value="fcs/roll-trim-actuator">
                    systems/hydraulics/flight-system-pressure ne 1
                </test>
            </switch>
            <aerosurface_scale name="Aileron Control">
                <input>fcs/roll-trim-actuator</input>
                <range>
                    <min> -0.22807 </min>
                    <max>  0.22807 </max>
                </range>
                <output>fcs/aileron-pos-rad</output>
            </aerosurface_scale>

    <aerosurface_scale name="Left Aileron Control">
                <input>fcs/roll-trim-actuator</input>
                <range>
                    <min> -0.22807 </min>
                    <max>  0.22807 </max>
                </range>
                <output>fcs/left-aileron-pos-rad</output>
            </aerosurface_scale>

            <aerosurface_scale name="Right Aileron Control">
                <input>fcs/roll-trim-actuator</input>
                <range>
                    <min> -0.22807 </min>
                    <max>  0.22807 </max>
                </range>
                <output>fcs/right-aileron-pos-rad</output>
            </aerosurface_scale>

               <aerosurface_scale name="left aileron normalization">
                <input>fcs/left-aileron-pos-rad</input>
                <domain>
                    <min> -0.22807 </min>
                    <max>  0.22807 </max>
                </domain>
                <range>
                    <min> -1 </min>
                    <max>  1 </max>
                </range>
                <output>fcs/left-aileron-pos-norm</output>
            </aerosurface_scale>

            <aerosurface_scale name="right aileron normalization">
                <input>fcs/right-aileron-pos-rad</input>
                <domain>
                    <min> -0.22807 </min>
                    <max>  0.22807 </max>
                </domain>
                <range>
                    <min> -1 </min>
                    <max>  1 </max>
                </range>
                <output>fcs/right-aileron-pos-norm</output>
            </aerosurface_scale>

    <aerosurface_scale name="Aileron Control">
                <input>fcs/roll-trim-actuator</input>
                <range>
                    <min> -6 </min>
                    <max>  6</max>
                </range>
                <output>fcs/aileron-pos-deg</output>
            </aerosurface_scale>


            <aerosurface_scale name="aileron normalization">
                <input>fcs/aileron-pos-rad</input>
                <domain>
                    <min> -0.22807 </min>
                    <max>  0.22807 </max>
                </domain>
                <range>
                    <min> -1 </min>
                    <max>  1 </max>
                </range>
                <output>fcs/aileron-norm</output>
            </aerosurface_scale>
        </channel>

        <property value="0">fcs/yaw-damper-enable</property>
        <property value="0">fcs/pitch-damper-enable</property>
        <property value="0">fcs/roll-sas-enable</property>
        <property value="0">fcs/external-tanks-fitted</property>
        <property value="0">fcs/aim-fitted</property>
        <property value="0">fcs/slat-cmd</property>
        <channel name="Yaw">

            <!-- yaw damper only active when in range alpha +/10 deg -->
            <switch name="fcs/yaw-damper-active">
                <default value="0.0"/>
                <test logic="AND" value="1">
                    aero/alpha-rad ge -0.175438596491228
                    aero/alpha-rad le  0.175438596491228
                    fcs/yaw-damper-enable ne 0.0
                </test>
                <output>fcs/yaw-damper-active</output>
            </switch>

            <switch name="fcs/roll-sas-active">
                <default value="0.0"/>
                <test logic="AND" value="1">
                    aero/alpha-rad ge -0.175438596491228
                    aero/alpha-rad le  0.2631578947368421
                    fcs/roll-sas-enable ne 0.0
                </test>
                <output>fcs/roll-sas-active</output>
            </switch>
            <!-- rudder limits +/-30deg 40 deg/sec-->
            <!-- stabilizer limits +/7deg 30 deg/sec-->

            <pure_gain name="Pilot G">
                <input>accelerations/n-pilot-z-norm</input>
                <gain>-1</gain>
                <output>/accelerations/pilot-gdamped</output>
            </pure_gain>

            <scheduled_gain name="Yaw Damper Rate">
                <input>velocities/r-aero-rad_sec</input>
                <table>
                    <independentVar lookup="row">velocities/ve-kts</independentVar>
                    <tableData>
                        30     0.00
                        60     2.00
                    </tableData>
                </table>
                <gain>fcs/yaw-damper-active</gain>
            </scheduled_gain>

            <switch name="fcs/pitch-damper-active">
                <default value="0.0"/>
                <test logic="AND" value="1">
                    aero/alpha-rad ge -0.175438596491228
                    aero/alpha-rad le  0.2631578947368421
                    fcs/elevator-cmd-norm ge -0.15
                    fcs/elevator-cmd-norm le 0.15
                    fcs/pitch-damper-enable ne 0.0
                </test>
                <output>fcs/pitch-damper-active</output>
            </switch>

            <scheduled_gain name="Pitch Damper Rate">
                <!-- Figure 2-57 F14AAD-1  -->
                <input>velocities/q-aero-rad_sec</input>
                <table>
                    <independentVar lookup="row">velocities/ve-kts</independentVar>
                    <tableData>
                        30     0.00
                        60     1
                    </tableData>
                </table>
                <gain>fcs/pitch-damper-active</gain>
                <min> -0.2857142857142857 </min>
                <max>  0.2857142857142857 </max>
            </scheduled_gain>

            <scheduled_gain name="fcs/roll-rate-limiter">
                <input>fcs/aileron-cmd-norm</input>
                <table>
                    <independentVar lookup="row">velocities/p-aero-rad_sec</independentVar>
                    <tableData>
                        -6.2    -1.0
                        -1.4     0.0
                        1.4     0.0
                        6.2    -1.0
                    </tableData>
                </table>
                <gain>fcs/roll-sas-active</gain>
            </scheduled_gain>


            <summer name="Rudder Command Sum">
                <input>fcs/rudder-cmd-norm</input>
                <input>fcs/yaw-trim-cmd-norm</input>
                <clipto>
                    <min> -1 </min>
                    <max>  1 </max>
                </clipto>
            </summer>

            <summer name="Rudder Sum">
                <input>fcs/rudder-command-sum</input>
                <input>fcs/yaw-damper-rate</input>
                <clipto>
                    <min> -1.1 </min>
                    <max>  1.1 </max>
                </clipto>
            </summer>

            <switch name="fcs/rudder-actuator-pos">
                <default value="fcs/rudder-sum"/>
                <test value="fcs/rudder-actuator-pos">
                    systems/hydraulics/flight-system-pressure ne 1
                </test>
            </switch>
            <kinematic name="Rudder Control">
                <input>fcs/rudder-actuator-pos</input>
                <traverse>
                    <setting>
                        <position>-0.35</position>
                        <time>0.90</time>
                        <!-- based on 30 deg/sec -->
                    </setting>
                    <setting>
                        <position>0.35</position>
                        <time>0.90</time>
                        <!-- based on 30 deg/sec -->
                    </setting>
                </traverse>
                <output>fcs/rudder-pos-rad</output>
            </kinematic>

            <aerosurface_scale name="rudder normalization">
                <input>fcs/rudder-pos-rad</input>
                <domain>
                    <min> -0.35 </min>
                    <max>  0.35 </max>
                </domain>
                <range>
                    <min> -1 </min>
                    <max>  1 </max>
                </range>
                <output>fcs/rudder-pos-norm</output>
            </aerosurface_scale>


        </channel>

        <channel name="Flaps">

            <switch name="fcs/flap-total-dmd">
                <default value="0"/>
                <test value="fcs/flap-total-dmd">
                    systems/hydraulics/combined-system-pressure ne 1
                </test>
                <test value="fcs/flap-cmd-norm">
                    fcs/flap-cmd-norm ne 0
                    systems/hydraulics/combined-system-pressure ne 0
                </test>
                <test value="systems/cadc/manuv-flap-extension-cmd">
                    systems/cadc/manuv-flap-extension-cmd ne 0
                    systems/hydraulics/combined-system-pressure ne 0
                </test>
                <clipto>
                    <min> 0 </min>
                    <max>  1 </max>
                </clipto>
                <output>fcs/flap-total-dmd</output>
            </switch>

            <switch name="fcs/slat-total-dmd">
                <default value="0"/>
                <test value="fcs/slat-total-dmd">
                    systems/hydraulics/combined-system-pressure ne 1
                </test>

                <test value="1">
                    fcs/flap-total-dmd ge 0.5
                    systems/hydraulics/combined-system-pressure ne 0
                </test>

                <test value="fcs/slat-cmd">
                    fcs/slat-cmd ne 0
                    systems/hydraulics/combined-system-pressure ne 0
                </test>
                <test value="systems/cadc/manuv-slat-extension-cmd">
                    systems/cadc/manuv-slat-extension-cmd ne 0
                    systems/hydraulics/combined-system-pressure ne 0
                </test>
                <clipto>
                    <min> 0 </min>
                    <max>  1 </max>
                </clipto>
                <output>fcs/slat-total-dmd</output>
            </switch>


            <kinematic name="Flaps Control">
                <input>fcs/flap-total-dmd</input>
                <traverse>
                    <setting>
                        <position>  0 </position>
                        <time>      0 </time>
                    </setting>
                    <setting>
                        <position> 10 </position>
                        <time>    0.4 </time>
                    </setting>
                    <setting>
                        <position> 25 </position>
                        <time>    0.6 </time>
                    </setting>
                    <setting>
                        <position> 35 </position>
                        <time>    0.8 </time>
                    </setting>
                </traverse>
                <output>fcs/flap-pos-deg</output>
            </kinematic>

            <aerosurface_scale name="flap normalization">
                <input>fcs/flap-pos-deg</input>
                <domain>
                    <min>  0 </min>
                    <max> 35 </max>
                </domain>
                <range>
                    <min> 0 </min>
                    <max> 1 </max>
                </range>
                <output>fcs/flap-pos-norm</output>
            </aerosurface_scale>


        </channel>

        <channel name="Landing Gear">
            <switch name="gear/gear-dmd-norm">
                <default value="1"/>
                <test value="1">
                    <!-- always force gear down when on ground - to prevent inadvertant retraction -->
                    position/aircraft-on-ground ne 0
                </test>
                <test value="gear/gear-dmd-norm">
                    systems/hydraulics/combined-system-pressure ne 1
                </test>
                <test value="gear/gear-cmd-norm">
                    systems/hydraulics/combined-system-pressure ne 0
                </test>
                <clipto>
                    <min> 0 </min>
                    <max>  1 </max>
                </clipto>
                <output>gear/gear-dmd-norm</output>
            </switch>
            <kinematic name="Gear Control">
                <input>gear/gear-dmd-norm</input>
                <traverse>
                    <setting>
                        <position> 0 </position>
                        <time>     0 </time>
                    </setting>
                    <setting>
                        <position> 1 </position>
                        <time>     5 </time>
                    </setting>
                </traverse>
                <output>gear/gear-pos-norm</output>
            </kinematic>

        </channel>

        <channel name="Speedbrake">
            <switch name="fcs/speedbrake-dmd-norm">
                <default value="0"/>
                <test value="fcs/speedbrake-dmd-norm">
                    systems/hydraulics/combined-system-pressure ne 1
                </test>
                <test value="fcs/speedbrake-cmd-norm">
                    systems/hydraulics/combined-system-pressure ne 0
                </test>
                <clipto>
                    <min> 0 </min>
                    <max>  1 </max>
                </clipto>
                <output>fcs/speedbrake-dmd-norm</output>
            </switch>

            <kinematic name="Speedbrake Control">
                <input>fcs/speedbrake-dmd-norm</input>
                <traverse>
                    <setting>
                        <position> 0 </position>
                        <time>     0 </time>
                    </setting>
                    <!--<setting>
          <position> 0.3 </position>
          <time>     0.5 </time>
       </setting>
       <setting>
          <position> 0.6 </position>
          <time>     0.5 </time>
       </setting>-->
                    <setting>
                        <position> 1 </position>
                        <time>     1.5 </time>
                    </setting>
                </traverse>
                <output>fcs/speedbrake-pos-norm</output>
            </kinematic>
        </channel>

        <channel name="Hook">

            <kinematic name="fcs/hook-control">
                <input>fcs/hook-engage</input>
                <traverse>
                    <setting>
                        <position>0</position>
                        <time>0</time>
                    </setting>
                    <setting>
                        <position>1</position>
                        <time>2.5</time>
                    </setting>
                </traverse>
                <output>fcs/hook-pos-norm</output>
            </kinematic>

        </channel>

        <channel name="extra-aero">
            <fcs_function name="aero/alpha-indicated-deg">
                <description>ARI nose probe; ref ADA101648 p84; alpha_true = .8122 alphaNOSEPROBE + .797deg</description>
                <function>
                    <product>
                        <sum>
                            <property> aero/alpha-deg </property>
                            <value> -0.797 </value>
                        </sum>
                        <value>1.231223836</value>
                    </product>
                </function>
            </fcs_function>
            <fcs_function name="aero/aero-rp-x-in">
                <function>
                    <description>Centre of pressure due to mach</description>
                    <sum>
                        <table>
                            <independentVar lookup="row">velocities/mach</independentVar>
                            <tableData>
                                0.00    419
                                2.4     445
                            </tableData>
                        </table>
                    </sum>
                </function>
                <output>metrics/aero-rp-x-in</output>
            </fcs_function>

            <fcs_function name="aero/cadc-control-effectivity-factor">
                <function>
                    <description>High speeds CADC control effectivity limitation of rudder and elevator</description>
                    <sum>
                        <table>
                            <independentVar lookup="row">velocities/mach</independentVar>
                            <!-- mach 2.40 with wingsweep 22deg isn't in the envelope -->
                            <tableData>
                                0.00  1.0
                                1.00  0.6
                                2.40  0.3
                            </tableData>
                        </table>
                    </sum>
                </function>
            </fcs_function>

            <!-- need %Cg in chord for moments [Xcg - Xref)/100] -->
            <summer name="cg-x-offset-chord-in">
                <input> inertia/cg-x-in</input>
                <input> -metrics/aero-rp-x-in</input>
                <output>inertia/cg-x-offset-chord-in</output>
            </summer>

            <pure_gain name="cg-x-chord-percent">
                <description>Percent offset of the CoP from the CG</description>
                <input>inertia/cg-x-offset-chord-in</input>
                <gain> -0.01</gain>
                <clipto>
                    <min> -1 </min>
                    <max> 1 </max>
                </clipto>
                <output> inertia/cg-x-mac-percent </output>
            </pure_gain>

            <fcs_function name="pb">
                <description>PB Denormalization</description>
                <function>
                    <quotient>
                        <product>
                            <property>metrics/bw-ft</property>
                            <property>velocities/p-aero-rad_sec</property>
                        </product>
                        <!-- over -->
                        <product>
                            <value>2</value>
                            <property>velocities/vt-fps</property>
                        </product>
                    </quotient>
                </function>
                <clipto>
                    <min> -1.00 </min>
                    <max>  1.00 </max>
                </clipto>
                <output>aero/pb</output>
            </fcs_function>

            <fcs_function name="cbarq-2vo">
                <description>For denormalization</description>
                <function>
                    <quotient>
                        <product>
                            <property>metrics/cbarw-ft</property>
                            <property>velocities/q-aero-rad_sec</property>
                        </product>
                        <!-- over -->
                        <product>
                            <value>2</value>
                            <property>velocities/vt-fps</property>
                        </product>
                    </quotient>
                </function>
                <clipto>
                    <min> -2.01 </min>
                    <max>  2.01 </max>
                </clipto>
                <output>aero/qb</output>
            </fcs_function>
            <fcs_function name="rb-2vo">
                <description>For denormalization</description>
                <function>
                    <quotient>
                        <product>
                            <property>metrics/bw-ft</property>
                            <property>velocities/r-aero-rad_sec</property>
                        </product>
                        <!-- over -->
                        <product>
                            <value>2</value>
                            <property>velocities/vt-fps</property>
                        </product>
                    </quotient>
                </function>
                <clipto>
                    <min> -1.00 </min>
                    <max>  1.00 </max>
                </clipto>
                <output>aero/rb</output>
            </fcs_function>


            <fcs_function name="aero-cos-alpha">
                <function>
                    <product>
                        <cos>
                            <property>aero/alpha-rad</property>
                        </cos>
                    </product>
                </function>
                <output>aero/cos-alpha</output>
            </fcs_function>

            <fcs_function name="aero-sin-alpha">
                <function>
                    <product>
                        <sin>
                            <property>aero/alpha-rad</property>
                        </sin>
                    </product>
                </function>
                <output>aero/sin-alpha</output>
            </fcs_function>


        </channel>
    </flight_control>

    <external_reactions>
        <force name="catapult" frame="BODY">
            <location unit="IN">
                <x> 667 </x>
                <y>   0 </y>
                <z>   0 </z>
            </location>
            <direction>
                <x>   1 </x>
                <y>   0 </y>
                <z>   0 </z>
            </direction>
        </force>

        <force name="holdback" frame="BODY">
            <location unit="IN">
                <x> 667 </x>
                <y>   0 </y>
                <z>   0 </z>
            </location>
            <direction>
                <x>   -1.0 </x>
                <y>    0.0 </y>
                <z>    0.0 </z>
            </direction>
        </force>

        <force name="hook" frame="BODY">
            <location unit="IN">
                <x>  300 </x>
                <y>    0 </y>
                <z>    0 </z>
            </location>
            <direction>
                <x>  -0.9995 </x>
                <y>   0.0    </y>
                <z>   0.01 </z>
            </direction>
        </force>
        <force frame="BODY" name="F110-GE-400-1">
            <location unit="IN">
                <x> 667 </x>
                <y> -45 </y>
                <z> -10 </z>
            </location>
            <direction>
                <x>  -0.9995 </x>
                <y>   0.0    </y>
                <z>   0.01 </z>
            </direction>
        </force>
        <force frame="BODY" name="F110-GE-400-2">
            <location unit="IN">
                <x> 667 </x>
                <y> 45 </y>
                <z> -10 </z>
            </location>
            <direction>
                <x>  -0.9995 </x>
                <y>   0.0    </y>
                <z>   0.01 </z>
            </direction>
        </force>


    </external_reactions>

    <output name="c:/users/richard/dev/flightgear/aircraft/f-14b/JSBOut.csv" type="CSV" rate="10">
        <simulation> ON </simulation>
        <atmosphere> ON </atmosphere>
        <massprops> ON </massprops>
        <aerosurfaces> ON </aerosurfaces>
        <rates> ON </rates>
        <velocities> ON </velocities>
        <forces> ON </forces>
        <position> ON </position>
        <coefficients> ON </coefficients>
        <ground_reactions> ON </ground_reactions>
        <fcs> ON </fcs>
        <propulsion> ON </propulsion>
        <property>fcs/speedbrake-pos-norm</property>
        <property>fcs/slat-pos-norm-deg</property>
        <property>fcs/slat-cmd-norm</property>
        <property>propulsion/engine[0]/fuel-flow-rate-pps</property>
        <property>propulsion/engine[1]/fuel-flow-rate-pps</property>
        <property>velocities/mach</property>
        <property>systems/hook/tailhook-cmd-norm</property>
        <property>systems/hook/hook-decel-force</property>
        <property>forces/fbx-prop-lbs</property>
        <property>gear/tailhook-pos-norm</property>
    </output>
    <!--The roll(L) and yaw(N) moments are due to aerodynamics only, while
   the pitch(Z), includes a thrust term. These are given by.
   L = dynamic pressure * Wing Area * Reference Span * CL
   M = dynamic pressure * Wing Area * chord * CM + ZjT
   N = dynamic pressure * Wing Area * Reference Span * CN
   -->
    <aerodynamics>

        <!-- rudimentary figures based of N2 and using values from NAVAIR 01-F14AAD-1 -->
        <function name="propulsion/engine[0]/EGT-R">
            <description>Engine 0 EGT Rankine</description>
            <sum>
                <property>atmosphere/T-R</property>
                <table>
                    <independentVar>propulsion/engine[0]/n1</independentVar>
                    <tableData>
                         0.0	0.0
                        20.0	0.0
                        30.0	541.7
                        49.0	541.7
                        62.0	631.7
                        78.0	1171.7
                        95.0	1405.7
                        99.9	1684.7
                       104.0	1684.7
                    </tableData>
                </table>
            </sum>
        </function>
        <function name="propulsion/engine[1]/EGT-R">
            <description>Engine 1 EGT Rankine</description>
            <sum>
                <property>atmosphere/T-R</property>
                <table>
                    <independentVar>propulsion/engine[1]/n1</independentVar>
                    <tableData>
                         0	0.0
                        20	0.0
                        30	541.7
                        49	541.7
                        62	631.7
                        78	1171.7
                        95	1405.7
                        99.9  1684.7
                        104	1684.7
                    </tableData>
                </table>
            </sum>
        </function>

<!-- F-15 Aerodynamic data from (AFIT/GAE/ENY/90D-16); CG 25.65%-->
    <function name="aero/coefficients/CMNRB">
    <description>ASYMMETRIC CN AT HIGH ALPHA</description>
    <product>
          <table>
            <independentVar lookup="row">aero/alpha-deg</independentVar>
            <independentVar lookup="column">aero/beta-deg</independentVar>
            <tableData>
                                -20	        -10	          0	          5	         10	         20
                    -20	 0.00000000	 0.00000000	 0.00000000	 0.00000000	 0.00000000	 0.00000000
                    -17	 0.00000000	 0.00000000	 0.00000000	 0.00000000	 0.00000000	 0.00000000
                    -14	 0.00000000	 0.00000000	 0.00000000	 0.00000000	 0.00000000	 0.00000000
                    -11	 0.00000000	 0.00000000	 0.00000000	 0.00000000	 0.00000000	 0.00000000
                     -8	 0.00000000	 0.00000000	 0.00000000	 0.00000000	 0.00000000	 0.00000000
                     -5	 0.00000000	 0.00000000	 0.00000000	 0.00000000	 0.00000000	 0.00000000
                     -2	 0.00000000	 0.00000000	 0.00000000	 0.00000000	 0.00000000	 0.00000000
                      1	 0.00000000	 0.00000000	 0.00000000	 0.00000000	 0.00000000	 0.00000000
                      4	 0.00000000	 0.00000000	 0.00000000	 0.00000000	 0.00000000	 0.00000000
                      7	 0.00000000	 0.00000000	 0.00000000	 0.00000000	 0.00000000	 0.00000000
                     10	 0.00000000	 0.00000000	 0.00000000	 0.00000000	 0.00000000	 0.00000000
                     13	 0.00000000	 0.00000000	 0.00000000	 0.00000000	 0.00000000	 0.00000000
                     16	 0.00000000	 0.00000000	 0.00000000	 0.00000000	 0.00000000	 0.00000000
                     19	 0.00000000	 0.00000000	 0.00000000	 0.00000000	 0.00000000	 0.00000000
                     22	 0.00000000	 0.00000000	 0.00000000	 0.00000000	 0.00000000	 0.00000000
                     25	 0.00000000	 0.00000000	 0.00000000	 0.00000000	 0.00000000	 0.00000000
                     28	 0.00000000	 0.00000000	 0.00000000	 0.00000000	 0.00000000	 0.00000000
                     31	 0.00000000	 0.00000000	 0.00000000	 0.00000000	 0.00000000	 0.00000000
                     34	 0.00000000	 0.00000000	 0.00000000	 0.00000000	 0.00000000	 0.00000000
                     45	 0.00000000	 0.00000000	 0.00000000	 0.00000000	 0.00566668	 0.00000000
                     60	 0.00000000	 0.00000000	 0.00000000	 0.00000000	 0.02686392	 0.00000000
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            </tableData>
          </table>
       </product>
    </function>
    <function name="aero/coefficients/CNMach">
    <description>Yaw Mach factor (NASA-TM-84643 Figure 3 Clalpha) and values for AOA derived from NASA-aaia-2000-0900 Figure 4</description>
    <product>
          <table>
            <independentVar lookup="row">velocities/mach</independentVar>
            <tableData>
                      0		 1.00000000
                    0.2		 1.00000000
                    0.6		 0.95837601
                    0.9		 0.50000000
                    1.1		 1.00000000
                    2.4		 0.50000000
            </tableData>
          </table>
       </product>
    </function>
    <function name="aero/coefficients/CYRB">
    <description>ASYMMETRIC CY AT HIGH ALPHA</description>
    <product>
          <table>
            <independentVar lookup="row">aero/alpha-deg</independentVar>
            <independentVar lookup="column">aero/beta-deg</independentVar>
            <tableData>
                                -20	        -15	        -10	         -5	          0	          5	         10	         15	         20
                    -20	 0.00000000	 0.00000000	 0.00000000	 0.00000000	 0.00000000	 0.00000000	 0.00000000	 0.00000000	 0.00000000
                    -17	 0.00000000	 0.00000000	 0.00000000	 0.00000000	 0.00000000	 0.00000000	 0.00000000	 0.00000000	 0.00000000
                    -14	 0.00000000	 0.00000000	 0.00000000	 0.00000000	 0.00000000	 0.00000000	 0.00000000	 0.00000000	 0.00000000
                    -11	 0.00000000	 0.00000000	 0.00000000	 0.00000000	 0.00000000	 0.00000000	 0.00000000	 0.00000000	 0.00000000
                     -8	 0.00000000	 0.00000000	 0.00000000	 0.00000000	 0.00000000	 0.00000000	 0.00000000	 0.00000000	 0.00000000
                     -5	 0.00000000	 0.00000000	 0.00000000	 0.00000000	 0.00000000	 0.00000000	 0.00000000	 0.00000000	 0.00000000
                     -2	 0.00000000	 0.00000000	 0.00000000	 0.00000000	 0.00000000	 0.00000000	 0.00000000	 0.00000000	 0.00000000
                      1	 0.00000000	 0.00000000	 0.00000000	 0.00000000	 0.00000000	 0.00000000	 0.00000000	 0.00000000	 0.00000000
                      4	 0.00000000	 0.00000000	 0.00000000	 0.00000000	 0.00000000	 0.00000000	 0.00000000	 0.00000000	 0.00000000
                      7	 0.00000000	 0.00000000	 0.00000000	 0.00000000	 0.00000000	 0.00000000	 0.00000000	 0.00000000	 0.00000000
                     10	 0.00000000	 0.00000000	 0.00000000	 0.00000000	 0.00000000	 0.00000000	 0.00000000	 0.00000000	 0.00000000
                     13	 0.00000000	 0.00000000	 0.00000000	 0.00000000	 0.00000000	 0.00000000	 0.00000000	 0.00000000	 0.00000000
                     16	 0.00000000	 0.00000000	 0.00000000	 0.00000000	 0.00000000	 0.00000000	 0.00000000	 0.00000000	 0.00000000
                     19	 0.00000000	 0.00000000	 0.00000000	 0.00000000	 0.00000000	 0.00000000	 0.00000000	 0.00000000	 0.00000000
                     22	 0.00000000	 0.00000000	 0.00000000	 0.00000000	 0.00000000	 0.00000000	 0.00000000	 0.00000000	 0.00000000
                     25	 0.00000000	 0.00000000	 0.00000000	 0.00000000	 0.00000000	 0.00000000	 0.00000000	 0.00000000	 0.00000000
                     28	 0.00000000	 0.00000000	 0.00000000	 0.00000000	 0.00000000	 0.00000000	 0.00000000	 0.00000000	 0.00000000
                     31	 0.00000000	 0.00000000	 0.00000000	 0.00000000	 0.00000000	 0.00000000	 0.00000000	 0.00000000	 0.00000000
                     34	 0.00000000	 0.00000000	 0.00000000	 0.00000000	 0.00000000	 0.00000000	 0.00000000	 0.00000000	 0.00000000
                     45	 0.00000000	 0.00000000	 0.00000000	 0.09682253	 0.00000727	 0.09682253	 0.00000000	 0.00000000	 0.00000000
                     60	 0.00000000	 0.00000000	 0.00000000	 0.14792225	 0.00001110	 0.14792225	 0.00000000	 0.00000000	 0.00000000
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            </tableData>
          </table>
       </product>
    </function>
    <function name="aero/coefficients/EPA43">
    <description>CNDR MULTIPLIER CLDR, CYDR DUE TO SPEEDBRAKE</description>
    <product>
          <table>
            <independentVar lookup="row">aero/alpha-deg</independentVar>
            <independentVar lookup="column">fcs/speedbrake-pos-norm</independentVar>
            <tableData>
                                  0	          5	         10	         15	         20	         25	         30	         35	         40	         45
                    -20	 1.00000000	 1.00000000	 1.00000000	 1.00000000	 1.00000000	 1.00000000	 1.00000000	 1.00000000	 1.00000000	 1.00000000
                    -17	 1.00000000	 1.00000000	 1.00000000	 1.00000000	 1.00000000	 1.00000000	 1.00000000	 1.00000000	 1.00000000	 1.00000000
                    -14	 1.00000000	 1.00000000	 1.00000000	 1.00000000	 1.00000000	 1.00000000	 1.00000000	 1.00000000	 1.00000000	 1.00000000
                    -11	 1.00000000	 1.00000000	 1.00000000	 1.00000000	 1.00000000	 1.00000000	 1.00000000	 1.00000000	 1.00000000	 1.00000000
                     -8	 1.00000000	 1.00000000	 1.00000000	 1.00000000	 1.00000000	 1.00000000	 1.00000000	 1.00000000	 1.00000000	 1.00000000
                     -5	 1.00000000	 1.00000000	 1.00000000	 1.00000000	 1.00000000	 1.00000000	 1.00000000	 1.00000000	 1.00000000	 1.00000000
                     -2	 1.00000000	 1.00000000	 1.00000000	 1.00000000	 1.00000000	 1.00000000	 1.00000000	 1.00000000	 1.00000000	 1.00000000
                      1	 1.00000000	 1.00000000	 1.00000000	 1.00000000	 1.00000000	 1.00000000	 1.00000000	 1.00000000	 1.00000000	 1.00000000
                      4	 1.00000000	 1.00000000	 1.00000000	 1.00000000	 1.00000000	 1.00000000	 1.00000000	 1.00000000	 1.00000000	 1.00000000
                      7	 1.00000000	 1.00000000	 1.00000000	 1.00000000	 1.00000000	 1.00000000	 1.00000000	 1.00000000	 1.00000000	 1.00000000
                     10	 1.00000000	 1.00000000	 1.00000000	 1.00000000	 1.00000000	 1.00000000	 1.00000000	 1.00000000	 1.00000000	 1.00000000
                     13	 1.00000000	 1.00000000	 1.00000000	 1.00000000	 1.00000000	 1.00000000	 1.00000000	 1.00000000	 1.00000000	 1.00000000
                     16	 1.00000000	 1.08520266	 1.06255253	 1.04255882	 1.02522154	 1.01054067	 0.99851623	 0.98914821	 0.98243661	 0.97838143
                     19	 1.00000000	 0.99811443	 0.97047029	 0.94548257	 0.92315126	 0.90347638	 0.88645792	 0.87209588	 0.86039027	 0.85134107
                     22	 1.00000000	 0.91726234	 0.88462418	 0.85464243	 0.82731712	 0.80264822	 0.78063574	 0.76127968	 0.74458005	 0.73053684
                     25	 1.00000000	 0.85948549	 0.82185331	 0.78687755	 0.75455821	 0.72489530	 0.69788880	 0.67353873	 0.65184508	 0.63280785
                     28	 1.00000000	 0.84162300	 0.79899680	 0.75902703	 0.72171367	 0.68705674	 0.65505623	 0.62571214	 0.59902447	 0.57499322
                     31	 1.00000000	 0.88051400	 0.83289378	 0.78792999	 0.74562262	 0.70597167	 0.66897714	 0.63463903	 0.60295734	 0.57393208
                     34	 1.00000000	 0.99299759	 0.94038336	 0.89042555	 0.84312416	 0.79847920	 0.75649065	 0.71715852	 0.68048282	 0.64646354
                     45	 1.00000000	 1.00000000	 1.00000000	 1.00000000	 1.00000000	 1.00000000	 1.00000000	 1.00000000	 1.00000000	 1.00000000
                     60	 1.00000000	 1.00000000	 1.00000000	 1.00000000	 1.00000000	 1.00000000	 1.00000000	 1.00000000	 1.00000000	 1.00000000
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            </tableData>
          </table>
       </product>
    </function>
    <function name="aero/coefficients/CdDBRK">
    <description>Drag due to speedbrakes</description>
    <product>
          <property>fcs/speedbrake-pos-norm</property>
          <table>
            <independentVar lookup="row">aero/alpha-deg</independentVar>
            <tableData>
                    -25		 0.02100000
                    -20		 0.02100000
                    -15		 0.04140000
                     -5		 0.06500000
                      0		 0.07840000
                      5		 0.06500000
                     15		 0.05140000
                     25		 0.02100000
                     40		 0.02100000
            </tableData>
          </table>
       </product>
    </function>
    <function name="aero/coefficients/CdDFM">
    <description>Delta Cd due to mean flap position</description>
    <product>
          <table>
            <independentVar lookup="row">aero/alpha-deg</independentVar>
            <independentVar lookup="column">fcs/flap-pos-deg</independentVar>
            <tableData>
                                  0	         10	         35
                    -20	 0.00000000	 0.01400000	 0.09016000
                     -5	 0.00000000	 0.02268000	 0.06894000
                      0	 0.00000000	 0.01932000	 0.06222000
                      5	 0.00000000	 0.02268000	 0.06894000
                     10	 0.00000000	 0.02548000	 0.09862000
                     25	 0.00000000	 0.02856000	 0.14286000
                     50	 0.00000000	 0.09590000	 0.55734000
            </tableData>
          </table>
       </product>
    </function>
    <function name="aero/coefficients/CdMach">
    <description>Drag increment due to mach (NASA-TP-2580 Figure 16)</description>
    <product>
          <table>
            <independentVar lookup="row">velocities/mach</independentVar>
            <tableData>
                    0.2		 0.00000000
                    0.8		 0.01236000
                   0.84		 0.01386000
                    0.9		 0.01260000
                   0.94		 0.02868000
                   0.98		 0.03838000
                   0.99		 0.04144000
                      1		 0.04247500
                   1.03		 0.02741500
                    1.2		 0.02551000
                   1.25		 0.01687500
                    1.7		 0.01250000
                      2		-0.00630000
                   2.17		-0.01225000
                   2.47		-0.01305000
            </tableData>
          </table>
       </product>
    </function>
    <function name="aero/coefficients/CdUC">
    <description>Cd increment due to gear</description>
    <product>
          <property>gear/gear-pos-norm</property>
          <table>
            <independentVar lookup="row">aero/alpha-deg</independentVar>
            <tableData>
                    -10		 0.00000000
                     -5		 0.00017000
                      0		 0.00001000
                      5		 0.00005000
                     10		 0.00000000
            </tableData>
          </table>
       </product>
    </function>
    <function name="aero/coefficients/CFXB">
    <description>BASIC DRAG</description>
    <product>
          <table>
            <independentVar lookup="row">aero/alpha-deg</independentVar>
            <independentVar lookup="column">fcs/elevator-pos-deg</independentVar>
            <tableData>
                                -30	        -25	        -20	        -15	        -10	         -5	          0	          5	         10	         15	         20	         25	         30
                    -20	 0.74553106	 0.69300407	 0.64069530	 0.58898578	 0.53824093	 0.48880644	 0.44100423	 0.39512876	 0.35144360	 0.31017830	 0.27152574	 0.23563999	 0.20263468
                    -17	 0.60119036	 0.55689599	 0.51292539	 0.46960908	 0.42726183	 0.38617886	 0.34663237	 0.30886815	 0.27310268	 0.23952049	 0.20827199	 0.17947186	 0.15319795
                    -14	 0.43396391	 0.39981644	 0.36609196	 0.33305550	 0.30095646	 0.27002544	 0.24047129	 0.21247843	 0.18620458	 0.16177878	 0.13930001	 0.11883628	 0.10042431
                    -11	 0.27969422	 0.25576132	 0.23230407	 0.20951701	 0.18757984	 0.16665490	 0.14688507	 0.12839180	 0.11127369	 0.09560539	 0.08143709	 0.06879457	 0.05767984
                     -8	 0.16003415	 0.14498399	 0.13039693	 0.11640143	 0.10311278	 0.09063154	 0.07904214	 0.06841197	 0.05879082	 0.05021086	 0.04268708	 0.03621846	 0.03078980
                     -5	 0.08125944	 0.07298546	 0.06510528	 0.05769368	 0.05081523	 0.04452355	 0.03886101	 0.03385867	 0.02953690	 0.02590636	 0.02296967	 0.02072373	 0.01916275
                     -2	 0.03819579	 0.03446390	 0.03103365	 0.02794479	 0.02523114	 0.02292090	 0.02103724	 0.01959945	 0.01862457	 0.01812962	 0.01813441	 0.01866521	 0.01975905
                      1	 0.02053667	 0.01953463	 0.01877147	 0.01827466	 0.01807151	 0.01819042	 0.01866260	 0.01952429	 0.02081955	 0.02260371	 0.02494746	 0.02794177	 0.03170365
                      4	 0.01894264	 0.01965451	 0.02063218	 0.02191559	 0.02355165	 0.02559653	 0.02811844	 0.03120101	 0.03494721	 0.03948403	 0.04496789	 0.05159086	 0.05958776
                      7	 0.02908810	 0.03145996	 0.03427125	 0.03759896	 0.04153549	 0.04619194	 0.05170196	 0.05822618	 0.06595740	 0.07512639	 0.08600864	 0.09893182	 0.11428436
                     10	 0.05285788	 0.05775923	 0.06346358	 0.07010767	 0.07785309	 0.08689059	 0.09744496	 0.10978056	 0.12420758	 0.14108912	 0.16084907	 0.18398096	 0.21105777
                     13	 0.09687182	 0.10588629	 0.11627900	 0.12826555	 0.14209660	 0.15806315	 0.17650237	 0.19780419	 0.22241863	 0.25086402	 0.28373606	 0.32171787	 0.36559112
                     16	 0.16921948	 0.18431838	 0.20157798	 0.22130712	 0.24386033	 0.26964396	 0.29912297	 0.33282846	 0.37136605	 0.41542512	 0.46578899	 0.52334617	 0.58910258
                     19	 0.27562501	 0.29878626	 0.32506654	 0.35487674	 0.38868409	 0.42701906	 0.47048302	 0.51975669	 0.57560938	 0.63890927	 0.71063457	 0.79188584	 0.88389930
                     22	 0.43532518	 0.46398287	 0.49688659	 0.53449846	 0.57734027	 0.62600029	 0.68114085	 0.74350657	 0.81393348	 0.89335891	 0.98283238	 1.08352744	 1.19675449
                     25	 0.64846380	 0.66651987	 0.68956836	 0.71791796	 0.75191541	 0.79194959	 0.83845612	 0.89192226	 0.95289236	 1.02197381	 1.09984346	 1.18725466	 1.28504485
                     28	 0.82165592	 0.82071465	 0.82461679	 0.83343618	 0.84725547	 0.86616697	 0.89027369	 0.91969045	 0.95454504	 0.99497952	 1.04115165	 1.09323641	 1.15142768
                     31	 0.94347245	 0.93614291	 0.93347466	 0.93546770	 0.94212203	 0.95343764	 0.96941454	 0.99005273	 1.01535221	 1.04531298	 1.07993503	 1.11921837	 1.16316300
                     34	 1.05662679	 1.04929726	 1.04662901	 1.04862204	 1.05527637	 1.06659198	 1.08256889	 1.10320708	 1.12850655	 1.15846732	 1.19308937	 1.23237271	 1.27631734
                     45	 1.42934950	 1.42201996	 1.41935171	 1.42134475	 1.42799907	 1.43931469	 1.45529159	 1.47592978	 1.50122925	 1.53119002	 1.56581207	 1.60509541	 1.64904004
                     60	 1.76895684	 1.76162731	 1.75895906	 1.76095209	 1.76760642	 1.77892203	 1.79489894	 1.81553713	 1.84083660	 1.87079737	 1.90541942	 1.94470276	 1.98864739
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            </tableData>
          </table>
       </product>
    </function>
    <function name="aero/coefficients/CFZB">
    <description>BASIC LIFT</description>
    <product>
          <table>
            <independentVar lookup="row">aero/alpha-deg</independentVar>
            <independentVar lookup="column">fcs/elevator-pos-deg</independentVar>
            <tableData>
                                -30	        -25	        -20	        -15	        -10	         -5	          0	          5	         10	         15	         20	         25	         30
                    -20	-1.18316951	-1.15605351	-1.12739696	-1.09719988	-1.06546225	-1.03218409	-0.99736539	-0.96100615	-0.92310637	-0.88366606	-0.84268520	-0.80016381	-0.75610188
                    -17	-1.10450973	-1.07739372	-1.04873718	-1.01854009	-0.98680247	-0.95352431	-0.91870561	-0.88234637	-0.84444659	-0.80500628	-0.76402542	-0.72150403	-0.67744210
                    -14	-0.99198714	-0.96487113	-0.93621458	-0.90601750	-0.87427988	-0.84100171	-0.80618301	-0.76982378	-0.73192400	-0.69248368	-0.65150283	-0.60898144	-0.56491950
                    -11	-0.85172121	-0.82460520	-0.79594865	-0.76575157	-0.73401394	-0.70073578	-0.66591708	-0.62955784	-0.59165806	-0.55221775	-0.51123689	-0.46871550	-0.42465357
                     -8	-0.68948059	-0.66236458	-0.63370803	-0.60351095	-0.57177333	-0.53849516	-0.50367646	-0.46731722	-0.42941745	-0.38997713	-0.34899628	-0.30647488	-0.26241295
                     -5	-0.51068313	-0.48356712	-0.45491058	-0.42471349	-0.39297587	-0.35969771	-0.32487901	-0.28851977	-0.25061999	-0.21117967	-0.17019882	-0.12767743	-0.08361550
                     -2	-0.32039586	-0.29327985	-0.26462331	-0.23442622	-0.20268860	-0.16941044	-0.13459174	-0.09823250	-0.06033272	-0.02089240	 0.02008845	 0.06260984	 0.10667177
                      1	-0.12333500	-0.09621899	-0.06756244	-0.03736536	-0.00562773	 0.02765043	 0.06246913	 0.09882837	 0.13672815	 0.17616846	 0.21714932	 0.25967071	 0.30373264
                      4	 0.07613406	 0.10325007	 0.13190662	 0.16210370	 0.19384133	 0.22711949	 0.26193819	 0.29829743	 0.33619721	 0.37563752	 0.41661838	 0.45913977	 0.50320170
                      7	 0.27399673	 0.30111274	 0.32976929	 0.35996637	 0.39170399	 0.42498216	 0.45980086	 0.49616009	 0.53405987	 0.57350019	 0.61448104	 0.65700243	 0.70106437
                     10	 0.46658923	 0.49370524	 0.52236179	 0.55255887	 0.58429649	 0.61757466	 0.65239336	 0.68875259	 0.72665237	 0.76609269	 0.80707354	 0.84959493	 0.89365686
                     13	 0.65059860	 0.67771461	 0.70637116	 0.73656824	 0.76830586	 0.80158403	 0.83640273	 0.87276197	 0.91066174	 0.95010206	 0.99108291	 1.03360431	 1.07766624
                     16	 0.82306270	 0.85017871	 0.87883525	 0.90903234	 0.94076996	 0.97404812	 1.00886682	 1.04522606	 1.08312584	 1.12256616	 1.16354701	 1.20606840	 1.25013033
                     19	 0.98137019	 1.00848620	 1.03714275	 1.06733983	 1.09907745	 1.13235562	 1.16717432	 1.20353355	 1.24143333	 1.28087365	 1.32185450	 1.36437589	 1.40843783
                     22	 1.12326056	 1.15037656	 1.17903311	 1.20923020	 1.24096782	 1.27424598	 1.30906468	 1.34542392	 1.38332370	 1.42276401	 1.46374487	 1.50626626	 1.55032819
                     25	 1.24682409	 1.27394010	 1.30259665	 1.33279373	 1.36453135	 1.39780952	 1.43262822	 1.46898746	 1.50688723	 1.54632755	 1.58730840	 1.62982979	 1.67389173
                     28	 1.35050190	 1.37761791	 1.40627446	 1.43647154	 1.46820917	 1.50148733	 1.53630603	 1.57266527	 1.61056505	 1.65000536	 1.69098622	 1.73350761	 1.77756954
                     31	 1.43308592	 1.46020193	 1.48885847	 1.51905556	 1.55079318	 1.58407134	 1.61889004	 1.65524928	 1.69314906	 1.73258937	 1.77357023	 1.81609162	 1.86015355
                     34	 1.49371887	 1.52083488	 1.54949142	 1.57968851	 1.61142613	 1.64470429	 1.67952299	 1.71588223	 1.75378201	 1.79322233	 1.83420318	 1.87672457	 1.92078650
                     45	 1.52383122	 1.55094722	 1.57960377	 1.60980086	 1.64153848	 1.67481664	 1.70963534	 1.74599458	 1.78389436	 1.82333467	 1.86431553	 1.90683692	 1.95089885
                     60	 1.12441409	 1.15153009	 1.18018664	 1.21038373	 1.24212135	 1.27539951	 1.31021821	 1.34657745	 1.38447723	 1.42391754	 1.46489840	 1.50741979	 1.55148172
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            </tableData>
          </table>
       </product>
    </function>
    <function name="aero/coefficients/ClDFM">
    <description>Delta Cl due to mean  flap position</description>
    <product>
          <table>
            <independentVar lookup="row">aero/alpha-deg</independentVar>
            <independentVar lookup="column">fcs/flap-pos-deg</independentVar>
            <tableData>
                                  0	         10	         35	         50
                    -20	 0.00000000	-0.01400000	-0.09016000	-0.24500000
                     -5	 0.00000000	-0.13160000	-0.25872000	-0.60200000
                      0	 0.00000000	 0.13440000	 0.25480000	 0.59500000
                      5	 0.00000000	 0.13160000	 0.25872000	 0.60200000
                     10	 0.00000000	 0.12880000	 0.29872000	 0.58800000
                     25	 0.00000000	 0.10920000	 0.21560000	 0.46200000
                     50	 0.00000000	 0.01400000	 0.22540000	 0.24500000
            </tableData>
          </table>
       </product>
    </function>
    <function name="aero/coefficients/ClMach">
    <description>Lift Mach factor (NASA-TM-84643 Figure 3 Clalpha) and values for AOA derived from NASA-aaia-2000-0900 Figure 4</description>
    <product>
          <table>
            <independentVar lookup="row">velocities/mach</independentVar>
            <tableData>
                      0		 1.00000000
                    0.2		 1.00000000
                    0.6		 0.95837601
                    0.9		 0.50000000
                    1.1		 1.00000000
                    2.4		 0.50000000
            </tableData>
          </table>
       </product>
    </function>
    <function name="aero/coefficients/ClUC">
    <description>Cl increment due to gear</description>
    <product>
          <property>gear/gear-pos-norm</property>
          <table>
            <independentVar lookup="row">aero/alpha-deg</independentVar>
            <tableData>
                    -10		 0.00000000
                      0		-0.00120000
                      8		-0.00100000
                     12		-0.00040000
                     14		-0.00020000
                     16		-0.00010000
                     18		 0.00000000
            </tableData>
          </table>
       </product>
    </function>
    <function name="aero/coefficients/CMDFM">
    <description>CM increment due to flap mean position</description>
    <product>
          <table>
            <independentVar lookup="row">aero/alpha-deg</independentVar>
            <independentVar lookup="column">fcs/flap-pos-deg</independentVar>
            <tableData>
                                  0	          5	         15	         35
                      0	 0.00000000	 0.01320000	 0.01520000	 0.01696000
                      5	 0.00000000	 0.00396000	 0.00456000	 0.01523000
                     10	 0.00000000	 0.00589000	 0.00649000	 0.01355000
                     15	 0.00000000	 0.00762000	 0.01045000	 0.01092000
                     20	 0.00000000	 0.00798000	 0.00798000	 0.01148000
                     60	 0.00000000	 0.00342000	 0.00342000	 0.01148000
            </tableData>
          </table>
       </product>
    </function>
    <function name="aero/coefficients/CMM1">
    <description>BASIC PITCHING MOMENT - CM</description>
    <product>
          <property>aero/cadc-control-effectivity-factor</property>
          <table>
            <independentVar lookup="row">aero/alpha-deg</independentVar>
            <independentVar lookup="column">fcs/elevator-pos-deg</independentVar>
            <tableData>
                                -30	        -25	        -20	        -15	        -10	         -5	          0	          5	         10	         15	         20	         25	         30
                    -20	 0.45952289	 0.37945456	 0.31014266	 0.24943593	 0.19518306	 0.14523277	 0.09743376	 0.04963476	-0.00031553	-0.05456840	-0.11527513	-0.18458703	-0.26465536
                    -17	 0.38937924	 0.31040985	 0.24219691	 0.18258912	 0.12943520	 0.08058386	 0.03388381	-0.01281625	-0.06166759	-0.11482151	-0.17442930	-0.24264224	-0.32161163
                    -14	 0.35515436	 0.27728392	 0.21016993	 0.15166109	 0.09960612	 0.05185372	 0.00625262	-0.03934849	-0.08710088	-0.13915585	-0.19766469	-0.26477869	-0.34264913
                    -11	 0.34125892	 0.26448743	 0.19847238	 0.14106249	 0.09010647	 0.04345302	-0.00104913	-0.04555129	-0.09220473	-0.14316076	-0.20057065	-0.26658570	-0.34335719
                     -8	 0.33670631	 0.26103376	 0.19611767	 0.13980672	 0.08994965	 0.04439515	 0.00099194	-0.04241126	-0.08796576	-0.13782283	-0.19413378	-0.25904987	-0.33472242
                     -5	 0.33416405	 0.25959045	 0.19577330	 0.14056131	 0.09180318	 0.04734764	 0.00504338	-0.03726088	-0.08171643	-0.13047456	-0.18568655	-0.24950370	-0.32407729
                     -2	 0.32912996	 0.25565532	 0.19293712	 0.13882407	 0.09116489	 0.04780829	 0.00660298	-0.03460233	-0.07795893	-0.12561810	-0.17973115	-0.24244935	-0.31592400
                      1	 0.31922512	 0.24684942	 0.18523016	 0.13221607	 0.08565584	 0.04339819	 0.00329183	-0.03681454	-0.07907219	-0.12563242	-0.17864651	-0.24026576	-0.31264146
                      4	 0.30359561	 0.23231886	 0.17179856	 0.11988341	 0.07442213	 0.03326342	-0.00574399	-0.04475140	-0.08591010	-0.13137139	-0.18328653	-0.24380684	-0.31508359
                      7	 0.28241528	 0.21223748	 0.15281613	 0.10199993	 0.05763759	 0.01757784	-0.02033062	-0.05823909	-0.09829884	-0.14266118	-0.19347737	-0.25289873	-0.32307653
                     10	 0.25648135	 0.18740250	 0.12908009	 0.07936284	 0.03609945	-0.00286135	-0.03967087	-0.07648038	-0.11544119	-0.15870457	-0.20842182	-0.26674423	-0.33582308
                     13	 0.22689504	 0.15891513	 0.10169167	 0.05307337	 0.01090894	-0.02695292	-0.06266349	-0.09837406	-0.13623591	-0.17840035	-0.22701865	-0.28424211	-0.35222201
                     16	 0.19481928	 0.12793833	 0.07181382	 0.02429446	-0.01677102	-0.05353393	-0.08814555	-0.12275717	-0.15952008	-0.20058556	-0.24810492	-0.30422943	-0.37111038
                     19	 0.16130552	 0.09552351	 0.04049795	-0.00592245	-0.04588899	-0.08155295	-0.11506562	-0.14857829	-0.18424225	-0.22420879	-0.27062919	-0.32565476	-0.39143676
                     22	 0.12718163	 0.06249857	 0.00857196	-0.03674949	-0.07561708	-0.11018209	-0.14259582	-0.17500954	-0.20957455	-0.24844214	-0.29376360	-0.34769021	-0.41237327
                     25	 0.09299310	 0.02940899	-0.02341868	-0.06764118	-0.10540982	-0.13887589	-0.17019066	-0.20150543	-0.23497150	-0.27274014	-0.31696265	-0.36979031	-0.43337442
                     28	 0.05898940	-0.00349576	-0.05522448	-0.09834804	-0.13501773	-0.16738484	-0.19760067	-0.22781649	-0.26018361	-0.29685330	-0.33997686	-0.39170558	-0.45419074
                     31	 0.02514773	-0.03623848	-0.08686825	-0.12889286	-0.16446360	-0.19573177	-0.22484865	-0.25396552	-0.28523369	-0.32080443	-0.36282904	-0.41345881	-0.47484502
                     34	-0.00877391	-0.06906118	-0.11859200	-0.15951766	-0.19398945	-0.22415867	-0.25217660	-0.28019453	-0.31036374	-0.34483554	-0.38576120	-0.43529202	-0.49557928
                     45	-0.14036435	-0.19662214	-0.24212348	-0.27901966	-0.30946198	-0.33560172	-0.35959017	-0.38357862	-0.40971836	-0.44016067	-0.47705686	-0.52255820	-0.57881598
                     60	-0.34713052	-0.39789356	-0.43790016	-0.46930160	-0.49424917	-0.51489417	-0.53338787	-0.55188158	-0.57252658	-0.59747415	-0.62887559	-0.66888219	-0.71964523
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            </tableData>
          </table>
       </product>
    </function>
    <function name="aero/coefficients/CMMach">
    <description>Pitch Mach factor (NASA-TM-84643 Figure 3 Clalpha) and values for AOA derived from NASA-aaia-2000-0900 Figure 4</description>
    <product>
          <table>
            <independentVar lookup="row">velocities/mach</independentVar>
            <tableData>
                      0		 1.00000000
                    0.2		 1.00000000
                    0.6		 0.95837601
                    0.9		 0.50000000
                    1.1		 1.00000000
                    2.4		 0.50000000
            </tableData>
          </table>
       </product>
    </function>
    <function name="aero/coefficients/CMMQ">
    <description>PITCH DAMPING DERIVATIVE - CMQ</description>
    <product>
          <property>aero/qb</property>
          <table>
            <independentVar lookup="row">aero/alpha-deg</independentVar>
            <tableData>
                    -19		 1.28046091
                    -18		 0.06779284
                    -15		-10.63663459
                    -12		-11.98901285
                     -9		-5.14643535
                     -6		-1.73694028
                     -3		-3.03302745
                      0		-4.33509000
                      3		-4.19691715
                      6		-3.92979167
                      9		-4.14194274
                     12		-5.95197929
                     15		-9.31395430
                     18		-8.60337414
                     21		-5.54389229
                     24		-3.26850300
                     27		-3.79236893
                     30		-7.13315000
                     33		-11.61197623
                     40		-14.45180000
                     55		-3.61089256
                     60		-4.89707200
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            </tableData>
          </table>
       </product>
    </function>
    <function name="aero/coefficients/CMUC">
    <description>CM increment due to gear</description>
    <product>
          <property>gear/gear-pos-norm</property>
          <table>
            <independentVar lookup="row">aero/alpha-deg</independentVar>
            <tableData>
                    -10		 0.00000000
                     -4		 0.00000000
                      0		-0.01750000
                      5		-0.01000000
                     10		-0.00250000
                     20		 0.00000000
            </tableData>
          </table>
       </product>
    </function>
    <function name="aero/coefficients/DCMAIM">
    <description>Pitch moment increment due to aim missiles</description>
    <product>
          <property>fcs/aim-fitted</property>
          <table>
            <independentVar lookup="row">aero/alpha-deg</independentVar>
            <independentVar lookup="column">velocities/mach</independentVar>
            <tableData>
                                0.8	       0.85	        0.9
                     -6	-0.01500000	-0.03300000	-0.03200000
                     -5	-0.01500000	-0.03100000	-0.03100000
                     -4	-0.01500000	-0.03000000	-0.03000000
                     -3	-0.01000000	-0.02200000	-0.02800000
                     -2	-0.00500000	-0.01000000	-0.02000000
                     -1	-0.00300000	-0.00400000	-0.00600000
                      0	-0.00200000	-0.00300000	-0.00200000
                      1	-0.00100000	-0.00200000	 0.00000000
                      2	 0.00000000	 0.00000000	 0.00200000
                      3	 0.00200000	 0.00300000	 0.00400000
                      4	 0.00300000	 0.00600000	 0.00700000
                      5	 0.00500000	 0.00700000	 0.00700000
                      6	 0.01000000	 0.00800000	 0.00600000
                      7	 0.01000000	 0.01000000	 0.01600000
                      8	 0.00500000	 0.01000000	 0.01200000
                      9	 0.00300000	 0.00600000	 0.01200000
                     10	 0.00000000	 0.00400000	 0.01200000
                     20	 0.00000000	 0.00400000	 0.01200000
            </tableData>
          </table>
       </product>
    </function>
    <function name="aero/coefficients/CLMach">
    <description>Roll Mach factor (NASA-TM-84643 Figure 3 Clalpha) and values for AOA derived from NASA-aaia-2000-0900 Figure 4</description>
    <product>
          <table>
            <independentVar lookup="row">velocities/mach</independentVar>
            <tableData>
                      0		 1.00000000
                    0.2		 1.00000000
                    0.6		 0.95837601
                    0.9		 0.50000000
                    1.1		 1.00000000
                    2.4		 0.50000000
            </tableData>
          </table>
       </product>
    </function>
    <function name="aero/coefficients/CML1">
    <description>BASIC ROLLING MOMENT - CL(BETA)</description>
    <product>
          <property>aero/cadc-control-effectivity-factor</property>
          <table>
            <independentVar lookup="row">aero/alpha-deg</independentVar>
            <independentVar lookup="column">aero/beta-deg</independentVar>
            <tableData>
                                -20	        -15	        -10	         -5	          0	          5	         10	         15	         20
                    -20	 0.00469432	-0.00012868	-0.00490692	-0.00962738	 0.00000000	 0.00962738	 0.00490692	 0.00012868	-0.00469432
                    -17	 0.00614262	 0.00104818	-0.00400149	-0.00899339	 0.00000000	 0.00899339	 0.00400149	-0.00104818	-0.00614262
                    -14	 0.00922801	 0.00386213	-0.00145898	-0.00672231	 0.00000000	 0.00672231	 0.00145898	-0.00386213	-0.00922801
                    -11	 0.01324756	 0.00761025	 0.00201771	-0.00351706	 0.00000000	 0.00351706	-0.00201771	-0.00761025	-0.01324756
                     -8	 0.01765672	 0.01174797	 0.00588399	 0.00007779	 0.00000000	-0.00007779	-0.00588399	-0.01174797	-0.01765672
                     -5	 0.02204859	 0.01586841	 0.00973299	 0.00365535	 0.00000000	-0.00365535	-0.00973299	-0.01586841	-0.02204859
                     -2	 0.02613460	 0.01968298	 0.01327612	 0.00692705	 0.00000000	-0.00692705	-0.01327612	-0.01968298	-0.02613460
                      1	 0.02972632	 0.02300327	 0.01632498	 0.00970447	 0.00000000	-0.00970447	-0.01632498	-0.02300327	-0.02972632
                      4	 0.03271872	 0.02572422	 0.01877450	 0.01188255	 0.00000000	-0.01188255	-0.01877450	-0.02572422	-0.03271872
                      7	 0.03507449	 0.02780857	 0.02058741	 0.01342402	 0.00000000	-0.01342402	-0.02058741	-0.02780857	-0.03507449
                     10	 0.03680983	 0.02927247	 0.02177987	 0.01434505	 0.00000000	-0.01434505	-0.02177987	-0.02927247	-0.03680983
                     13	 0.03798129	 0.03017249	 0.02240846	 0.01470220	 0.00000000	-0.01470220	-0.02240846	-0.03017249	-0.03798129
                     16	 0.03867403	 0.03059379	 0.02255833	 0.01458063	 0.00000000	-0.01458063	-0.02255833	-0.03059379	-0.03867403
                     19	 0.03899119	 0.03063952	 0.02233261	 0.01408349	 0.00000000	-0.01408349	-0.02233261	-0.03063952	-0.03899119
                     22	 0.03904457	 0.03042147	 0.02184313	 0.01332256	 0.00000000	-0.01332256	-0.02184313	-0.03042147	-0.03904457
                     25	 0.03894653	 0.03005199	 0.02120222	 0.01241022	 0.00000000	-0.01241022	-0.02120222	-0.03005199	-0.03894653
                     28	 0.03880307	 0.02963709	 0.02051588	 0.01145244	 0.00000000	-0.01145244	-0.02051588	-0.02963709	-0.03880307
                     31	 0.03870815	 0.02927074	 0.01987809	 0.01054322	 0.00000000	-0.01054322	-0.01987809	-0.02927074	-0.03870815
                     34	 0.03873925	 0.02903040	 0.01936632	 0.00976001	 0.00000000	-0.00976001	-0.01936632	-0.02903040	-0.03873925
                     45	 0.04062644	 0.02992233	 0.01926298	 0.00866140	 0.00000000	-0.00866140	-0.01926298	-0.02992233	-0.04062644
                     60	 0.04674521	 0.03468392	 0.02266739	 0.01070864	 0.00000000	-0.01070864	-0.02266739	-0.03468392	-0.04674521
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            </tableData>
          </table>
       </product>
    </function>
    <function name="aero/coefficients/CMLDAD">
    <description>ROLLING MOMENT DUE TO AILERON DEFLECTION (CLDA)</description>
    <product>
          <property>fcs/aileron-pos-deg</property>
          <table>
            <independentVar lookup="row">aero/alpha-deg</independentVar>
            <tableData>
                    -20		 0.00553624
                    -19		 0.00549089
                    -16		 0.00544513
                    -13		 0.00548472
                    -10		 0.00556148
                     -7		 0.00564332
                     -4		 0.00571073
                     -1		 0.00575375
                      2		 0.00576941
                      5		 0.00575954
                      8		 0.00572894
                     11		 0.00568396
                     14		 0.00563135
                     17		 0.00557741
                     20		 0.00552736
                     23		 0.00548504
                     26		 0.00545271
                     29		 0.00543106
                     32		 0.00541934
                     35		 0.00541566
                     50		 0.00541560
                     60		 0.00534586
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            </tableData>
          </table>
       </product>
    </function>
    <function name="aero/coefficients/CMLDCLB">
    <description>DELTA CLB DUE TO 2-PLACE CANOPY</description>
    <product>
          <property>aero/beta-deg</property>
          <table>
            <independentVar lookup="row">aero/alpha-deg</independentVar>
            <tableData>
                    -20		-0.00006000
                    -19		-0.00006000
                    -16		-0.00006000
                    -13		-0.00006000
                    -10		-0.00006000
                     -7		-0.00006000
                     -4		-0.00006000
                     -1		-0.00006000
                      2		-0.00005556
                      5		-0.00003743
                      8		-0.00001556
                     11		-0.00000118
                     14		 0.00000000
                     17		 0.00000000
                     20		 0.00000000
                     23		 0.00000000
                     26		 0.00000000
                     29		 0.00000000
                     32		 0.00000000
                     35		 0.00000000
                     50		 0.00000000
                     60		 0.00000000
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            </tableData>
          </table>
       </product>
    </function>
    <function name="aero/coefficients/CMLDRD">
    <description>ROLLING MOMENT DUE TO RUDDER DEFLECTION -(CLD)</description>
    <product>
          <property>fcs/rudder-pos-deg</property>
          <value>0.85 <!-- DRFLX1 --></value>
          <property>aero/coefficients/EPA43</property>
          <table>
            <independentVar lookup="row">aero/alpha-deg</independentVar>
            <independentVar lookup="column">fcs/rudder-pos-deg</independentVar>
            <tableData>
                                -30	        -25	        -20	        -15	        -10	         -5	          0	          5	         10	         15	         20	         25	         30
                    -20	 0.00003464	 0.00004739	 0.00005451	 0.00005664	 0.00005443	 0.00004851	 0.00003953	 0.00002813	 0.00001496	 0.00000066	-0.00001412	-0.00002875	-0.00004258
                    -17	-0.00004247	-0.00002804	-0.00001924	-0.00001542	-0.00001596	-0.00002020	-0.00002750	-0.00003721	-0.00004870	-0.00006132	-0.00007443	-0.00008737	-0.00009952
                    -14	-0.00003675	-0.00002064	-0.00001016	-0.00000466	-0.00000352	-0.00000608	-0.00001170	-0.00001973	-0.00002954	-0.00004048	-0.00005190	-0.00006317	-0.00007363
                    -11	 0.00000044	 0.00001824	 0.00003040	 0.00003757	 0.00004040	 0.00003952	 0.00003558	 0.00002923	 0.00002110	 0.00001185	 0.00000210	-0.00000748	-0.00001627
                     -8	 0.00003883	 0.00005831	 0.00007215	 0.00008100	 0.00008551	 0.00008631	 0.00008406	 0.00007938	 0.00007294	 0.00006536	 0.00005730	 0.00004939	 0.00004229
                     -5	 0.00006345	 0.00008461	 0.00010013	 0.00011067	 0.00011686	 0.00011934	 0.00011877	 0.00011577	 0.00011101	 0.00010511	 0.00009873	 0.00009251	 0.00008708
                     -2	 0.00006989	 0.00009273	 0.00010994	 0.00012215	 0.00013002	 0.00013419	 0.00013529	 0.00013398	 0.00013090	 0.00012668	 0.00012198	 0.00011744	 0.00011369
                      1	 0.00006037	 0.00008489	 0.00010378	 0.00011767	 0.00012722	 0.00013307	 0.00013586	 0.00013623	 0.00013482	 0.00013229	 0.00012927	 0.00012641	 0.00012435
                      4	 0.00004067	 0.00006687	 0.00008744	 0.00010301	 0.00011424	 0.00012177	 0.00012624	 0.00012829	 0.00012857	 0.00012771	 0.00012637	 0.00012519	 0.00012481
                      7	 0.00001775	 0.00004563	 0.00006787	 0.00008513	 0.00009804	 0.00010725	 0.00011340	 0.00011713	 0.00011909	 0.00011992	 0.00012026	 0.00012076	 0.00012206
                     10	-0.00000193	 0.00002763	 0.00005156	 0.00007050	 0.00008509	 0.00009598	 0.00010381	 0.00010922	 0.00011286	 0.00011537	 0.00011739	 0.00011957	 0.00012255
                     13	-0.00001350	 0.00001774	 0.00004335	 0.00006397	 0.00008024	 0.00009281	 0.00010232	 0.00010942	 0.00011474	 0.00011893	 0.00012263	 0.00012649	 0.00013115
                     16	-0.00001434	 0.00001858	 0.00004587	 0.00006818	 0.00008613	 0.00010038	 0.00011157	 0.00012035	 0.00012735	 0.00013322	 0.00013860	 0.00014414	 0.00015049
                     19	-0.00000419	 0.00003042	 0.00005939	 0.00008337	 0.00010300	 0.00011894	 0.00013181	 0.00014226	 0.00015095	 0.00015850	 0.00016556	 0.00017279	 0.00018081
                     22	 0.00001501	 0.00005129	 0.00008194	 0.00010761	 0.00012892	 0.00014654	 0.00016109	 0.00017322	 0.00018359	 0.00019282	 0.00020157	 0.00021047	 0.00022017
                     25	 0.00003958	 0.00007755	 0.00010988	 0.00013722	 0.00016022	 0.00017951	 0.00019575	 0.00020956	 0.00022161	 0.00023252	 0.00024295	 0.00025353	 0.00026492
                     28	 0.00006484	 0.00010448	 0.00013850	 0.00016752	 0.00019220	 0.00021317	 0.00023109	 0.00024658	 0.00026031	 0.00027290	 0.00028501	 0.00029728	 0.00031034
                     31	 0.00008585	 0.00012718	 0.00016288	 0.00019358	 0.00021994	 0.00024260	 0.00026219	 0.00027937	 0.00029478	 0.00030905	 0.00032284	 0.00033679	 0.00035153
                     34	 0.00009839	 0.00014139	 0.00017877	 0.00021116	 0.00023919	 0.00026353	 0.00028481	 0.00030367	 0.00032075	 0.00033671	 0.00035218	 0.00036781	 0.00038423
                     45	 0.00005447	 0.00010364	 0.00014718	 0.00018573	 0.00021993	 0.00025043	 0.00027787	 0.00030289	 0.00032614	 0.00034826	 0.00036989	 0.00039168	 0.00041427
                     60	 0.00022739	 0.00028496	 0.00033691	 0.00038386	 0.00042647	 0.00046537	 0.00050122	 0.00053464	 0.00056630	 0.00059682	 0.00062686	 0.00065705	 0.00068805
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            </tableData>
          </table>
       </product>
    </function>
    <function name="aero/coefficients/CMLDTD">
    <description>ROLLING MOMENT DUE TO DIFFERENTIAL TAIL DEFLECTION - CLDD</description>
    <product>
          <value>0.975 <!-- DTFLX1 --></value>
          <value>0.3</value>
          <property>fcs/differential-elevator-pos-deg</property>
          <table>
            <independentVar lookup="row">aero/alpha-deg</independentVar>
            <independentVar lookup="column">fcs/elevator-pos-deg</independentVar>
            <tableData>
                                -30	        -25	        -20	        -15	        -10	         -5	          0	          5	         10	         15	         20	         25	         30
                    -20	 0.00002169	 0.00036227	 0.00063181	 0.00079244	 0.00084328	 0.00080929	 0.00073001	 0.00064845	 0.00059987	 0.00060063	 0.00063696	 0.00065382	 0.00054371
                    -17	 0.00012012	 0.00044807	 0.00071376	 0.00087782	 0.00093788	 0.00091737	 0.00085435	 0.00079033	 0.00075905	 0.00077537	 0.00082402	 0.00084847	 0.00073969
                    -14	 0.00007560	 0.00038804	 0.00064692	 0.00081136	 0.00087749	 0.00086724	 0.00081715	 0.00076724	 0.00074976	 0.00077804	 0.00083531	 0.00086355	 0.00075221
                    -11	 0.00000261	 0.00029691	 0.00054624	 0.00070824	 0.00077753	 0.00077453	 0.00073428	 0.00069530	 0.00068832	 0.00072518	 0.00078762	 0.00081608	 0.00069855
                     -8	-0.00003973	 0.00023402	 0.00047131	 0.00062828	 0.00069804	 0.00069951	 0.00066624	 0.00063521	 0.00063569	 0.00067799	 0.00074236	 0.00076772	 0.00064057
                     -5	-0.00002945	 0.00022158	 0.00044456	 0.00059414	 0.00066192	 0.00066532	 0.00063638	 0.00061059	 0.00061570	 0.00066053	 0.00072381	 0.00074298	 0.00060302
                     -2	 0.00003246	 0.00025881	 0.00046545	 0.00060550	 0.00066908	 0.00067209	 0.00064507	 0.00062202	 0.00062917	 0.00067384	 0.00073327	 0.00074338	 0.00058764
                      1	 0.00013262	 0.00033257	 0.00052106	 0.00064969	 0.00070706	 0.00070760	 0.00068034	 0.00065775	 0.00066458	 0.00070664	 0.00075966	 0.00075807	 0.00058384
                      4	 0.00025297	 0.00042505	 0.00059380	 0.00070933	 0.00075875	 0.00075496	 0.00072550	 0.00070133	 0.00070571	 0.00074294	 0.00078724	 0.00077155	 0.00057632
                      7	 0.00037594	 0.00051888	 0.00066654	 0.00076754	 0.00080747	 0.00079773	 0.00076435	 0.00073680	 0.00073683	 0.00076723	 0.00080073	 0.00076875	 0.00055025
                     10	 0.00048757	 0.00060035	 0.00072581	 0.00081106	 0.00084019	 0.00082310	 0.00078432	 0.00075181	 0.00074581	 0.00076763	 0.00078847	 0.00073825	 0.00049444
                     13	 0.00057908	 0.00066091	 0.00076328	 0.00083180	 0.00084906	 0.00082346	 0.00077802	 0.00073920	 0.00072574	 0.00073743	 0.00074398	 0.00067382	 0.00040289
                     16	 0.00064718	 0.00069748	 0.00077610	 0.00082715	 0.00083170	 0.00079665	 0.00074352	 0.00069728	 0.00067514	 0.00067540	 0.00066628	 0.00057468	 0.00027505
                     19	 0.00069348	 0.00071192	 0.00076636	 0.00079940	 0.00079063	 0.00074543	 0.00068382	 0.00062926	 0.00059746	 0.00058523	 0.00055926	 0.00044496	 0.00011529
                     22	 0.00072332	 0.00070979	 0.00073986	 0.00075462	 0.00073214	 0.00067631	 0.00060565	 0.00054211	 0.00049991	 0.00047433	 0.00043058	 0.00029257	-0.00006827
                     25	 0.00074435	 0.00069898	 0.00070471	 0.00070111	 0.00066478	 0.00059808	 0.00051803	 0.00044509	 0.00039195	 0.00035242	 0.00029019	 0.00012766	-0.00026524
                     28	 0.00076491	 0.00068805	 0.00066969	 0.00064792	 0.00059780	 0.00052022	 0.00043068	 0.00034813	 0.00028378	 0.00022991	 0.00014872	-0.00003890	-0.00046451
                     31	 0.00079255	 0.00068479	 0.00064284	 0.00060329	 0.00053970	 0.00045145	 0.00035254	 0.00026042	 0.00018478	 0.00011643	 0.00001603	-0.00019701	-0.00065576
                     34	 0.00083285	 0.00069500	 0.00063018	 0.00057348	 0.00049696	 0.00039848	 0.00029056	 0.00018913	 0.00010238	 0.00001962	-0.00010000	-0.00033857	-0.00083066
                     45	 0.00109697	 0.00085947	 0.00072070	 0.00061023	 0.00049460	 0.00036617	 0.00023194	 0.00010233	-0.00001998	-0.00015121	-0.00033770	-0.00066707	-0.00127939
                     60	 0.00132301	 0.00099276	 0.00079428	 0.00064961	 0.00051779	 0.00038367	 0.00024671	 0.00010982	-0.00003183	-0.00020198	-0.00045450	-0.00088450	-0.00163960
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            </tableData>
          </table>
       </product>
    </function>
    <function name="aero/coefficients/CMLP">
    <description>ROLL DAMPING DERIVATIVE - CLP</description>
    <product>
          <property>aero/pb</property>
          <table>
            <independentVar lookup="row">aero/alpha-deg</independentVar>
            <tableData>
                    -20		-0.08541388
                    -19		-0.09921293
                    -16		-0.09081273
                    -13		-0.11126077
                    -10		-0.16536625
                     -7		-0.21575971
                     -4		-0.24200337
                     -1		-0.24899556
                      2		-0.25078465
                      5		-0.25072588
                      8		-0.23373326
                     11		-0.18119641
                     14		-0.11395122
                     17		-0.16351086
                     20		-0.14308573
                     23		-0.10238305
                     26		-0.08250246
                     29		-0.07908747
                     32		-0.08829619
                     35		-0.10677188
                     50		-0.25091633
                     60		-0.32802377
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            </tableData>
          </table>
       </product>
    </function>
    <function name="aero/coefficients/CMLR">
    <description>ROLLING MOMENT DUE TO YAW RATE - CLR</description>
    <product>
          <property>aero/rb</property>
          <table>
            <independentVar lookup="row">aero/alpha-deg</independentVar>
            <tableData>
                    -20		-0.05760685
                    -19		-0.08859624
                    -16		-0.09142189
                    -13		-0.05248582
                    -10		-0.02268499
                     -7		-0.00729335
                     -4		 0.00498482
                     -1		 0.02551353
                      2		 0.05839685
                      5		 0.09938294
                      8		 0.13849720
                     11		 0.16433919
                     14		 0.16841579
                     17		 0.14832098
                     20		 0.10901020
                     23		 0.06185529
                     26		 0.02160370
                     29		 0.00180348
                     32		 0.00969327
                     35		 0.04199466
                     50		 0.06994150
                     60		 0.02905128
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            </tableData>
          </table>
       </product>
    </function>
    <function name="aero/coefficients/CdTNK">
    <description>Incremental Cd due to external tanks</description>
    <product>
          <property>fcs/external-tanks-fitted</property>
          <table>
            <independentVar lookup="row">velocities/mach</independentVar>
            <tableData>
                    0.4		 0.00050000
                    0.6		 0.00050000
                    0.7		 0.00050000
                    0.8		 0.00050000
                   0.85		 0.00110000
                    0.9		 0.00650000
                   0.94		 0.00740000
                   0.98		 0.00770000
                      1		 0.00780000
                    1.1		 0.00790000
                    1.2		 0.00800000
                      2		 0.00810000
            </tableData>
          </table>
       </product>
    </function>
    <function name="aero/coefficients/CFYB">
    <description>BASIC SIDE FORCE</description>
    <product>
          <table>
            <independentVar lookup="row">aero/alpha-deg</independentVar>
            <independentVar lookup="column">aero/beta-deg</independentVar>
            <independentVar lookup="table">fcs/elevator-pos-deg</independentVar>
              <tableData breakPoint="-30">
                              -20	       -10	         0	         5	        10	        20
                    -20	 0.18323943	 0.06784919	 0.00000000	-0.01015419	-0.06784919	-0.18323943
                    -17	 0.19758420	 0.08159276	 0.00000000	-0.02359715	-0.08159276	-0.19758420
                    -14	 0.21867500	 0.10208235	 0.00000000	-0.04378614	-0.10208235	-0.21867500
                    -11	 0.24179168	 0.12459783	 0.00000000	-0.06600101	-0.12459783	-0.24179168
                     -8	 0.26351094	 0.14571588	 0.00000000	-0.08681846	-0.14571588	-0.26351094
                     -5	 0.28152529	 0.16312902	 0.00000000	-0.10393100	-0.16312902	-0.28152529
                     -2	 0.29447073	 0.17547326	 0.00000000	-0.11597463	-0.17547326	-0.29447073
                      1	 0.30176311	 0.18216443	 0.00000000	-0.12236521	-0.18216443	-0.30176311
                      4	 0.30344312	 0.18324324	 0.00000000	-0.12314341	-0.18324324	-0.30344312
                      7	 0.30002997	 0.17922888	 0.00000000	-0.11882845	-0.17922888	-0.30002997
                     10	 0.29238374	 0.17098145	 0.00000000	-0.11028041	-0.17098145	-0.29238374
                     13	 0.28157640	 0.15957290	 0.00000000	-0.09857126	-0.15957290	-0.28157640
                     16	 0.26877145	 0.14616674	 0.00000000	-0.08486449	-0.14616674	-0.26877145
                     19	 0.25511231	 0.13190640	 0.00000000	-0.07030355	-0.13190640	-0.25511231
                     22	 0.24161932	 0.11781220	 0.00000000	-0.05590875	-0.11781220	-0.24161932
                     25	 0.22909543	 0.10468711	 0.00000000	-0.04248305	-0.10468711	-0.22909543
                     28	 0.21804053	 0.09303099	 0.00000000	-0.03052634	-0.09303099	-0.21804053
                     31	 0.20857446	 0.08296373	 0.00000000	-0.02015847	-0.08296373	-0.20857446
                     34	 0.20036876	 0.07415682	 0.00000000	-0.01105095	-0.07415682	-0.20036876
                     45	 0.16137568	 0.03295931	 0.00000000	 0.03124876	-0.03295931	-0.16137568
                     60	-0.11509199	-0.24651439	 0.00000000	 0.31222548	 0.24651439	 0.11509199
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              </tableData>
              <tableData breakPoint="-25">
                              -20	       -10	         0	         5	        10	        20
                    -20	 0.18180918	 0.06551368	 0.00000000	-0.00736604	-0.06551368	-0.18180918
                    -17	 0.19637584	 0.07947914	 0.00000000	-0.02103090	-0.07947914	-0.19637584
                    -14	 0.21768853	 0.10019062	 0.00000000	-0.04144177	-0.10019062	-0.21768853
                    -11	 0.24102710	 0.12292799	 0.00000000	-0.06387854	-0.12292799	-0.24102710
                     -8	 0.26296825	 0.14426793	 0.00000000	-0.08491788	-0.14426793	-0.26296825
                     -5	 0.28120449	 0.16190297	 0.00000000	-0.10225231	-0.16190297	-0.28120449
                     -2	 0.29437182	 0.17446909	 0.00000000	-0.11451783	-0.17446909	-0.29437182
                      1	 0.30188610	 0.18138216	 0.00000000	-0.12113030	-0.18138216	-0.30188610
                      4	 0.30378800	 0.18268285	 0.00000000	-0.12213039	-0.18268285	-0.30378800
                      7	 0.30059674	 0.17889039	 0.00000000	-0.11803732	-0.17889039	-0.30059674
                     10	 0.29317240	 0.17086485	 0.00000000	-0.10971118	-0.17086485	-0.29317240
                     13	 0.28258695	 0.15967819	 0.00000000	-0.09822391	-0.15967819	-0.28258695
                     16	 0.27000389	 0.14649392	 0.00000000	-0.08473904	-0.14649392	-0.27000389
                     19	 0.25656664	 0.13245546	 0.00000000	-0.07039999	-0.13245546	-0.25656664
                     22	 0.24329555	 0.11858316	 0.00000000	-0.05622708	-0.11858316	-0.24329555
                     25	 0.23099355	 0.10567996	 0.00000000	-0.04302327	-0.10567996	-0.23099355
                     28	 0.22016053	 0.09424574	 0.00000000	-0.03128845	-0.09424574	-0.22016053
                     31	 0.21091636	 0.08440036	 0.00000000	-0.02114247	-0.08440036	-0.21091636
                     34	 0.20293255	 0.07581534	 0.00000000	-0.01225685	-0.07581534	-0.20293255
                     45	 0.16475307	 0.03543144	 0.00000000	 0.02922927	-0.03543144	-0.16475307
                     60	-0.11060515	-0.24293281	 0.00000000	 0.30909653	 0.24293281	 0.11060515
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              </tableData>
              <tableData breakPoint="-20">
                              -20	       -10	         0	         5	        10	        20
                    -20	 0.18037893	 0.06317817	 0.00000000	-0.00457790	-0.06317817	-0.18037893
                    -17	 0.19516748	 0.07736552	 0.00000000	-0.01846464	-0.07736552	-0.19516748
                    -14	 0.21670206	 0.09829889	 0.00000000	-0.03909741	-0.09829889	-0.21670206
                    -11	 0.24026252	 0.12125815	 0.00000000	-0.06175607	-0.12125815	-0.24026252
                     -8	 0.26242557	 0.14281998	 0.00000000	-0.08301730	-0.14281998	-0.26242557
                     -5	 0.28088370	 0.16067691	 0.00000000	-0.10057362	-0.16067691	-0.28088370
                     -2	 0.29427292	 0.17346493	 0.00000000	-0.11306104	-0.17346493	-0.29427292
                      1	 0.30200908	 0.18059988	 0.00000000	-0.11989539	-0.18059988	-0.30200908
                      4	 0.30413287	 0.18212247	 0.00000000	-0.12111737	-0.18212247	-0.30413287
                      7	 0.30116351	 0.17855189	 0.00000000	-0.11724620	-0.17855189	-0.30116351
                     10	 0.29396106	 0.17074824	 0.00000000	-0.10914194	-0.17074824	-0.29396106
                     13	 0.28359750	 0.15978347	 0.00000000	-0.09787657	-0.15978347	-0.28359750
                     16	 0.27123633	 0.14682110	 0.00000000	-0.08461359	-0.14682110	-0.27123633
                     19	 0.25802097	 0.13300453	 0.00000000	-0.07049642	-0.13300453	-0.25802097
                     22	 0.24497177	 0.11935413	 0.00000000	-0.05654541	-0.11935413	-0.24497177
                     25	 0.23289166	 0.10667281	 0.00000000	-0.04356349	-0.10667281	-0.23289166
                     28	 0.22228054	 0.09546048	 0.00000000	-0.03205056	-0.09546048	-0.22228054
                     31	 0.21325826	 0.08583699	 0.00000000	-0.02212647	-0.08583699	-0.21325826
                     34	 0.20549634	 0.07747387	 0.00000000	-0.01346274	-0.07747387	-0.20549634
                     45	 0.16813045	 0.03790356	 0.00000000	 0.02720978	-0.03790356	-0.16813045
                     60	-0.10611831	-0.23935123	 0.00000000	 0.30596759	 0.23935123	 0.10611831
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              </tableData>
              <tableData breakPoint="-15">
                              -20	       -10	         0	         5	        10	        20
                    -20	 0.17894867	 0.06084265	 0.00000000	-0.00178975	-0.06084265	-0.17894867
                    -17	 0.19395912	 0.07525190	 0.00000000	-0.01589839	-0.07525190	-0.19395912
                    -14	 0.21571559	 0.09640716	 0.00000000	-0.03675305	-0.09640716	-0.21571559
                    -11	 0.23949795	 0.11958831	 0.00000000	-0.05963360	-0.11958831	-0.23949795
                     -8	 0.26188288	 0.14137203	 0.00000000	-0.08111672	-0.14137203	-0.26188288
                     -5	 0.28056290	 0.15945085	 0.00000000	-0.09889493	-0.15945085	-0.28056290
                     -2	 0.29417402	 0.17246076	 0.00000000	-0.11160424	-0.17246076	-0.29417402
                      1	 0.30213207	 0.17981761	 0.00000000	-0.11866048	-0.17981761	-0.30213207
                      4	 0.30447775	 0.18156208	 0.00000000	-0.12010435	-0.18156208	-0.30447775
                      7	 0.30173028	 0.17821340	 0.00000000	-0.11645507	-0.17821340	-0.30173028
                     10	 0.29474972	 0.17063164	 0.00000000	-0.10857271	-0.17063164	-0.29474972
                     13	 0.28460805	 0.15988876	 0.00000000	-0.09752922	-0.15988876	-0.28460805
                     16	 0.27246877	 0.14714827	 0.00000000	-0.08448814	-0.14714827	-0.27246877
                     19	 0.25947531	 0.13355360	 0.00000000	-0.07059286	-0.13355360	-0.25947531
                     22	 0.24664799	 0.12012509	 0.00000000	-0.05686374	-0.12012509	-0.24664799
                     25	 0.23478978	 0.10766566	 0.00000000	-0.04410371	-0.10766566	-0.23478978
                     28	 0.22440054	 0.09667522	 0.00000000	-0.03281267	-0.09667522	-0.22440054
                     31	 0.21560015	 0.08727363	 0.00000000	-0.02311047	-0.08727363	-0.21560015
                     34	 0.20806012	 0.07913239	 0.00000000	-0.01466863	-0.07913239	-0.20806012
                     45	 0.17150784	 0.04037569	 0.00000000	 0.02519028	-0.04037569	-0.17150784
                     60	-0.10163147	-0.23576965	 0.00000000	 0.30283864	 0.23576965	 0.10163147
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              </tableData>
              <tableData breakPoint="-10">
                              -20	       -10	         0	         5	        10	        20
                    -20	 0.17751842	 0.05850714	 0.00000000	 0.00099839	-0.05850714	-0.17751842
                    -17	 0.19275076	 0.07313827	 0.00000000	-0.01333214	-0.07313827	-0.19275076
                    -14	 0.21472912	 0.09451542	 0.00000000	-0.03440868	-0.09451542	-0.21472912
                    -11	 0.23873337	 0.11791847	 0.00000000	-0.05751112	-0.11791847	-0.23873337
                     -8	 0.26134019	 0.13992408	 0.00000000	-0.07921614	-0.13992408	-0.26134019
                     -5	 0.28024211	 0.15822479	 0.00000000	-0.09721624	-0.15822479	-0.28024211
                     -2	 0.29407511	 0.17145659	 0.00000000	-0.11014744	-0.17145659	-0.29407511
                      1	 0.30225506	 0.17903533	 0.00000000	-0.11742557	-0.17903533	-0.30225506
                      4	 0.30482263	 0.18100170	 0.00000000	-0.11909134	-0.18100170	-0.30482263
                      7	 0.30229705	 0.17787491	 0.00000000	-0.11566394	-0.17787491	-0.30229705
                     10	 0.29553838	 0.17051504	 0.00000000	-0.10800347	-0.17051504	-0.29553838
                     13	 0.28561860	 0.15999405	 0.00000000	-0.09718188	-0.15999405	-0.28561860
                     16	 0.27370121	 0.14747545	 0.00000000	-0.08436268	-0.14747545	-0.27370121
                     19	 0.26092964	 0.13410267	 0.00000000	-0.07068930	-0.13410267	-0.26092964
                     22	 0.24832422	 0.12089605	 0.00000000	-0.05718207	-0.12089605	-0.24832422
                     25	 0.23668789	 0.10865851	 0.00000000	-0.04464393	-0.10865851	-0.23668789
                     28	 0.22652055	 0.09788996	 0.00000000	-0.03357478	-0.09788996	-0.22652055
                     31	 0.21794205	 0.08871026	 0.00000000	-0.02409447	-0.08871026	-0.21794205
                     34	 0.21062391	 0.08079092	 0.00000000	-0.01587453	-0.08079092	-0.21062391
                     45	 0.17488523	 0.04284781	 0.00000000	 0.02317079	-0.04284781	-0.17488523
                     60	-0.09714462	-0.23218807	 0.00000000	 0.29970969	 0.23218807	 0.09714462
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              </tableData>
              <tableData breakPoint="-5">
                              -20	       -10	         0	         5	        10	        20
                    -20	 0.17608817	 0.05617163	 0.00000000	 0.00378654	-0.05617163	-0.17608817
                    -17	 0.19154240	 0.07102465	 0.00000000	-0.01076588	-0.07102465	-0.19154240
                    -14	 0.21374265	 0.09262369	 0.00000000	-0.03206432	-0.09262369	-0.21374265
                    -11	 0.23796879	 0.11624863	 0.00000000	-0.05538865	-0.11624863	-0.23796879
                     -8	 0.26079751	 0.13847614	 0.00000000	-0.07731556	-0.13847614	-0.26079751
                     -5	 0.27992131	 0.15699873	 0.00000000	-0.09553755	-0.15699873	-0.27992131
                     -2	 0.29397621	 0.17045242	 0.00000000	-0.10869064	-0.17045242	-0.29397621
                      1	 0.30237804	 0.17825305	 0.00000000	-0.11619067	-0.17825305	-0.30237804
                      4	 0.30516751	 0.18044131	 0.00000000	-0.11807832	-0.18044131	-0.30516751
                      7	 0.30286381	 0.17753641	 0.00000000	-0.11487282	-0.17753641	-0.30286381
                     10	 0.29632704	 0.17039843	 0.00000000	-0.10743424	-0.17039843	-0.29632704
                     13	 0.28662915	 0.16009934	 0.00000000	-0.09683454	-0.16009934	-0.28662915
                     16	 0.27493365	 0.14780263	 0.00000000	-0.08423723	-0.14780263	-0.27493365
                     19	 0.26238397	 0.13465174	 0.00000000	-0.07078574	-0.13465174	-0.26238397
                     22	 0.25000044	 0.12166701	 0.00000000	-0.05750040	-0.12166701	-0.25000044
                     25	 0.23858601	 0.10965136	 0.00000000	-0.04518415	-0.10965136	-0.23858601
                     28	 0.22864055	 0.09910471	 0.00000000	-0.03433689	-0.09910471	-0.22864055
                     31	 0.22028395	 0.09014689	 0.00000000	-0.02507848	-0.09014689	-0.22028395
                     34	 0.21318770	 0.08244944	 0.00000000	-0.01708042	-0.08244944	-0.21318770
                     45	 0.17826262	 0.04531994	 0.00000000	 0.02115130	-0.04531994	-0.17826262
                     60	-0.09265778	-0.22860649	 0.00000000	 0.29658074	 0.22860649	 0.09265778
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              </tableData>
              <tableData breakPoint="0">
                              -20	       -10	         0	         5	        10	        20
                    -20	 0.17465792	 0.05383611	 0.00000000	 0.00657468	-0.05383611	-0.17465792
                    -10	 0.24517824	 0.12235241	 0.00000000	-0.06093960	-0.12235241	-0.24517824
                      0	 0.30026327	 0.17543342	 0.00000000	-0.11301861	-0.17543342	-0.30026327
                     10	 0.29711570	 0.17028183	 0.00000000	-0.10686500	-0.17028183	-0.29711570
                     20	 0.25972098	 0.13088309	 0.00000000	-0.06646425	-0.13088309	-0.25972098
                     30	 0.22517124	 0.09432932	 0.00000000	-0.02890847	-0.09432932	-0.22517124
                     60	-0.08817094	-0.22502491	 0.00000000	 0.29345179	 0.22502491	 0.08817094
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              </tableData>
              <tableData breakPoint="5">
                              -20	       -10	         0	         5	        10	        20
                    -20	 0.17322767	 0.05150060	 0.00000000	 0.00936283	-0.05150060	-0.17322767
                    -10	 0.24448762	 0.12075653	 0.00000000	-0.05889109	-0.12075653	-0.24448762
                      0	 0.30031230	 0.17457718	 0.00000000	-0.11170973	-0.17457718	-0.30031230
                     10	 0.29790436	 0.17016523	 0.00000000	-0.10629577	-0.17016523	-0.29790436
                     20	 0.26124928	 0.13150612	 0.00000000	-0.06663465	-0.13150612	-0.26124928
                     30	 0.22743917	 0.09569199	 0.00000000	-0.02981851	-0.09569199	-0.22743917
                     60	-0.08368409	-0.22144333	 0.00000000	 0.29032284	 0.22144333	 0.08368409
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              </tableData>
              <tableData breakPoint="10">
                              -20	       -10	         0	         5	        10	        20
                    -20	 0.17179742	 0.04916509	 0.00000000	 0.01215097	-0.04916509	-0.17179742
                    -10	 0.24379701	 0.11916065	 0.00000000	-0.05684258	-0.11916065	-0.24379701
                      0	 0.30036132	 0.17372094	 0.00000000	-0.11040086	-0.17372094	-0.30036132
                     10	 0.29869302	 0.17004862	 0.00000000	-0.10572653	-0.17004862	-0.29869302
                     20	 0.26277757	 0.13212915	 0.00000000	-0.06680505	-0.13212915	-0.26277757
                     30	 0.22970710	 0.09705466	 0.00000000	-0.03072855	-0.09705466	-0.22970710
                     60	-0.07919725	-0.21786175	 0.00000000	 0.28719390	 0.21786175	 0.07919725
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              </tableData>
              <tableData breakPoint="15">
                              -20	       -10	         0	         5	        10	        20
                    -20	 0.17036717	 0.04682957	 0.00000000	 0.01493912	-0.04682957	-0.17036717
                    -10	 0.24310640	 0.11756478	 0.00000000	-0.05479407	-0.11756478	-0.24310640
                      0	 0.30041034	 0.17286470	 0.00000000	-0.10909199	-0.17286470	-0.30041034
                     10	 0.29948168	 0.16993202	 0.00000000	-0.10515730	-0.16993202	-0.29948168
                     20	 0.26430587	 0.13275219	 0.00000000	-0.06697545	-0.13275219	-0.26430587
                     30	 0.23197504	 0.09841733	 0.00000000	-0.03163859	-0.09841733	-0.23197504
                     60	-0.07471041	-0.21428017	 0.00000000	 0.28406495	 0.21428017	 0.07471041
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              </tableData>
              <tableData breakPoint="20">
                              -20	       -10	         0	         5	        10	        20
                    -20	 0.16893692	 0.04449406	 0.00000000	 0.01772726	-0.04449406	-0.16893692
                    -10	 0.24241578	 0.11596890	 0.00000000	-0.05274557	-0.11596890	-0.24241578
                      0	 0.30045937	 0.17200846	 0.00000000	-0.10778312	-0.17200846	-0.30045937
                     10	 0.30027034	 0.16981542	 0.00000000	-0.10458806	-0.16981542	-0.30027034
                     20	 0.26583416	 0.13337522	 0.00000000	-0.06714585	-0.13337522	-0.26583416
                     30	 0.23424297	 0.09978000	 0.00000000	-0.03254863	-0.09978000	-0.23424297
                     60	-0.07022356	-0.21069859	 0.00000000	 0.28093600	 0.21069859	 0.07022356
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              </tableData>
              <tableData breakPoint="25">
                              -20	       -10	         0	         5	        10	        20
                    -20	 0.16750667	 0.04215855	 0.00000000	 0.02051541	-0.04215855	-0.16750667
                    -10	 0.24172517	 0.11437302	 0.00000000	-0.05069706	-0.11437302	-0.24172517
                      0	 0.30050839	 0.17115222	 0.00000000	-0.10647425	-0.17115222	-0.30050839
                     10	 0.30105900	 0.16969881	 0.00000000	-0.10401883	-0.16969881	-0.30105900
                     20	 0.26736246	 0.13399825	 0.00000000	-0.06731626	-0.13399825	-0.26736246
                     30	 0.23651090	 0.10114267	 0.00000000	-0.03345867	-0.10114267	-0.23651090
                     60	-0.06573672	-0.20711701	 0.00000000	 0.27780705	 0.20711701	 0.06573672
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              </tableData>
              <tableData breakPoint="30">
                              -20	       -10	         0	         5	        10	        20
                    -20	 0.16607642	 0.03982303	 0.00000000	 0.02330355	-0.03982303	-0.16607642
                    -10	 0.24103456	 0.11277715	 0.00000000	-0.04864855	-0.11277715	-0.24103456
                      0	 0.30055741	 0.17029598	 0.00000000	-0.10516538	-0.17029598	-0.30055741
                     10	 0.30184766	 0.16958221	 0.00000000	-0.10344959	-0.16958221	-0.30184766
                     20	 0.26889076	 0.13462129	 0.00000000	-0.06748666	-0.13462129	-0.26889076
                     30	 0.23877884	 0.10250534	 0.00000000	-0.03436871	-0.10250534	-0.23877884
                     60	-0.06124988	-0.20353543	 0.00000000	 0.27467810	 0.20353543	 0.06124988
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              </tableData>
          </table>
       </product>
    </function>
    <function name="aero/coefficients/CFYP">
    <description>SIDE FORCE DUE TO ROLL RATE (CYP)</description>
    <product>
          <property>aero/pb</property>
          <table>
            <independentVar lookup="row">aero/alpha-deg</independentVar>
            <tableData>
                    -20		 0.01205991
                    -19		-0.12656627
                     -9		-0.10160834
                      1		 0.05658780
                     11		 0.04233858
                     21		 0.02104957
                     31		 0.00793236
                     60		 0.00000000
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            </tableData>
          </table>
       </product>
    </function>
    <function name="aero/coefficients/CFYR">
    <description>SIDE FORCE DUE TO YAW RATE (CYR)</description>
    <product>
          <property>aero/rb</property>
          <table>
            <independentVar lookup="row">aero/alpha-deg</independentVar>
            <tableData>
                    -20		 0.35000000
                    -19		 0.35000000
                     -9		 0.35000000
                      1		 0.32743423
                     11		 0.15828844
                     21		-0.11423122
                     31		 0.00000000
                     60		 0.00000000
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            </tableData>
          </table>
       </product>
    </function>
    <function name="aero/coefficients/CYDAD">
    <description>SIDE FORCE DUE TO AILERON DEFLECTION</description>
    <product>
          <property>fcs/aileron-pos-deg</property>
          <table>
            <independentVar lookup="row">aero/alpha-deg</independentVar>
            <tableData>
                    -20		-0.00027502
                    -19		-0.00032657
                     -9		-0.00028478
                      1		-0.00019645
                     11		 0.00000760
                     21		 0.00016013
                     31		 0.00020963
                     60		 0.00115894
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            </tableData>
          </table>
       </product>
    </function>
    <function name="aero/coefficients/CYDRD">
    <description>SIDE FORCE DUE TO RUDDER DEFLECTION</description>
    <product>
          <property>fcs/rudder-pos-deg</property>
          <value>0.89 <!-- DRFLX5 --></value>
          <property>aero/coefficients/EPA43</property>
          <table>
            <independentVar lookup="row">aero/alpha-deg</independentVar>
            <independentVar lookup="column">fcs/rudder-pos-deg</independentVar>
            <tableData>
                                -30	        -25	        -20	        -15	        -10	         -5	          0	          5	         10	         15	         20	         25	         30
                    -20	-0.00151306	 0.00018306	 0.00149969	 0.00247584	 0.00315049	 0.00356264	 0.00375129	 0.00375542	 0.00361404	 0.00336614	 0.00305071	 0.00270675	 0.00237325
                    -10	-0.00123506	 0.00047979	 0.00181516	 0.00281004	 0.00350342	 0.00393431	 0.00414169	 0.00416456	 0.00404191	 0.00381274	 0.00351605	 0.00319082	 0.00287605
                      0	-0.00238717	-0.00065358	 0.00070052	 0.00171414	 0.00242626	 0.00287588	 0.00310199	 0.00314359	 0.00303968	 0.00282924	 0.00255128	 0.00224479	 0.00194875
                     10	-0.00210141	-0.00034909	 0.00102375	 0.00205610	 0.00278695	 0.00325530	 0.00350015	 0.00356049	 0.00347531	 0.00328361	 0.00302438	 0.00273662	 0.00245932
                     20	-0.00312490	-0.00135385	 0.00003772	 0.00108880	 0.00183839	 0.00232548	 0.00258906	 0.00266813	 0.00260168	 0.00242872	 0.00218822	 0.00191920	 0.00166063
                     30	-0.00493628	-0.00314649	-0.00173619	-0.00066637	 0.00010195	 0.00060777	 0.00089008	 0.00098789	 0.00094018	 0.00078594	 0.00056418	 0.00031389	 0.00007406
                     60	-0.01822570	-0.01637971	-0.01491321	-0.01378719	-0.01296267	-0.01240065	-0.01206213	-0.01190812	-0.01189963	-0.01199767	-0.01216323	-0.01235732	-0.01254095
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            </tableData>
          </table>
       </product>
    </function>
    <function name="aero/coefficients/CYDTD">
    <description>SIDE FORCE DUE TO DIFFERETIAL TAIL DEFLECTION - CYDTD</description>
    <product>
          <value>0.975 <!-- DTFLX5 --></value>
          <value>0.3</value>
          <property>fcs/differential-elevator-pos-deg</property>
          <table>
            <independentVar lookup="row">aero/alpha-deg</independentVar>
            <independentVar lookup="column">fcs/elevator-pos-deg</independentVar>
            <tableData>
                                -30	        -25	        -20	        -15	        -10	         -5	          0	          5	         10	         15	         20	         25	         30
                    -20	 0.00477977	 0.00326443	 0.00201393	 0.00111242	 0.00057204	 0.00035313	 0.00038458	 0.00058409	 0.00087848	 0.00122399	 0.00162656	 0.00216213	 0.00299694
                    -10	 0.00341003	 0.00201144	 0.00083265	-0.00004375	-0.00060721	-0.00089895	-0.00099167	-0.00096923	-0.00090639	-0.00084848	-0.00079115	-0.00066002	-0.00029043
                      0	 0.00218250	 0.00102083	 0.00002727	-0.00071580	-0.00119807	-0.00146098	-0.00157745	-0.00163157	-0.00169832	-0.00182327	-0.00200227	-0.00216119	-0.00213558
                     10	 0.00078016	-0.00004489	-0.00075342	-0.00126328	-0.00156436	-0.00169835	-0.00173838	-0.00176878	-0.00186474	-0.00207206	-0.00238682	-0.00273510	-0.00295269
                     20	-0.00042411	-0.00083332	-0.00117075	-0.00135581	-0.00137999	-0.00128654	-0.00115018	-0.00105679	-0.00108315	-0.00127663	-0.00163489	-0.00208559	-0.00246608
                     30	-0.00082990	-0.00076451	-0.00065848	-0.00043551	-0.00009134	 0.00032648	 0.00073899	 0.00105600	 0.00119647	 0.00110875	 0.00079093	 0.00031105	-0.00017251
                     60	 0.00595406	 0.00759111	 0.00932441	 0.01118776	 0.01314288	 0.01509975	 0.01693684	 0.01852148	 0.01973010	 0.02046855	 0.02069238	 0.02042714	 0.01978867
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            </tableData>
          </table>
       </product>
    </function>
    <function name="aero/coefficients/CyMach">
    <description>Yaw factor (NASA-TM-84643 Figure 3 Clalpha) and values for AOA derived from NASA-aaia-2000-0900 Figure 4</description>
    <product>
          <table>
            <independentVar lookup="row">velocities/mach</independentVar>
            <tableData>
                      0		 1.00000000
                    0.2		 1.00000000
                    0.6		 0.95837601
                    0.9		 0.50000000
                    1.1		 1.00000000
                    2.4		 0.50000000
            </tableData>
          </table>
       </product>
    </function>
    <function name="aero/coefficients/CMN1">
    <description>BASIC YAWING MOMENT - CN (BETA)</description>
    <product>
          <table>
            <independentVar lookup="row">aero/alpha-deg</independentVar>
            <independentVar lookup="column">aero/beta-deg</independentVar>
            <independentVar lookup="table">fcs/elevator-pos-deg</independentVar>
              <tableData breakPoint="-30">
                              -20	       -10	         0	         5	        10	        20
                    -20	-0.02713148	-0.00688538	 0.00000000	-0.00461678	 0.00688538	 0.02713148
                    -10	-0.02517026	-0.01493773	 0.00000000	 0.00813274	 0.01493773	 0.02517026
                      0	-0.02230855	-0.02061785	 0.00000000	 0.01798057	 0.02061785	 0.02230855
                     10	-0.00376937	-0.00914874	 0.00000000	 0.01014970	 0.00914874	 0.00376937
                     20	 0.02142406	 0.01044636	 0.00000000	-0.00633662	-0.01044636	-0.02142406
                     30	 0.04230972	 0.02720543	 0.00000000	-0.02051638	-0.02720543	-0.04230972
                     60	 0.06081753	 0.04216397	 0.00000000	-0.03091376	-0.04216397	-0.06081753
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              </tableData>
              <tableData breakPoint="-25">
                              -20	       -10	         0	         5	        10	        20
                    -20	-0.02723751	-0.00743767	 0.00000000	-0.00384136	 0.00743767	 0.02723751
                    -10	-0.02575074	-0.01539315	 0.00000000	 0.00852563	 0.01539315	 0.02575074
                      0	-0.02354086	-0.02126145	 0.00000000	 0.01832982	 0.02126145	 0.02354086
                     10	-0.00583088	-0.01026560	 0.00000000	 0.01079424	 0.01026560	 0.00583088
                     20	 0.01835598	 0.00857119	 0.00000000	-0.00505791	-0.00857119	-0.01835598
                     30	 0.03805769	 0.02428689	 0.00000000	-0.01826459	-0.02428689	-0.03805769
                     60	 0.05194939	 0.03440496	 0.00000000	-0.02370931	-0.03440496	-0.05194939
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              </tableData>
              <tableData breakPoint="-20">
                              -20	       -10	         0	         5	        10	        20
                    -20	-0.02720072	-0.00784714	 0.00000000	-0.00320877	 0.00784714	 0.02720072
                    -10	-0.02629551	-0.01581286	 0.00000000	 0.00888280	 0.01581286	 0.02629551
                      0	-0.02477316	-0.02190506	 0.00000000	 0.01867908	 0.02190506	 0.02477316
                     10	-0.00785668	-0.01134675	 0.00000000	 0.01140306	 0.01134675	 0.00785668
                     20	 0.01543071	 0.00683884	 0.00000000	-0.00392201	-0.00683884	-0.01543071
                     30	 0.03412699	 0.02168969	 0.00000000	-0.01633413	-0.02168969	-0.03412699
                     60	 0.04436660	 0.02793129	 0.00000000	-0.01779020	-0.02793129	-0.04436660
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              </tableData>
              <tableData breakPoint="-15">
                              -20	       -10	         0	         5	        10	        20
                    -20	-0.02702112	-0.00811379	 0.00000000	-0.00271899	 0.00811379	 0.02702112
                    -10	-0.02680459	-0.01619687	 0.00000000	 0.00920428	 0.01619687	 0.02680459
                      0	-0.02600547	-0.02254867	 0.00000000	 0.01902834	 0.02254867	 0.02600547
                     10	-0.00984678	-0.01239220	 0.00000000	 0.01197619	 0.01239220	 0.00984678
                     20	 0.01264826	 0.00524930	 0.00000000	-0.00292893	-0.00524930	-0.01264826
                     30	 0.03051763	 0.01941382	 0.00000000	-0.01472501	-0.01941382	-0.03051763
                     60	 0.03806916	 0.02274297	 0.00000000	-0.01315644	-0.02274297	-0.03806916
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              </tableData>
              <tableData breakPoint="-10">
                              -20	       -10	         0	         5	        10	        20
                    -20	-0.02669870	-0.00823762	 0.00000000	-0.00237203	 0.00823762	 0.02669870
                    -10	-0.02727796	-0.01654517	 0.00000000	 0.00949005	 0.01654517	 0.02727796
                      0	-0.02723778	-0.02319227	 0.00000000	 0.01937759	 0.02319227	 0.02723778
                     10	-0.01180117	-0.01340195	 0.00000000	 0.01251361	 0.01340195	 0.01180117
                     20	 0.01000862	 0.00380258	 0.00000000	-0.00207867	-0.00380258	-0.01000862
                     30	 0.02722960	 0.01745930	 0.00000000	-0.01343723	-0.01745930	-0.02722960
                     60	 0.03305707	 0.01884000	 0.00000000	-0.00980804	-0.01884000	-0.03305707
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              </tableData>
              <tableData breakPoint="-5">
                              -20	       -10	         0	         5	        10	        20
                    -20	-0.02623346	-0.00821864	 0.00000000	-0.00216788	 0.00821864	 0.02623346
                    -10	-0.02771562	-0.01685777	 0.00000000	 0.00974012	 0.01685777	 0.02771562
                      0	-0.02847008	-0.02383588	 0.00000000	 0.01972685	 0.02383588	 0.02847008
                     10	-0.01371987	-0.01437599	 0.00000000	 0.01301533	 0.01437599	 0.01371987
                     20	 0.00751181	 0.00249868	 0.00000000	-0.00137122	-0.00249868	-0.00751181
                     30	 0.02426292	 0.01582610	 0.00000000	-0.01247079	-0.01582610	-0.02426292
                     60	 0.02933032	 0.01622238	 0.00000000	-0.00774497	-0.01622238	-0.02933032
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              </tableData>
              <tableData breakPoint="0">
                              -20	       -10	         0	         5	        10	        20
                    -20	-0.02562541	-0.00805685	 0.00000000	-0.00210655	 0.00805685	 0.02562541
                    -10	-0.02811758	-0.01713466	 0.00000000	 0.00995448	 0.01713466	 0.02811758
                      0	-0.02970239	-0.02447949	 0.00000000	 0.02007611	 0.02447949	 0.02970239
                     10	-0.01560285	-0.01531433	 0.00000000	 0.01348134	 0.01531433	 0.01560285
                     20	 0.00515781	 0.00133759	 0.00000000	-0.00080659	-0.00133759	-0.00515781
                     30	 0.02161757	 0.01451425	 0.00000000	-0.01182568	-0.01451425	-0.02161757
                     60	 0.02688892	 0.01489010	 0.00000000	-0.00696726	-0.01489010	-0.02688892
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              </tableData>
              <tableData breakPoint="5">
                              -20	       -10	         0	         5	        10	        20
                    -20	-0.02487454	-0.00775223	 0.00000000	-0.00218804	 0.00775223	 0.02487454
                    -10	-0.02848384	-0.01737585	 0.00000000	 0.01013314	 0.01737585	 0.02848384
                      0	-0.03093470	-0.02512309	 0.00000000	 0.02042536	 0.02512309	 0.03093470
                     10	-0.01745014	-0.01621696	 0.00000000	 0.01391165	 0.01621696	 0.01745014
                     20	 0.00294662	 0.00031932	 0.00000000	-0.00038478	-0.00031932	-0.00294662
                     30	 0.01929356	 0.01352373	 0.00000000	-0.01150191	-0.01352373	-0.01929356
                     60	 0.02573288	 0.01484318	 0.00000000	-0.00747490	-0.01484318	-0.02573288
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              </tableData>
              <tableData breakPoint="10">
                              -20	       -10	         0	         5	        10	        20
                    -20	-0.02398086	-0.00730480	 0.00000000	-0.00241234	 0.00730480	 0.02398086
                    -10	-0.02881439	-0.01758134	 0.00000000	 0.01027609	 0.01758134	 0.02881439
                      0	-0.03216700	-0.02576670	 0.00000000	 0.02077462	 0.02576670	 0.03216700
                     10	-0.01926171	-0.01708389	 0.00000000	 0.01430625	 0.01708389	 0.01926171
                     20	 0.00087825	-0.00055613	 0.00000000	-0.00010579	 0.00055613	-0.00087825
                     30	 0.01729088	 0.01285455	 0.00000000	-0.01149947	-0.01285455	-0.01729088
                     60	 0.02586218	 0.01608160	 0.00000000	-0.00926788	-0.01608160	-0.02586218
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              </tableData>
              <tableData breakPoint="15">
                              -20	       -10	         0	         5	        10	        20
                    -20	-0.02294435	-0.00671455	 0.00000000	-0.00277946	 0.00671455	 0.02294435
                    -10	-0.02910923	-0.01775112	 0.00000000	 0.01038334	 0.01775112	 0.02910923
                      0	-0.03339931	-0.02641031	 0.00000000	 0.02112387	 0.02641031	 0.03339931
                     10	-0.02103759	-0.01791511	 0.00000000	 0.01466515	 0.01791511	 0.02103759
                     20	-0.00104730	-0.00128877	 0.00000000	 0.00003039	 0.00128877	 0.00104730
                     30	 0.01560954	 0.01250671	 0.00000000	-0.01181838	-0.01250671	-0.01560954
                     60	 0.02727682	 0.01860537	 0.00000000	-0.01234621	-0.01860537	-0.02727682
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              </tableData>
              <tableData breakPoint="20">
                              -20	       -10	         0	         5	        10	        20
                    -20	-0.02176504	-0.00598149	 0.00000000	-0.00328940	 0.00598149	 0.02176504
                    -10	-0.02936838	-0.01788520	 0.00000000	 0.01045489	 0.01788520	 0.02936838
                      0	-0.03463162	-0.02705391	 0.00000000	 0.02147313	 0.02705391	 0.03463162
                     10	-0.02277776	-0.01871063	 0.00000000	 0.01498834	 0.01871063	 0.02277776
                     20	-0.00283003	-0.00187859	 0.00000000	 0.00002376	 0.00187859	 0.00283003
                     30	 0.01424954	 0.01248020	 0.00000000	-0.01245862	-0.01248020	-0.01424954
                     60	 0.02997682	 0.02241449	 0.00000000	-0.01670989	-0.02241449	-0.02997682
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              </tableData>
              <tableData breakPoint="25">
                              -20	       -10	         0	         5	        10	        20
                    -20	-0.02044290	-0.00510561	 0.00000000	-0.00394215	 0.00510561	 0.02044290
                    -10	-0.02959182	-0.01798358	 0.00000000	 0.01049073	 0.01798358	 0.02959182
                      0	-0.03586392	-0.02769752	 0.00000000	 0.02182239	 0.02769752	 0.03586392
                     10	-0.02448223	-0.01947045	 0.00000000	 0.01527584	 0.01947045	 0.02448223
                     20	-0.00446995	-0.00232559	 0.00000000	-0.00012570	 0.00232559	 0.00446995
                     30	 0.01321088	 0.01277503	 0.00000000	-0.01342019	-0.01277503	-0.01321088
                     60	 0.03396217	 0.02750895	 0.00000000	-0.02235892	-0.02750895	-0.03396217
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              </tableData>
              <tableData breakPoint="30">
                              -20	       -10	         0	         5	        10	        20
                    -20	-0.01897795	-0.00408691	 0.00000000	-0.00473772	 0.00408691	 0.01897795
                    -10	-0.02977955	-0.01804625	 0.00000000	 0.01049087	 0.01804625	 0.02977955
                      0	-0.03709623	-0.02834113	 0.00000000	 0.02217164	 0.02834113	 0.03709623
                     10	-0.02615099	-0.02019456	 0.00000000	 0.01552762	 0.02019456	 0.02615099
                     20	-0.00596706	-0.00262978	 0.00000000	-0.00041797	 0.00262978	 0.00596706
                     30	 0.01249355	 0.01339120	 0.00000000	-0.01470311	-0.01339120	-0.01249355
                     60	 0.03923286	 0.03388877	 0.00000000	-0.02929329	-0.03388877	-0.03923286
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              </tableData>
          </table>
       </product>
    </function>
    <function name="aero/coefficients/CMNDAD">
    <description>YAWING MOMENT DUE TO AILERON DEFLECTION -CNDA</description>
    <product>
          <property>fcs/aileron-pos-deg</property>
          <property>aero/cadc-control-effectivity-factor</property>
          <table>
            <independentVar lookup="row">aero/alpha-deg</independentVar>
            <tableData>
                    -20		 0.00007779
                    -19		 0.00006879
                     -9		 0.00007427
                      1		 0.00007943
                     11		 0.00001317
                     21		-0.00007624
                     31		-0.00012077
                     60		 0.00000085
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            </tableData>
          </table>
       </product>
    </function>
    <function name="aero/coefficients/CMNDRDr">
    <description>YAWING MOMENT DUE TO RUDDER DEFLECTION -CNDR</description>
    <product>
          <property>fcs/rudder-pos-deg</property>
          <value>0.89 <!-- DRFLX3 --></value>
          <property>aero/coefficients/EPA43</property>
          <property>aero/cadc-control-effectivity-factor</property>
          <table>
            <independentVar lookup="row">aero/alpha-deg</independentVar>
            <independentVar lookup="column">aero/beta-deg</independentVar>
            <tableData>
                                -20	        -10	          0	          5	         10	         20
                    -20	-0.00233301	-0.00226137	-0.00218973	-0.00215392	-0.00211810	-0.00204646
                    -10	-0.00220362	-0.00217427	-0.00214492	-0.00213024	-0.00211556	-0.00208621
                      0	-0.00150815	-0.00152109	-0.00153402	-0.00154049	-0.00154695	-0.00155989
                     10	-0.00116009	-0.00121531	-0.00127053	-0.00129814	-0.00132575	-0.00138097
                     20	-0.00070836	-0.00080587	-0.00090337	-0.00095213	-0.00100088	-0.00109839
                     30	-0.00011419	-0.00025399	-0.00039378	-0.00046368	-0.00053357	-0.00067337
                     60	 0.00065481	 0.00038815	 0.00012150	-0.00001183	-0.00014515	-0.00041181
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            </tableData>
          </table>
       </product>
    </function>
    <function name="aero/coefficients/CMNDTD">
    <description>YAWING MOMENT DUE TO DIFFERENTIAL TAIL DEFLECTION - CNDDT</description>
    <product>
          <value>0.975 <!-- DTFLX3 --></value>
          <property>fcs/differential-elevator-pos-deg</property>
          <property>aero/cadc-control-effectivity-factor</property>
          <table>
            <independentVar lookup="row">aero/alpha-deg</independentVar>
            <independentVar lookup="column">fcs/elevator-pos-deg</independentVar>
            <tableData>
                                -30	        -25	        -20	        -15	        -10	         -5	          0	          5	         10	         15	         20	         25	         30
                    -20	 0.00163093	 0.00139340	 0.00116573	 0.00094789	 0.00073989	 0.00054174	 0.00035343	 0.00017496	 0.00000633	-0.00015245	-0.00030139	-0.00044049	-0.00056975
                    -10	 0.00146644	 0.00124727	 0.00103794	 0.00083844	 0.00064880	 0.00046899	 0.00029903	 0.00013890	-0.00001138	-0.00015181	-0.00028241	-0.00040316	-0.00051407
                      0	 0.00164020	 0.00143937	 0.00124838	 0.00106724	 0.00089594	 0.00073448	 0.00058286	 0.00044108	 0.00030915	 0.00018706	 0.00007481	-0.00002760	-0.00012016
                     10	 0.00142063	 0.00123815	 0.00106551	 0.00090271	 0.00074976	 0.00060664	 0.00047337	 0.00034994	 0.00023636	 0.00013261	 0.00003871	-0.00004535	-0.00011957
                     20	 0.00083089	 0.00066675	 0.00051246	 0.00036801	 0.00023340	 0.00010863	-0.00000629	-0.00011137	-0.00020661	-0.00029201	-0.00036757	-0.00043328	-0.00048915
                     30	 0.00018091	 0.00003512	-0.00010083	-0.00022693	-0.00034320	-0.00044962	-0.00054619	-0.00063293	-0.00070982	-0.00077688	-0.00083409	-0.00088145	-0.00091898
                     60	-0.00037910	-0.00046985	-0.00055075	-0.00062182	-0.00068304	-0.00073442	-0.00077596	-0.00080766	-0.00082951	-0.00084153	-0.00084370	-0.00083602	-0.00081851
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            </tableData>
          </table>
       </product>
    </function>
    <function name="aero/coefficients/CMNP">
    <description>YAWING MOMENT DUE TO ROLL RATE - CNP</description>
    <product>
          <property>aero/pb</property>
          <table>
            <independentVar lookup="row">aero/alpha-deg</independentVar>
            <tableData>
                    -20		 0.06927476
                    -19		 0.11136042
                     -9		 0.03387676
                      1		-0.02514282
                     11		 0.00024487
                     21		-0.08378652
                     31		-0.08429094
                     60		-0.06638497
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            </tableData>
          </table>
       </product>
    </function>
    <function name="aero/coefficients/CMNR">
    <description>YAW DAMPING DERIVATIVE - CMNR</description>
    <product>
          <property>aero/rb</property>
          <table>
            <independentVar lookup="row">aero/alpha-deg</independentVar>
            <tableData>
                    -20		-0.28050000
                    -19		-0.28050000
                     -9		-0.28050000
                      1		-0.30660535
                     11		-0.30626834
                     21		-0.44026180
                     31		-0.06432659
                     60		-0.11000000
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            </tableData>
          </table>
       </product>
    </function>
    <function name="aero/coefficients/CLIFT">
      <sum>
          <property>aero/coefficients/CFZB</property>
          <property>aero/coefficients/ClDFM</property>
          <property>aero/coefficients/ClUC</property>
       </sum>
        <property>aero/coefficients/ClMach</property>
    </function>
  <axis name="LIFT">
    <function name="aero/force/LIFT">
    <product>
          <property>aero/qbar-psf</property>
          <property>metrics/Sw-sqft</property>
          <property>aero/coefficients/CLIFT</property>
       </product>
    </function>
  </axis>
    <function name="aero/coefficients/CDRAG">
      <sum>
          <property>aero/coefficients/CFXB</property>
          <property>aero/coefficients/CdUC</property>
          <property>aero/coefficients/CdDBRK</property>
          <property>aero/coefficients/CdMach</property>
          <property>aero/coefficients/CdDFM</property>
       </sum>
    </function>
  <axis name="DRAG">
    <function name="aero/force/DRAG">
    <product>
          <property>aero/qbar-psf</property>
          <property>metrics/Sw-sqft</property>
          <property>aero/coefficients/CDRAG</property>
       </product>
    </function>
  </axis>
    <function name="aero/coefficients/CSIDE">
      <sum>
          <property>aero/coefficients/CFYB</property>
          <property>aero/coefficients/CFYP</property>
          <property>aero/coefficients/CFYR</property>
          <property>aero/coefficients/CYDAD</property>
          <property>aero/coefficients/CYDRD</property>
          <property>aero/coefficients/CYDTD</property>
          <property>aero/coefficients/CdTNK</property>
       </sum>
        <property>aero/coefficients/CyMach</property>
    </function>
  <axis name="SIDE">
    <function name="aero/force/SIDE">
    <product>
          <property>aero/qbar-psf</property>
          <property>metrics/Sw-sqft</property>
          <property>aero/coefficients/CSIDE</property>
       </product>
    </function>
  </axis>
    <function name="aero/coefficients/CROLL">
      <sum>
          <property>aero/coefficients/CML1</property>
          <property>aero/coefficients/CMLP</property>
          <property>aero/coefficients/CMLR</property>
          <property>aero/coefficients/CMLDAD</property>
          <property>aero/coefficients/CMLDRD</property>
          <property>aero/coefficients/CMLDTD</property>
          <property>aero/coefficients/CMLDCLB</property>
       </sum>
        <property>aero/coefficients/CLMach</property>
    </function>
  <axis name="ROLL">
    <function name="aero/force/ROLL">
    <product>
          <property>aero/qbar-psf</property>
          <property>metrics/Sw-sqft</property>
          <property>metrics/bw-ft</property>
          <property>aero/coefficients/CROLL</property>
       </product>
    </function>
  </axis>
    <function name="aero/coefficients/CPITCH">
      <sum>
          <property>aero/coefficients/CMM1</property>
          <property>aero/coefficients/CMMQ</property>
          <property>aero/coefficients/DCMAIM</property>
          <property>aero/coefficients/CMUC</property>
          <property>aero/coefficients/CMDFM</property>
       </sum>
        <property>aero/coefficients/CMMach</property>
    </function>
  <axis name="PITCH">
    <function name="aero/force/PITCH">
    <product>
          <property>aero/qbar-psf</property>
          <property>metrics/Sw-sqft</property>
          <property>metrics/cbarw-ft</property>
          <property>aero/coefficients/CPITCH</property>
       </product>
    </function>
  </axis>
    <function name="aero/coefficients/CYAW">
      <sum>
          <property>aero/coefficients/CMN1</property>
          <property>aero/coefficients/CMNDRDr</property>
          <property>aero/coefficients/CMNP</property>
          <property>aero/coefficients/CMNR</property>
          <property>aero/coefficients/CMNDTD</property>
          <property>aero/coefficients/CMNDAD</property>
       </sum>
    </function>
  <axis name="YAW">
    <function name="aero/force/YAW">
    <product>
          <property>aero/qbar-psf</property>
          <property>metrics/Sw-sqft</property>
          <property>metrics/bw-ft</property>
          <property>aero/coefficients/CYAW</property>
       </product>
    </function>
  </axis>
        <!-- END F-15 Aerodynamic data from (AFIT/GAE/ENY/90D-16); CG 25.65%-->

</aerodynamics>

</fdm_config>
